28.07.2025
13:09
$SIZES PD=-1000 LVR=-150 LTH=-200
$PROBLEM single pyDarwin individual, one among multitude
$INPUT ID TIME AMT RATE DV DROP MDV AGE SEX LBM DROP CMT EVID
$DATA "D:\Users\selzer\Repos\GH\pyDarwinXploR\RemiR/data.csv" IGNORE=@
$SUBROUTINE ADVAN11 TRANS4
$PK

  TVCLSEX = 0
  IF(SEX == 1) THEN
  TVCLSEX = THETA(1)
  ENDIF
  CL = THETA(2)  *(LBM/50)**(THETA(3)) *(1 + TVCLSEX) * EXP(ETA(1)) ; CL
  ; Q is not used ; Q

  TVV1SEX = 0
  IF(SEX == 1) THEN
  TVV1SEX = THETA(4)
  ENDIF
  V1 = THETA(5) *(1 + THETA(6) * (AGE))  *(1 + TVV1SEX) * EXP(ETA(2))
  SC = V1 ; V1

  TVV2SEX = 0
  IF(SEX == 1) THEN
  TVV2SEX = THETA(7)
  ENDIF
  V2 = THETA(8)  *(LBM/50)**(THETA(9)) *(1 + TVV2SEX) * EXP(ETA(3)) ; V2

  TVQ2SEX = 0
  IF(SEX == 1) THEN
  TVQ2SEX = THETA(10)
  ENDIF
  Q2 = THETA(11) *(1 + THETA(12) * (AGE)) *(LBM/50)**(THETA(13)) *(1 + TVQ2SEX) * EXP(ETA(4)) ; Q2

  TVQ3SEX = 0
  IF(SEX == 1) THEN
  TVQ3SEX = THETA(14)
  ENDIF
  Q3 = THETA(15) *(1 + THETA(16) * (AGE))  *(1 + TVQ3SEX) * EXP(ETA(5)) ; Q3

  TVV3SEX = 0
  IF(SEX == 1) THEN
  TVV3SEX = THETA(17)
  ENDIF
  V3 = THETA(18)   *(1 + TVV3SEX) * EXP(ETA(6)) ; V3
$ERROR
  IPRED = F
  Y = F *(1+EPS(1))+EPS(2)
$SIGMA
  ;proportional error
  0.2	; EPS(1)
  ;additive error
  1	; EPS(2)
$THETA

  (1.1);CL~SEX1
  (0, 2) ; CL

  (1); CL~LBM
  ; Q is not used

  (1);V1~SEX1
  (0, 5) ; V1
  (1); V1~AGE

  (1);V2~SEX1
  (0, 10) ; V2

  (1); V2~LBM

  (0.1);Q2~SEX1
  (0, 2) ; Q2
  (1); Q2~AGE
  (1); Q2~LBM

  (1);Q3~SEX1
  (0, 0.05) ; Q3
  (1); Q3~AGE

  (1);V3~SEX1
  (0, 5) ; V3

$OMEGA
  0.3  ; CL
  ; Q is not used
  0.3  ; V1
  0.3  ; V2
  0.3  ; Q2
  0.3  ; Q3
  0.3  ; V3
$EST METHOD = COND INTER NOABORT MAX = 999999
$TABLE ID TIME AMT DV PRED IPRED WRES CWRES FILE=results.tab NOPRINT NOAPPEND ONEHEADER
$COV UNCOND PRINT=E

;; Phenotype: ([('ADVAN', 1), ('CL~AGE', 0), ('CL~LBM', 1), ('CL~SEX', 1), ('V1~AGE', 1), ('V1~LBM', 0), ('V1~SEX', 1), ('V2~AGE', 0), ('V2~LBM', 1), ('V2~SEX', 1), ('Q2~AGE', 1), ('Q2~LBM', 1), ('Q2~SEX', 1), ('Q3~AGE', 1), ('Q3~LBM', 0), ('Q3~SEX', 1), ('V3~AGE', 0), ('V3~LBM', 0), ('V3~SEX', 1), ('V3_OMEGA', 1), ('RESERR', 1)])
;; Genotype: [1, 0, 1, 1, 1, 1, 0, 1, 1, 1, 0, 1, 1, 0, 1, 1, 1, 1, 1, 1, 1, 0, 1, 0, 0, 1, 1, 1]
;; Num non-influential tokens: 7

NM-TRAN MESSAGES
 WARNINGS AND ERRORS (IF ANY) FOR PROBLEM    1
 (WARNING  2) NM-TRAN INFERS THAT THE DATA ARE POPULATION.

1NONLINEAR MIXED EFFECTS MODEL PROGRAM (NONMEM) VERSION 7.4.3
 ORIGINALLY DEVELOPED BY STUART BEAL, LEWIS SHEINER, AND ALISON BOECKMANN
 CURRENT DEVELOPERS ARE ROBERT BAUER, ICON DEVELOPMENT SOLUTIONS,
 AND ALISON BOECKMANN. IMPLEMENTATION, EFFICIENCY, AND STANDARDIZATION
 PERFORMED BY NOUS INFOSYSTEMS.
 PROBLEM NO.:         1
 single pyDarwin individual, one among multitude
 TOT. NO. OF OBS RECS:     1992
 TOT. NO. OF INDIVIDUALS:       65
 THREE COMPARTMENT MODEL (ADVAN11)
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 #TBLN:      1
 #METH: First Order Conditional Estimation with Interaction
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
 #TERM:
0MINIMIZATION TERMINATED
 DUE TO ROUNDING ERRORS (ERROR=134)
 NO. OF FUNCTION EVALUATIONS USED:     5315
 NO. OF SIG. DIGITS IN FINAL EST.:  0.1
 ADDITIONAL PROBLEMS OCCURRED WITH THE MINIMIZATION.
 REGARD THE RESULTS OF THE ESTIMATION STEP CAREFULLY, AND ACCEPT THEM ONLY
 AFTER CHECKING THAT THE COVARIANCE STEP PRODUCES REASONABLE OUTPUT.

 ETABAR IS THE ARITHMETIC MEAN OF THE ETA-ESTIMATES,
 AND THE P-VALUE IS GIVEN FOR THE NULL HYPOTHESIS THAT THE TRUE MEAN IS 0.

 ETABAR:         1.2032E-02  7.8596E-03 -1.3294E-02 -7.1687E-02 -4.0479E-03 -2.2466E-02
 SE:             2.4587E-02  2.7319E-02  6.3588E-02  6.3741E-02  5.0153E-02  4.4488E-02
 N:                      65          65          65          65          65          65

 P VAL.:         6.2458E-01  7.7358E-01  8.3439E-01  2.6073E-01  9.3567E-01  6.1357E-01

 ETASHRINKSD(%)  1.0000E-10  1.6935E+01  7.1575E+00  1.9745E+00  1.7606E+01  1.2119E+01
 ETASHRINKVR(%)  1.0000E-10  3.1003E+01  1.3803E+01  3.9101E+00  3.2112E+01  2.2769E+01
 EBVSHRINKSD(%)  9.4771E-01  2.2984E+01  3.6820E+00  7.8930E+00  2.1157E+01  1.5187E+01
 EBVSHRINKVR(%)  1.8864E+00  4.0686E+01  7.2283E+00  1.5163E+01  3.7837E+01  2.8067E+01
 EPSSHRINKSD(%)  8.1526E+00  8.1526E+00
 EPSSHRINKVR(%)  1.5641E+01  1.5641E+01


 TOTAL DATA POINTS NORMALLY DISTRIBUTED (N):         1992
 N*LOG(2PI) CONSTANT TO OBJECTIVE FUNCTION:    3661.0511162874159
 OBJECTIVE FUNCTION VALUE WITHOUT CONSTANT:    3408.4464597360529
 OBJECTIVE FUNCTION VALUE WITH CONSTANT:       7069.4975760234684
 REPORTED OBJECTIVE FUNCTION DOES NOT CONTAIN CONSTANT

 TOTAL EFFECTIVE ETAS (NIND*NETA):                           390


 #TERE:
 Elapsed estimation  time in seconds:  1221.88
 Elapsed covariance  time in seconds:   334.39
 Elapsed postprocess time in seconds:     0.45

 ********************               FIRST ORDER CONDITIONAL ESTIMATION WITH INTERACTION              ********************
 #OBJT:**************                       MINIMUM VALUE OF OBJECTIVE FUNCTION                      ********************
 #OBJV:********************************************     3408.446       **************************************************

 ********************               FIRST ORDER CONDITIONAL ESTIMATION WITH INTERACTION              ********************
 ********************                             FINAL PARAMETER ESTIMATE                           ********************

 THETA - VECTOR OF FIXED EFFECTS PARAMETERS   *********
         TH 1      TH 2      TH 3      TH 4      TH 5      TH 6      TH 7      TH 8      TH 9      TH10      TH11      TH12
          TH13      TH14      TH15      TH16      TH17      TH18
        -5.28E-02  2.39E+00  6.45E-01  5.25E-01  4.91E+00 -7.02E-03  2.82E-01  5.85E+00  7.45E-01 -4.82E-01  2.79E+00  9.23E-04
          1.46E+00 -4.30E-02  3.84E-02  1.21E-01  3.97E-01  3.25E+00

 OMEGA - COV MATRIX FOR RANDOM EFFECTS - ETAS  ********
         ETA1      ETA2      ETA3      ETA4      ETA5      ETA6
 ETA1
+        3.71E-02
 ETA2
+        0.00E+00  7.14E-02
 ETA3
+        0.00E+00  0.00E+00  3.10E-01
 ETA4
+        0.00E+00  0.00E+00  0.00E+00  2.79E-01
 ETA5
+        0.00E+00  0.00E+00  0.00E+00  0.00E+00  2.45E-01
 ETA6
+        0.00E+00  0.00E+00  0.00E+00  0.00E+00  0.00E+00  1.69E-01

 SIGMA - COV MATRIX FOR RANDOM EFFECTS - EPSILONS  ****
         EPS1      EPS2
 EPS1
+        1.17E-02
 EPS2
+        0.00E+00  5.52E-04

 OMEGA - CORR MATRIX FOR RANDOM EFFECTS - ETAS  *******
         ETA1      ETA2      ETA3      ETA4      ETA5      ETA6
 ETA1
+        1.93E-01
 ETA2
+        0.00E+00  2.67E-01
 ETA3
+        0.00E+00  0.00E+00  5.56E-01
 ETA4
+        0.00E+00  0.00E+00  0.00E+00  5.28E-01
 ETA5
+        0.00E+00  0.00E+00  0.00E+00  0.00E+00  4.95E-01
 ETA6
+        0.00E+00  0.00E+00  0.00E+00  0.00E+00  0.00E+00  4.11E-01

 SIGMA - CORR MATRIX FOR RANDOM EFFECTS - EPSILONS  ***
         EPS1      EPS2
 EPS1
+        1.08E-01
 EPS2
+        0.00E+00  2.35E-02

 ********************               FIRST ORDER CONDITIONAL ESTIMATION WITH INTERACTION              ********************
 ********************                            STANDARD ERROR OF ESTIMATE                          ********************

 THETA - VECTOR OF FIXED EFFECTS PARAMETERS   *********
         TH 1      TH 2      TH 3      TH 4      TH 5      TH 6      TH 7      TH 8      TH 9      TH10      TH11      TH12
          TH13      TH14      TH15      TH16      TH17      TH18
         3.51E+04  5.98E+04  5.88E+04  2.47E+03  1.33E+00  2.72E+01  2.75E+02  4.11E+01  1.35E+00  1.02E+03  2.50E+01  4.91E+01
          2.40E+01  5.11E+03  2.25E+02  5.91E-01  2.43E+03  5.29E+03

 OMEGA - COV MATRIX FOR RANDOM EFFECTS - ETAS  ********
         ETA1      ETA2      ETA3      ETA4      ETA5      ETA6
 ETA1
+        3.37E+01
 ETA2
+       .........  7.89E+01
 ETA3
+       ......... .........  3.48E+00
 ETA4
+       ......... ......... .........  1.17E+00
 ETA5
+       ......... ......... ......... .........  1.10E+00
 ETA6
+       ......... ......... ......... ......... .........  6.78E+00

 SIGMA - COV MATRIX FOR RANDOM EFFECTS - EPSILONS  ****
         EPS1      EPS2
 EPS1
+        1.32E-01
 EPS2
+       .........  3.79E-02

 OMEGA - CORR MATRIX FOR RANDOM EFFECTS - ETAS  *******
         ETA1      ETA2      ETA3      ETA4      ETA5      ETA6
 ETA1
+        8.74E+01
 ETA2
+       .........  1.48E+02
 ETA3
+       ......... .........  3.13E+00
 ETA4
+       ......... ......... .........  1.10E+00
 ETA5
+       ......... ......... ......... .........  1.11E+00
 ETA6
+       ......... ......... ......... ......... .........  8.24E+00

 SIGMA - CORR MATRIX FOR RANDOM EFFECTS - EPSILONS  ***
         EPS1      EPS2
 EPS1
+        6.10E-01
 EPS2
+       .........  8.07E-01
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
 ********************               FIRST ORDER CONDITIONAL ESTIMATION WITH INTERACTION              ********************
 ********************                      EIGENVALUES OF COR MATRIX OF ESTIMATE                     ********************

             1         2         3         4         5         6         7         8         9        10        11        12
             13        14        15        16        17        18        19        20        21        22        23        24
            25        26
         4.52E-17  9.33E-17 -1.06E-16  2.20E-16  5.72E-16  1.63E-15 -1.94E-15  1.07E-14  2.19E-14  2.83E-14  1.27E-13  1.82E-13
          4.05E-13  8.26E-13  2.00E-12  9.18E-12  5.11E-11  8.14E-11  1.70E-10  5.34E-10  8.61E-10  5.52E-09  1.06E-08  1.67E-07
         9.20E-05  2.60E+01
 Elapsed finaloutput time in seconds:     0.26
 #CPUT: Total CPU Time in Seconds,     1557.344
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