11.02.2025
10:26
$PROBLEM    2 compartment fitting
$INPUT       ID TIME AMT RATE DV MDV EVID WT AGE SEX BUN SCR OCC CRCL COV1 COV2

$DATA      D:\Users\raban.heller\Documents\GitHub\pyDarwinXploR\Examples\ExamplePenFunc/dataWithPeriod.csv IGNORE=@

$SUBROUTINE ADVAN4 ;; advan4
$PK
  CWTKGONE = WT/81  ;; WEIGHT CENTERED ON ONE
  CWTKGZERO = WT-81 ;; WEIGHT CENTERED ON ZERO
  CAGE = AGE/60     ;; AGE CENTERED ON ONE
  CCRCL = CRCL/85.6 ;; CRCL CENTERD ON ONE
  CCOV1 = COV1-15.4 ;; COVARIATE 1 CENTERED ON ZERO
  IF(OCC.EQ.1) IOVV = ETA(4)
  IF(OCC.EQ.2) IOVV = ETA(5)
  IF(OCC.EQ.3) IOVV = ETA(6)
  TVV2=THETA(1) *CWTKGONE**THETA(7)   *EXP(COV2*THETA(8))  *EXP(IOVV)
  V2=TVV2*EXP(ETA(2))
  IOVCL = 0
  TVCL= THETA(3) *CWTKGONE**THETA(9)  *CCRCL**THETA(10) *EXP(CCOV1*THETA(11)) *EXP(IOVCL)
  CL=TVCL*EXP(ETA(1))

  K=CL/V2
  K23=THETA(4)*CWTKGONE**THETA(6)
  K32=THETA(5)*CWTKGONE**THETA(6)
  ALAG1=THETA(12)
  D1=THETA(13)
  TVKA=THETA(2)
  KA=TVKA  *EXP(ETA(3))
  S2 = V2
$ERROR
  REP = IREP
  IPRED =F
  IOBS = F +EPS(1)
  Y=IOBS
$THETA
  (0.001,100) 	; THETA(1) V  UNITS = L
  (0.001, 10) 	; THETA(2) KA UNITS = 1/HR
  (0.001,20)	; THETA(3) CL UNITS =  L/HR
  (0.001,0.02)  	 ; THETA(4) K23
  (0.001,0.3) 	 ; THETA(5) K32
  (0,0.1) 	; THETA(6) K23~WT 	 ; init for K23~WT
  (-4,0.8) 	; THETA(7) POWER volume ~WT

  (-4,0.1) 	; THETA(8) EXPONENTIAL volume ~COV2
  (-4,.7) 	; THETA(9) POWER clearance~WT

  (-4,-0.2) 	; THETA(10) POWER clearance~CRCL
  (-4,0.1) 	; THETA(11) EXPONENTIAL CL~COV1
  (0.001,0.1,1) 		;; THETA(12) ALAG1
  (0.001,0.1,1) ;;THETA(13) D1
$OMEGA
  0.1  		; ETA(1) CLEARANCE
  0.4  		; ETA(2) VOLUME
$OMEGA ;; 2nd OMEGA block
  0.1		; ETA(3) ETA ON KA
  ;; D1 and lag, block
  ;; no iov ON CL
$OMEGA BLOCK(1) ; ETA(4)
  0.1
$OMEGA BLOCK SAME ; ETA(5)
$OMEGA BLOCK SAME ; ETA(6)
$SIGMA
  200 	; EPS(1) additive error

$EST METHOD=COND INTER MAX = 9999 MSFO=MSF1 PRINT = 10
$COV UNCOND PRINT=E  PRECOND=1 PRECONDS=TOS  MATRIX = R

;; Phenotype: ({'ADVAN': 1, 'K23~WT': 1, 'KAETA': 1, 'V2~WT': 1, 'V2~AGE': 0, 'V2~SEX': 0, 'V2~COV2': 1, 'CL~WT': 1, 'CL~AGE': 0, 'CL~CRCL': 1, 'CL~COV1': 1, 'IOVCL': 1, 'IOVV': 0, 'INITCL': 1, 'ETAD1LAG': 0, 'D1LAG': 2, 'RESERR': 1})
;; Genotype: [1, 1, 1, 1, 0, 0, 1, 1, 0, 1, 1, 1, 0, 1, 0, 2, 1]
;; Num non-influential tokens: 0

NM-TRAN MESSAGES
 AN ERROR WAS FOUND IN THE CONTROL STATEMENTS.
AN ERROR WAS FOUND ON LINE 4 AT THE APPROXIMATE POSITION NOTED:
 $DATA      D:\Users\raban.heller\Documents\GitHub\pyDarwinXploR\Examples\ExamplePenFunc/dataWithPeriod.csv IGNORE=@
           X
 THE CHARACTERS IN ERROR ARE: D
   23  THERE ARE TOO MANY CHARACTERS IN THIS VALUE.
OFV = 99999999
success = False
covariance = False
correlation = False
Condition # = 99999999
Num Non fixed THETAs = 0
Num Non fixed OMEGAs = 0
Num Non fixed SIGMAs = 0
Original run directory = D:\Users\raban.heller\Documents\GitHub\pyDarwinXploR\Examples\ExamplePenFunc\rundir\01\04
