28.07.2025
13:09
$SIZES PD=-1000 LVR=-150 LTH=-200
$PROBLEM single pyDarwin individual, one among multitude
$INPUT ID TIME AMT RATE DV DROP MDV AGE SEX LBM DROP CMT EVID
$DATA "D:\Users\selzer\Repos\GH\pyDarwinXploR\RemiR/data.csv" IGNORE=@
$SUBROUTINE ADVAN3 TRANS4
$PK

  CL = THETA(1) *(1 + THETA(2) * (AGE)) *(LBM/50)**(THETA(3))  * EXP(ETA(1)) ; CL

  TVQSEX = 0
  IF(SEX == 1) THEN
  TVQSEX = THETA(4)
  ENDIF
  Q = THETA(5) *(1 + THETA(6) * (AGE))  *(1 + TVQSEX) ; Q

  V1 = THETA(7)  *(LBM/50)**(THETA(8))  * EXP(ETA(2))
  SC = V1 ; V1

  V2 = THETA(9) *(1 + THETA(10) * (AGE)) *(LBM/50)**(THETA(11))  * EXP(ETA(3)) ; V2
  ; Q2 is not used ; Q2
  ; Q3 is not used ; Q3
  ; V3 is not used ; V3
$ERROR
  IPRED = F
  Y = F *(1+EPS(1))
$SIGMA
  ;proportional error
  0.1	; EPS(1)
$THETA

  (0, 2) ; CL
  (1); CL~AGE
  (1); CL~LBM

  (1);Q~SEX1
  (0, 1) ; Q
  (1); Q~AGE

  (0, 7) ; V1

  (1); V1~LBM

  (0, 9) ; V2
  (1); V2~AGE
  (1); V2~LBM
  ; Q2 is not used
  ; Q3 is not used
  ; V3 is not used
$OMEGA
  0.03  ; CL

  0.3  ; V1
  0.3  ; V2
  ; Q2 is not used
  ; Q3 is not used
  ; V3 is not used
$EST METHOD = COND INTER NOABORT MAX = 999999
$TABLE ID TIME AMT DV PRED IPRED WRES CWRES FILE=results.tab NOPRINT NOAPPEND ONEHEADER
$COV UNCOND PRINT=E

;; Phenotype: ([('ADVAN', 0), ('CL~AGE', 1), ('CL~LBM', 1), ('CL~SEX', 0), ('CL_OMEGA', 1), ('Q~AGE', 1), ('Q~LBM', 0), ('Q~SEX', 1), ('Q_OMEGA', 0), ('V1~AGE', 0), ('V1~LBM', 1), ('V1~SEX', 0), ('V1_OMEGA', 1), ('V2~AGE', 1), ('V2~LBM', 1), ('V2~SEX', 0), ('V2_OMEGA', 1), ('RESERR', 0)])
;; Genotype: [0, 1, 1, 0, 1, 1, 0, 1, 0, 0, 1, 0, 1, 1, 1, 0, 1, 0, 0, 1, 1, 0, 0, 1, 0, 0, 0, 0]
;; Num non-influential tokens: 10

NM-TRAN MESSAGES
 WARNINGS AND ERRORS (IF ANY) FOR PROBLEM    1
 (WARNING  2) NM-TRAN INFERS THAT THE DATA ARE POPULATION.

1NONLINEAR MIXED EFFECTS MODEL PROGRAM (NONMEM) VERSION 7.4.3
 ORIGINALLY DEVELOPED BY STUART BEAL, LEWIS SHEINER, AND ALISON BOECKMANN
 CURRENT DEVELOPERS ARE ROBERT BAUER, ICON DEVELOPMENT SOLUTIONS,
 AND ALISON BOECKMANN. IMPLEMENTATION, EFFICIENCY, AND STANDARDIZATION
 PERFORMED BY NOUS INFOSYSTEMS.
 PROBLEM NO.:         1
 single pyDarwin individual, one among multitude
 TOT. NO. OF OBS RECS:     1992
 TOT. NO. OF INDIVIDUALS:       65
 TWO COMPARTMENT MODEL (ADVAN3)
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 #TBLN:      1
 #METH: First Order Conditional Estimation with Interaction
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
 #TERM:
0MINIMIZATION TERMINATED
 DUE TO PROXIMITY OF LAST ITERATION EST. TO A VALUE
 AT WHICH THE OBJ. FUNC. IS INFINITE (ERROR=136)
0AT THE LAST COMPUTED INFINITE VALUE OF THE OBJ. FUNCT.:

0PRED EXIT CODE = 1
0INDIVIDUAL NO.       4   ID= 4.00000000000000E+00   (WITHIN-INDIVIDUAL) DATA REC NO.   2
 THETA=
  3.00E+00  -8.31E-03   1.00E+00   9.58E-01   9.99E-01   8.63E-01   1.19E+00  -3.02E+00   5.69E-01   9.23E-01
 -2.93E+00
 ETA=
 -3.58E+00  -3.77E+01   3.24E+00
 A ROOT OF THE CHARACTERISTIC EQUATION IS ZERO BECAUSE
 K*K21 IS MUCH SMALLER THAN  (K+K12+K21)**2.
 PERHAPS K OR K21 IS VERY SMALL, OR K12 IS VERY LARGE.

 NO. OF FUNCTION EVALUATIONS USED:      470
 NO. OF SIG. DIGITS UNREPORTABLE

 ETABAR IS THE ARITHMETIC MEAN OF THE ETA-ESTIMATES,
 AND THE P-VALUE IS GIVEN FOR THE NULL HYPOTHESIS THAT THE TRUE MEAN IS 0.

 ETABAR:         1.0390E-01 -2.1705E+00  1.4314E-01
 SE:             3.7406E-02  9.0420E-02  1.3442E-01
 N:                      65          65          65

 P VAL.:         5.4774E-03  2.745E-127  2.8692E-01

 ETASHRINKSD(%)  1.0000E-10  8.9481E+01  1.0000E-10
 ETASHRINKVR(%)  1.0000E-10  9.8894E+01  1.0000E-10
 EBVSHRINKSD(%)  4.9894E+00  8.3338E+01  1.1222E+00
 EBVSHRINKVR(%)  9.7299E+00  9.7224E+01  2.2319E+00
 EPSSHRINKSD(%)  1.0000E-10
 EPSSHRINKVR(%)  1.0000E-10


 TOTAL DATA POINTS NORMALLY DISTRIBUTED (N):         1992
 N*LOG(2PI) CONSTANT TO OBJECTIVE FUNCTION:    3661.0511162874159
 OBJECTIVE FUNCTION VALUE WITHOUT CONSTANT:    10705.194548010895
 OBJECTIVE FUNCTION VALUE WITH CONSTANT:       14366.245664298311
 REPORTED OBJECTIVE FUNCTION DOES NOT CONTAIN CONSTANT

 TOTAL EFFECTIVE ETAS (NIND*NETA):                           195


 #TERE:
 Elapsed estimation  time in seconds:    31.92

0PRED EXIT CODE = 1
0INDIVIDUAL NO.      10   ID= 1.00000000000000E+01   (WITHIN-INDIVIDUAL) DATA REC NO.   2
 THETA=
  3.00E+00  -8.19E-03   1.00E+00   9.58E-01   9.99E-01   8.63E-01   1.19E+00  -3.02E+00   5.71E-01   9.23E-01
 -2.93E+00
 ETA=
 -5.11E+00  -2.88E+01   6.25E+00
 OCCURS DURING SEARCH FOR ETA AT A NONZERO VALUE OF ETA
 A ROOT OF THE CHARACTERISTIC EQUATION IS ZERO BECAUSE
 K*K21 IS MUCH SMALLER THAN  (K+K12+K21)**2.
 PERHAPS K OR K21 IS VERY SMALL, OR K12 IS VERY LARGE.
0PROGRAM TERMINATED BY OBJ
 Elapsed covariance  time in seconds:     1.29
 MESSAGE ISSUED FROM COVARIANCE STEP

 ********************               FIRST ORDER CONDITIONAL ESTIMATION WITH INTERACTION              ********************
 #OBJT:**************                       MINIMUM VALUE OF OBJECTIVE FUNCTION                      ********************
 #OBJV:********************************************    10705.195       **************************************************

 ********************               FIRST ORDER CONDITIONAL ESTIMATION WITH INTERACTION              ********************
 ********************                             FINAL PARAMETER ESTIMATE                           ********************

 THETA - VECTOR OF FIXED EFFECTS PARAMETERS   *********
         TH 1      TH 2      TH 3      TH 4      TH 5      TH 6      TH 7      TH 8      TH 9      TH10      TH11
         3.00E+00 -8.19E-03  1.00E+00  9.58E-01  9.99E-01  8.63E-01  1.19E+00 -3.02E+00  5.71E-01  9.23E-01 -2.93E+00

 OMEGA - COV MATRIX FOR RANDOM EFFECTS - ETAS  ********
         ETA1      ETA2      ETA3
 ETA1
+        5.74E-02
 ETA2
+        0.00E+00  4.88E+01
 ETA3
+        0.00E+00  0.00E+00  4.84E-01

 SIGMA - COV MATRIX FOR RANDOM EFFECTS - EPSILONS  ****
         EPS1
 EPS1
+        1.87E-01

 OMEGA - CORR MATRIX FOR RANDOM EFFECTS - ETAS  *******
         ETA1      ETA2      ETA3
 ETA1
+        2.40E-01
 ETA2
+        0.00E+00  6.98E+00
 ETA3
+        0.00E+00  0.00E+00  6.95E-01

 SIGMA - CORR MATRIX FOR RANDOM EFFECTS - EPSILONS  ***
         EPS1
 EPS1
+        4.32E-01
 #CPUT: Total CPU Time in Seconds,       33.438
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