28.07.2025
13:09
$SIZES PD=-1000 LVR=-150 LTH=-200
$PROBLEM single pyDarwin individual, one among multitude
$INPUT ID TIME AMT RATE DV DROP MDV AGE SEX LBM DROP CMT EVID
$DATA "D:\Users\selzer\Repos\GH\pyDarwinXploR\RemiR/data.csv" IGNORE=@
$SUBROUTINE ADVAN3 TRANS4
$PK

  TVCLSEX = 0
  IF(SEX == 1) THEN
  TVCLSEX = THETA(1)
  ENDIF
  CL = THETA(2) *(1 + THETA(3) * (AGE)) *(LBM/50)**(THETA(4)) *(1 + TVCLSEX) * EXP(ETA(1)) ; CL

  Q = THETA(5) *(1 + THETA(6) * (AGE))   ; Q

  V1 = THETA(7)  *(LBM/50)**(THETA(8))
  SC = V1 ; V1

  TVV2SEX = 0
  IF(SEX == 1) THEN
  TVV2SEX = THETA(9)
  ENDIF
  V2 = THETA(10) *(1 + THETA(11) * (AGE)) *(LBM/50)**(THETA(12)) *(1 + TVV2SEX) * EXP(ETA(2)) ; V2
  ; Q2 is not used ; Q2
  ; Q3 is not used ; Q3
  ; V3 is not used ; V3
$ERROR
  IPRED = F
  Y = F *(1+EPS(1))
$SIGMA
  ;proportional error
  0.1	; EPS(1)
$THETA

  (1.1);CL~SEX1
  (0, 2) ; CL
  (1); CL~AGE
  (1); CL~LBM

  (0, 1) ; Q
  (1); Q~AGE

  (0, 7) ; V1

  (1); V1~LBM

  (1);V2~SEX1
  (0, 9) ; V2
  (1); V2~AGE
  (1); V2~LBM
  ; Q2 is not used
  ; Q3 is not used
  ; V3 is not used
$OMEGA
  0.03  ; CL

  0.3  ; V2
  ; Q2 is not used
  ; Q3 is not used
  ; V3 is not used
$EST METHOD = COND INTER NOABORT MAX = 999999
$TABLE ID TIME AMT DV PRED IPRED WRES CWRES FILE=results.tab NOPRINT NOAPPEND ONEHEADER
$COV UNCOND PRINT=E

;; Phenotype: ([('ADVAN', 0), ('CL~AGE', 1), ('CL~LBM', 1), ('CL~SEX', 1), ('CL_OMEGA', 1), ('Q~AGE', 1), ('Q~LBM', 0), ('Q~SEX', 0), ('Q_OMEGA', 0), ('V1~AGE', 0), ('V1~LBM', 1), ('V1~SEX', 0), ('V1_OMEGA', 0), ('V2~AGE', 1), ('V2~LBM', 1), ('V2~SEX', 1), ('V2_OMEGA', 1), ('RESERR', 0)])
;; Genotype: [0, 1, 1, 1, 1, 1, 0, 0, 0, 0, 1, 0, 0, 1, 1, 1, 1, 1, 1, 1, 0, 0, 1, 0, 1, 1, 1, 0]
;; Num non-influential tokens: 10

NM-TRAN MESSAGES
 WARNINGS AND ERRORS (IF ANY) FOR PROBLEM    1
 (WARNING  2) NM-TRAN INFERS THAT THE DATA ARE POPULATION.

1NONLINEAR MIXED EFFECTS MODEL PROGRAM (NONMEM) VERSION 7.4.3
 ORIGINALLY DEVELOPED BY STUART BEAL, LEWIS SHEINER, AND ALISON BOECKMANN
 CURRENT DEVELOPERS ARE ROBERT BAUER, ICON DEVELOPMENT SOLUTIONS,
 AND ALISON BOECKMANN. IMPLEMENTATION, EFFICIENCY, AND STANDARDIZATION
 PERFORMED BY NOUS INFOSYSTEMS.
 PROBLEM NO.:         1
 single pyDarwin individual, one among multitude
 TOT. NO. OF OBS RECS:     1992
 TOT. NO. OF INDIVIDUALS:       65
 TWO COMPARTMENT MODEL (ADVAN3)
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 #TBLN:      1
 #METH: First Order Conditional Estimation with Interaction
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
 #TERM:
0MINIMIZATION TERMINATED
 DUE TO ROUNDING ERRORS (ERROR=134)
 NO. OF FUNCTION EVALUATIONS USED:    20121
 NO. OF SIG. DIGITS UNREPORTABLE
0PARAMETER ESTIMATE IS NEAR ITS BOUNDARY

 ETABAR IS THE ARITHMETIC MEAN OF THE ETA-ESTIMATES,
 AND THE P-VALUE IS GIVEN FOR THE NULL HYPOTHESIS THAT THE TRUE MEAN IS 0.

 ETABAR:        -4.3797E-04 -4.7330E-04
 SE:             1.7858E-02  2.6825E-02
 N:                      65          65

 P VAL.:         9.8043E-01  9.8592E-01

 ETASHRINKSD(%)  5.2141E+00  2.8433E+00
 ETASHRINKVR(%)  1.0156E+01  5.6058E+00
 EBVSHRINKSD(%)  5.8458E+00  3.6294E+00
 EBVSHRINKVR(%)  1.1350E+01  7.1272E+00
 EPSSHRINKSD(%)  2.3722E+00
 EPSSHRINKVR(%)  4.6881E+00


 TOTAL DATA POINTS NORMALLY DISTRIBUTED (N):         1992
 N*LOG(2PI) CONSTANT TO OBJECTIVE FUNCTION:    3661.0511162874159
 OBJECTIVE FUNCTION VALUE WITHOUT CONSTANT:    7343.2596418868488
 OBJECTIVE FUNCTION VALUE WITH CONSTANT:       11004.310758174264
 REPORTED OBJECTIVE FUNCTION DOES NOT CONTAIN CONSTANT

 TOTAL EFFECTIVE ETAS (NIND*NETA):                           130


 #TERE:
 Elapsed estimation  time in seconds:   902.64
0S MATRIX ALGORITHMICALLY SINGULAR
0S MATRIX IS OUTPUT
0INVERSE COVARIANCE MATRIX SET TO RS*RMAT, WHERE S* IS A PSEUDO INVERSE OF S
 Elapsed covariance  time in seconds:    29.88
 Elapsed postprocess time in seconds:     0.13

 ********************               FIRST ORDER CONDITIONAL ESTIMATION WITH INTERACTION              ********************
 #OBJT:**************                       MINIMUM VALUE OF OBJECTIVE FUNCTION                      ********************
 #OBJV:********************************************     7343.260       **************************************************

 ********************               FIRST ORDER CONDITIONAL ESTIMATION WITH INTERACTION              ********************
 ********************                             FINAL PARAMETER ESTIMATE                           ********************

 THETA - VECTOR OF FIXED EFFECTS PARAMETERS   *********
         TH 1      TH 2      TH 3      TH 4      TH 5      TH 6      TH 7      TH 8      TH 9      TH10      TH11      TH12
        -6.54E-02  3.26E+00 -4.68E-03  3.60E-01  5.51E+00 -6.48E-03  7.00E-02 -1.02E+01  3.30E-01  2.26E+01 -6.74E-03 -1.56E-01

 OMEGA - COV MATRIX FOR RANDOM EFFECTS - ETAS  ********
         ETA1      ETA2
 ETA1
+        2.34E-02
 ETA2
+        0.00E+00  5.03E-02

 SIGMA - COV MATRIX FOR RANDOM EFFECTS - EPSILONS  ****
         EPS1
 EPS1
+        1.23E-01

 OMEGA - CORR MATRIX FOR RANDOM EFFECTS - ETAS  *******
         ETA1      ETA2
 ETA1
+        1.53E-01
 ETA2
+        0.00E+00  2.24E-01

 SIGMA - CORR MATRIX FOR RANDOM EFFECTS - EPSILONS  ***
         EPS1
 EPS1
+        3.51E-01

 ********************               FIRST ORDER CONDITIONAL ESTIMATION WITH INTERACTION              ********************
 ********************                            STANDARD ERROR OF ESTIMATE                          ********************

 THETA - VECTOR OF FIXED EFFECTS PARAMETERS   *********
         TH 1      TH 2      TH 3      TH 4      TH 5      TH 6      TH 7      TH 8      TH 9      TH10      TH11      TH12
         5.29E-02  1.60E-01  5.62E-04  1.39E-01  3.87E-01  6.20E-04  0.00E+00  1.33E+00  1.20E-01  1.54E+00  4.55E-04  2.21E-01

 OMEGA - COV MATRIX FOR RANDOM EFFECTS - ETAS  ********
         ETA1      ETA2
 ETA1
+        5.38E-03
 ETA2
+       .........  1.04E-02

 SIGMA - COV MATRIX FOR RANDOM EFFECTS - EPSILONS  ****
         EPS1
 EPS1
+        1.11E-02

 OMEGA - CORR MATRIX FOR RANDOM EFFECTS - ETAS  *******
         ETA1      ETA2
 ETA1
+        1.76E-02
 ETA2
+       .........  2.32E-02

 SIGMA - CORR MATRIX FOR RANDOM EFFECTS - EPSILONS  ***
         EPS1
 EPS1
+        1.58E-02

 ********************               FIRST ORDER CONDITIONAL ESTIMATION WITH INTERACTION              ********************
 ********************                          COVARIANCE MATRIX OF ESTIMATE                         ********************

            TH 1      TH 2      TH 3      TH 4      TH 5      TH 6      TH 7      TH 8      TH 9      TH10      TH11      TH12
             OM11      OM12      OM22      SG11
 TH 1
+        2.80E-03
 TH 2
+       -4.23E-03  2.57E-02
 TH 3
+        1.89E-07 -6.66E-05  3.15E-07
 TH 4
+       -4.99E-03  2.00E-03  5.30E-06  1.92E-02
 TH 5
+       -2.55E-04  1.89E-02 -4.48E-05  2.63E-04  1.50E-01
 TH 6
+        3.17E-06 -2.82E-05  6.39E-08  6.44E-07 -2.01E-04  3.84E-07
 TH 7
+        0.00E+00  0.00E+00  0.00E+00  0.00E+00  0.00E+00  0.00E+00  0.00E+00
 TH 8
+       -1.74E-03 -3.87E-02  1.06E-04  3.79E-02 -3.92E-02  9.83E-05  0.00E+00  1.78E+00
 TH 9
+       -1.34E-03  1.37E-03  3.94E-06  4.39E-03 -3.46E-05  6.88E-06  0.00E+00  9.66E-03  1.44E-02
 TH10
+        4.24E-03  5.90E-02 -1.50E-04 -3.99E-02  3.64E-01 -4.34E-04  0.00E+00 -6.73E-02 -6.34E-02  2.38E+00
 TH11
+        2.47E-06 -2.69E-05  9.88E-08 -1.79E-06 -1.01E-04  1.49E-07  0.00E+00  2.82E-05 -1.90E-06 -5.65E-04  2.07E-07
 TH12
+        3.10E-03 -6.45E-03 -3.24E-06 -5.50E-03 -3.66E-03 -8.35E-07  0.00E+00 -2.64E-02 -2.19E-02  8.35E-02  5.22E-06  4.89E-02
 OM11
+       -3.72E-05  3.58E-04 -1.43E-06  1.79E-05  3.90E-04 -3.44E-07  0.00E+00 -2.42E-05  3.25E-05  2.29E-03 -9.58E-07  2.11E-06
          2.89E-05
 OM12
+       ......... ......... ......... ......... ......... ......... ......... ......... ......... ......... ......... .........
         ......... .........
 OM22
+       -7.87E-05  1.29E-04  4.54E-08  1.66E-04  1.08E-03 -1.15E-06  0.00E+00  2.49E-04  3.33E-04  5.47E-03 -2.15E-06 -1.90E-04
          8.98E-06 .........  1.09E-04
 SG11
+       -4.97E-05 -1.95E-04  8.54E-07  3.22E-05  1.69E-04  1.11E-06  0.00E+00 -1.40E-03  2.30E-04  5.74E-03 -1.49E-06 -7.95E-05
          1.51E-05 .........  4.63E-05  1.22E-04

 ********************               FIRST ORDER CONDITIONAL ESTIMATION WITH INTERACTION              ********************
 ********************                          CORRELATION MATRIX OF ESTIMATE                        ********************

            TH 1      TH 2      TH 3      TH 4      TH 5      TH 6      TH 7      TH 8      TH 9      TH10      TH11      TH12
             OM11      OM12      OM22      SG11
 TH 1
+        5.29E-02
 TH 2
+       -5.00E-01  1.60E-01
 TH 3
+        6.37E-03 -7.40E-01  5.62E-04
 TH 4
+       -6.81E-01  9.02E-02  6.81E-02  1.39E-01
 TH 5
+       -1.24E-02  3.05E-01 -2.06E-01  4.91E-03  3.87E-01
 TH 6
+        9.66E-02 -2.84E-01  1.84E-01  7.50E-03 -8.36E-01  6.20E-04
 TH 7
+        0.00E+00  0.00E+00  0.00E+00  0.00E+00  0.00E+00  0.00E+00  0.00E+00
 TH 8
+       -2.46E-02 -1.81E-01  1.41E-01  2.05E-01 -7.58E-02  1.19E-01  0.00E+00  1.33E+00
 TH 9
+       -2.12E-01  7.14E-02  5.85E-02  2.64E-01 -7.45E-04  9.24E-02  0.00E+00  6.03E-02  1.20E-01
 TH10
+        5.20E-02  2.39E-01 -1.73E-01 -1.87E-01  6.10E-01 -4.54E-01  0.00E+00 -3.27E-02 -3.43E-01  1.54E+00
 TH11
+        1.03E-01 -3.69E-01  3.87E-01 -2.84E-02 -5.73E-01  5.29E-01  0.00E+00  4.65E-02 -3.47E-02 -8.06E-01  4.55E-04
 TH12
+        2.65E-01 -1.82E-01 -2.60E-02 -1.79E-01 -4.27E-02 -6.09E-03  0.00E+00 -8.95E-02 -8.24E-01  2.45E-01  5.19E-02  2.21E-01
 OM11
+       -1.31E-01  4.16E-01 -4.75E-01  2.40E-02  1.87E-01 -1.03E-01  0.00E+00 -3.37E-03  5.04E-02  2.76E-01 -3.92E-01  1.77E-03
          5.38E-03
 OM12
+       ......... ......... ......... ......... ......... ......... ......... ......... ......... ......... ......... .........
         ......... .........
 OM22
+       -1.43E-01  7.70E-02  7.75E-03  1.15E-01  2.67E-01 -1.78E-01  0.00E+00  1.79E-02  2.66E-01  3.40E-01 -4.53E-01 -8.24E-02
          1.60E-01 .........  1.04E-02
 SG11
+       -8.50E-02 -1.10E-01  1.37E-01  2.10E-02  3.95E-02  1.61E-01  0.00E+00 -9.48E-02  1.74E-01  3.37E-01 -2.96E-01 -3.25E-02
          2.53E-01 .........  4.01E-01  1.11E-02
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
 ********************               FIRST ORDER CONDITIONAL ESTIMATION WITH INTERACTION              ********************
 ********************                      EIGENVALUES OF COR MATRIX OF ESTIMATE                     ********************

             1         2         3         4         5         6         7         8         9        10        11        12
             13        14        15
         1.75E-02  3.42E-02  1.12E-01  1.90E-01  3.21E-01  4.08E-01  5.46E-01  6.09E-01  1.00E+00  1.01E+00  1.31E+00  1.42E+00
          1.80E+00  2.50E+00  3.72E+00
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 Elapsed finaloutput time in seconds:     0.20
 #CPUT: Total CPU Time in Seconds,      932.938
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