28.07.2025
13:09
$SIZES PD=-1000 LVR=-150 LTH=-200
$PROBLEM single pyDarwin individual, one among multitude
$INPUT ID TIME AMT RATE DV DROP MDV AGE SEX LBM DROP CMT EVID
$DATA "D:\Users\selzer\Repos\GH\pyDarwinXploR\RemiR/data.csv" IGNORE=@
$SUBROUTINE ADVAN11 TRANS4
$PK

  CL = THETA(1) *(1 + THETA(2) * (AGE))   * EXP(ETA(1)) ; CL
  ; Q is not used ; Q

  TVV1SEX = 0
  IF(SEX == 1) THEN
  TVV1SEX = THETA(3)
  ENDIF
  V1 = THETA(4)  *(LBM/50)**(THETA(5)) *(1 + TVV1SEX) * EXP(ETA(2))
  SC = V1 ; V1

  TVV2SEX = 0
  IF(SEX == 1) THEN
  TVV2SEX = THETA(6)
  ENDIF
  V2 = THETA(7)  *(LBM/50)**(THETA(8)) *(1 + TVV2SEX) * EXP(ETA(3)) ; V2

  TVQ2SEX = 0
  IF(SEX == 1) THEN
  TVQ2SEX = THETA(9)
  ENDIF
  Q2 = THETA(10) *(1 + THETA(11) * (AGE))  *(1 + TVQ2SEX) * EXP(ETA(4)) ; Q2

  TVQ3SEX = 0
  IF(SEX == 1) THEN
  TVQ3SEX = THETA(12)
  ENDIF
  Q3 = THETA(13) *(1 + THETA(14) * (AGE))  *(1 + TVQ3SEX) * EXP(ETA(5)) ; Q3

  TVV3SEX = 0
  IF(SEX == 1) THEN
  TVV3SEX = THETA(15)
  ENDIF
  V3 = THETA(16)  *(LBM/50)**(THETA(17)) *(1 + TVV3SEX) ; V3
$ERROR
  IPRED = F
  Y = F *(1+EPS(1))
$SIGMA
  ;proportional error
  0.1	; EPS(1)
$THETA

  (0, 2) ; CL
  (1); CL~AGE

  ; Q is not used

  (1);V1~SEX1
  (0, 5) ; V1

  (1); V1~LBM

  (1);V2~SEX1
  (0, 10) ; V2

  (1); V2~LBM

  (0.1);Q2~SEX1
  (0, 2) ; Q2
  (1); Q2~AGE

  (1);Q3~SEX1
  (0, 0.05) ; Q3
  (1); Q3~AGE

  (1);V3~SEX1
  (0, 5) ; V3

  (1); V3~LBM
$OMEGA
  0.3  ; CL
  ; Q is not used
  0.3  ; V1
  0.3  ; V2
  0.3  ; Q2
  0.3  ; Q3

$EST METHOD = COND INTER NOABORT MAX = 999999
$TABLE ID TIME AMT DV PRED IPRED WRES CWRES FILE=results.tab NOPRINT NOAPPEND ONEHEADER
$COV UNCOND PRINT=E

;; Phenotype: ([('ADVAN', 1), ('CL~AGE', 1), ('CL~LBM', 0), ('CL~SEX', 0), ('V1~AGE', 0), ('V1~LBM', 1), ('V1~SEX', 1), ('V2~AGE', 0), ('V2~LBM', 1), ('V2~SEX', 1), ('Q2~AGE', 1), ('Q2~LBM', 0), ('Q2~SEX', 1), ('Q3~AGE', 1), ('Q3~LBM', 0), ('Q3~SEX', 1), ('V3~AGE', 0), ('V3~LBM', 1), ('V3~SEX', 1), ('V3_OMEGA', 0), ('RESERR', 0)])
;; Genotype: [1, 1, 0, 0, 1, 0, 1, 0, 1, 0, 1, 1, 0, 0, 1, 1, 1, 1, 0, 1, 1, 0, 1, 0, 1, 1, 0, 0]
;; Num non-influential tokens: 7

NM-TRAN MESSAGES
 WARNINGS AND ERRORS (IF ANY) FOR PROBLEM    1
 (WARNING  2) NM-TRAN INFERS THAT THE DATA ARE POPULATION.

1NONLINEAR MIXED EFFECTS MODEL PROGRAM (NONMEM) VERSION 7.4.3
 ORIGINALLY DEVELOPED BY STUART BEAL, LEWIS SHEINER, AND ALISON BOECKMANN
 CURRENT DEVELOPERS ARE ROBERT BAUER, ICON DEVELOPMENT SOLUTIONS,
 AND ALISON BOECKMANN. IMPLEMENTATION, EFFICIENCY, AND STANDARDIZATION
 PERFORMED BY NOUS INFOSYSTEMS.
 PROBLEM NO.:         1
 single pyDarwin individual, one among multitude
 TOT. NO. OF OBS RECS:     1992
 TOT. NO. OF INDIVIDUALS:       65
 THREE COMPARTMENT MODEL (ADVAN11)
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 #TBLN:      1
 #METH: First Order Conditional Estimation with Interaction
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
0PRED EXIT CODE = 1
0INDIVIDUAL NO.      36   ID= 3.60000000000000E+01   (WITHIN-INDIVIDUAL) DATA REC NO.   2
 THETA=
  2.00E+00   1.00E+00   1.00E+00   5.00E+00   1.00E+00   1.00E+00   1.00E+01   1.00E+00   1.00E-01   2.00E+00
  1.00E+00   1.00E+00   5.00E-02   1.00E+00   1.00E+00   5.00E+00   1.00E+00
 ETA=
  5.39E+00  -3.66E-01   8.36E+00   6.81E+00  -6.45E+00
 OCCURS DURING SEARCH FOR ETA AT A NONZERO VALUE OF ETA
 K21, OR K31 IS TOO CLOSE TO AN EIGENVALUE
0PROGRAM TERMINATED BY OBJ
 MESSAGE ISSUED FROM ESTIMATION STEP
 AT INITIAL OBJ. FUNCTION EVALUATION

 #TERM:

 TOTAL DATA POINTS NORMALLY DISTRIBUTED (N):         1366
 N*LOG(2PI) CONSTANT TO OBJECTIVE FUNCTION:    2510.5400727151659
 OBJECTIVE FUNCTION VALUE WITHOUT CONSTANT:   1.34078079299425971E+154
 OBJECTIVE FUNCTION VALUE WITH CONSTANT:      1.34078079299425971E+154
 REPORTED OBJECTIVE FUNCTION DOES NOT CONTAIN CONSTANT

 TOTAL EFFECTIVE ETAS (NIND*NETA):                           175


 #TERE:
 Elapsed estimation  time in seconds:     0.75
 #CPUT: Total CPU Time in Seconds,        0.797
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