28.07.2025
13:09
$SIZES PD=-1000 LVR=-150 LTH=-200
$PROBLEM single pyDarwin individual, one among multitude
$INPUT ID TIME AMT RATE DV DROP MDV AGE SEX LBM DROP CMT EVID
$DATA "D:\Users\selzer\Repos\GH\pyDarwinXploR\RemiR/data.csv" IGNORE=@
$SUBROUTINE ADVAN11 TRANS4
$PK

  CL = THETA(1) *(1 + THETA(2) * (AGE)) *(LBM/50)**(THETA(3))  * EXP(ETA(1)) ; CL
  ; Q is not used ; Q

  TVV1SEX = 0
  IF(SEX == 1) THEN
  TVV1SEX = THETA(4)
  ENDIF
  V1 = THETA(5) *(1 + THETA(6) * (AGE))  *(1 + TVV1SEX) * EXP(ETA(2))
  SC = V1 ; V1

  TVV2SEX = 0
  IF(SEX == 1) THEN
  TVV2SEX = THETA(7)
  ENDIF
  V2 = THETA(8)  *(LBM/50)**(THETA(9)) *(1 + TVV2SEX) * EXP(ETA(3)) ; V2

  Q2 = THETA(10) *(1 + THETA(11) * (AGE)) *(LBM/50)**(THETA(12))  * EXP(ETA(4)) ; Q2

  TVQ3SEX = 0
  IF(SEX == 1) THEN
  TVQ3SEX = THETA(13)
  ENDIF
  Q3 = THETA(14) *(1 + THETA(15) * (AGE)) *(LBM/50)**(THETA(16)) *(1 + TVQ3SEX) * EXP(ETA(5)) ; Q3

  TVV3SEX = 0
  IF(SEX == 1) THEN
  TVV3SEX = THETA(17)
  ENDIF
  V3 = THETA(18) *(1 + THETA(19) * (AGE)) *(LBM/50)**(THETA(20)) *(1 + TVV3SEX) * EXP(ETA(6)) ; V3
$ERROR
  IPRED = F
  Y = F *(1+EPS(1))
$SIGMA
  ;proportional error
  0.1	; EPS(1)
$THETA

  (0, 2) ; CL
  (1); CL~AGE
  (1); CL~LBM
  ; Q is not used

  (1);V1~SEX1
  (0, 5) ; V1
  (1); V1~AGE

  (1);V2~SEX1
  (0, 10) ; V2

  (1); V2~LBM

  (0, 2) ; Q2
  (1); Q2~AGE
  (1); Q2~LBM

  (1);Q3~SEX1
  (0, 0.05) ; Q3
  (1); Q3~AGE
  (1); Q3~LBM

  (1);V3~SEX1
  (0, 5) ; V3
  (1); V3~AGE
  (1); V3~LBM
$OMEGA
  0.3  ; CL
  ; Q is not used
  0.3  ; V1
  0.3  ; V2
  0.3  ; Q2
  0.3  ; Q3
  0.3  ; V3
$EST METHOD = COND INTER NOABORT MAX = 999999
$TABLE ID TIME AMT DV PRED IPRED WRES CWRES FILE=results.tab NOPRINT NOAPPEND ONEHEADER
$COV UNCOND PRINT=E

;; Phenotype: ([('ADVAN', 1), ('CL~AGE', 1), ('CL~LBM', 1), ('CL~SEX', 0), ('V1~AGE', 1), ('V1~LBM', 0), ('V1~SEX', 1), ('V2~AGE', 0), ('V2~LBM', 1), ('V2~SEX', 1), ('Q2~AGE', 1), ('Q2~LBM', 1), ('Q2~SEX', 0), ('Q3~AGE', 1), ('Q3~LBM', 1), ('Q3~SEX', 1), ('V3~AGE', 1), ('V3~LBM', 1), ('V3~SEX', 1), ('V3_OMEGA', 1), ('RESERR', 0)])
;; Genotype: [1, 1, 1, 0, 1, 1, 1, 0, 1, 1, 0, 1, 0, 0, 1, 1, 1, 1, 1, 0, 1, 1, 1, 1, 1, 1, 1, 0]
;; Num non-influential tokens: 7

NM-TRAN MESSAGES
 WARNINGS AND ERRORS (IF ANY) FOR PROBLEM    1
 (WARNING  2) NM-TRAN INFERS THAT THE DATA ARE POPULATION.

1NONLINEAR MIXED EFFECTS MODEL PROGRAM (NONMEM) VERSION 7.4.3
 ORIGINALLY DEVELOPED BY STUART BEAL, LEWIS SHEINER, AND ALISON BOECKMANN
 CURRENT DEVELOPERS ARE ROBERT BAUER, ICON DEVELOPMENT SOLUTIONS,
 AND ALISON BOECKMANN. IMPLEMENTATION, EFFICIENCY, AND STANDARDIZATION
 PERFORMED BY NOUS INFOSYSTEMS.
 PROBLEM NO.:         1
 single pyDarwin individual, one among multitude
 TOT. NO. OF OBS RECS:     1992
 TOT. NO. OF INDIVIDUALS:       65
 THREE COMPARTMENT MODEL (ADVAN11)
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 #TBLN:      1
 #METH: First Order Conditional Estimation with Interaction
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
 #TERM:
0MINIMIZATION TERMINATED
 DUE TO ROUNDING ERRORS (ERROR=134)
 NO. OF FUNCTION EVALUATIONS USED:     4710
 NO. OF SIG. DIGITS IN FINAL EST.:  0.2
 ADDITIONAL PROBLEMS OCCURRED WITH THE MINIMIZATION.
 REGARD THE RESULTS OF THE ESTIMATION STEP CAREFULLY, AND ACCEPT THEM ONLY
 AFTER CHECKING THAT THE COVARIANCE STEP PRODUCES REASONABLE OUTPUT.

 ETABAR IS THE ARITHMETIC MEAN OF THE ETA-ESTIMATES,
 AND THE P-VALUE IS GIVEN FOR THE NULL HYPOTHESIS THAT THE TRUE MEAN IS 0.

 ETABAR:         1.7224E-02 -4.9090E-03 -2.2123E-02  7.9617E-02  9.7370E-02  6.3895E-02
 SE:             1.7863E-02  2.9127E-02  4.3574E-02  6.4193E-02  1.0193E-01  4.8474E-02
 N:                      65          65          65          65          65          65

 P VAL.:         3.3495E-01  8.6616E-01  6.1166E-01  2.1487E-01  3.3942E-01  1.8746E-01

 ETASHRINKSD(%)  3.3077E+00  1.5142E+01  1.2901E+00  7.1970E+00  1.0370E+01  3.4507E+01
 ETASHRINKVR(%)  6.5060E+00  2.7991E+01  2.5635E+00  1.3876E+01  1.9664E+01  5.7107E+01
 EBVSHRINKSD(%)  1.6665E+00  1.4991E+01  3.9208E+00  3.6726E+00  7.7503E+00  3.2200E+01
 EBVSHRINKVR(%)  3.3053E+00  2.7734E+01  7.6880E+00  7.2104E+00  1.4900E+01  5.4032E+01
 EPSSHRINKSD(%)  8.0910E+00
 EPSSHRINKVR(%)  1.5527E+01


 TOTAL DATA POINTS NORMALLY DISTRIBUTED (N):         1992
 N*LOG(2PI) CONSTANT TO OBJECTIVE FUNCTION:    3661.0511162874159
 OBJECTIVE FUNCTION VALUE WITHOUT CONSTANT:    3373.5826993529240
 OBJECTIVE FUNCTION VALUE WITH CONSTANT:       7034.6338156403399
 REPORTED OBJECTIVE FUNCTION DOES NOT CONTAIN CONSTANT

 TOTAL EFFECTIVE ETAS (NIND*NETA):                           390


 #TERE:
 Elapsed estimation  time in seconds:  1406.08
 Elapsed covariance  time in seconds:   381.73
 Elapsed postprocess time in seconds:     0.50

 ********************               FIRST ORDER CONDITIONAL ESTIMATION WITH INTERACTION              ********************
 #OBJT:**************                       MINIMUM VALUE OF OBJECTIVE FUNCTION                      ********************
 #OBJV:********************************************     3373.583       **************************************************

 ********************               FIRST ORDER CONDITIONAL ESTIMATION WITH INTERACTION              ********************
 ********************                             FINAL PARAMETER ESTIMATE                           ********************

 THETA - VECTOR OF FIXED EFFECTS PARAMETERS   *********
         TH 1      TH 2      TH 3      TH 4      TH 5      TH 6      TH 7      TH 8      TH 9      TH10      TH11      TH12
          TH13      TH14      TH15      TH16      TH17      TH18      TH19      TH20
         2.88E+00 -4.00E-03  4.84E-01  4.44E-01  4.34E+00 -2.48E-03  2.78E-01  7.40E+00  4.74E-01  1.54E+00  4.02E-04  6.71E-01
         -3.79E-01  3.85E-02  2.42E-02  2.00E+00  1.76E-01  3.84E+00 -4.09E-03  1.10E+00

 OMEGA - COV MATRIX FOR RANDOM EFFECTS - ETAS  ********
         ETA1      ETA2      ETA3      ETA4      ETA5      ETA6
 ETA1
+        2.25E-02
 ETA2
+        0.00E+00  7.78E-02
 ETA3
+        0.00E+00  0.00E+00  1.29E-01
 ETA4
+        0.00E+00  0.00E+00  0.00E+00  3.16E-01
 ETA5
+        0.00E+00  0.00E+00  0.00E+00  0.00E+00  8.54E-01
 ETA6
+        0.00E+00  0.00E+00  0.00E+00  0.00E+00  0.00E+00  3.62E-01

 SIGMA - COV MATRIX FOR RANDOM EFFECTS - EPSILONS  ****
         EPS1
 EPS1
+        1.24E-02

 OMEGA - CORR MATRIX FOR RANDOM EFFECTS - ETAS  *******
         ETA1      ETA2      ETA3      ETA4      ETA5      ETA6
 ETA1
+        1.50E-01
 ETA2
+        0.00E+00  2.79E-01
 ETA3
+        0.00E+00  0.00E+00  3.59E-01
 ETA4
+        0.00E+00  0.00E+00  0.00E+00  5.62E-01
 ETA5
+        0.00E+00  0.00E+00  0.00E+00  0.00E+00  9.24E-01
 ETA6
+        0.00E+00  0.00E+00  0.00E+00  0.00E+00  0.00E+00  6.01E-01

 SIGMA - CORR MATRIX FOR RANDOM EFFECTS - EPSILONS  ***
         EPS1
 EPS1
+        1.11E-01

 ********************               FIRST ORDER CONDITIONAL ESTIMATION WITH INTERACTION              ********************
 ********************                            STANDARD ERROR OF ESTIMATE                          ********************

 THETA - VECTOR OF FIXED EFFECTS PARAMETERS   *********
         TH 1      TH 2      TH 3      TH 4      TH 5      TH 6      TH 7      TH 8      TH 9      TH10      TH11      TH12
          TH13      TH14      TH15      TH16      TH17      TH18      TH19      TH20
         3.72E+03  5.03E+02  2.92E+03  8.27E+04  5.24E+05  1.10E+03  8.75E+03  4.33E+03  2.91E+03  2.37E+04  5.71E+02  9.19E+04
          3.31E+05  2.33E+04  8.83E+02  5.81E+03  3.47E+05  1.52E+06  2.07E+03  1.61E+05

 OMEGA - COV MATRIX FOR RANDOM EFFECTS - ETAS  ********
         ETA1      ETA2      ETA3      ETA4      ETA5      ETA6
 ETA1
+        2.87E+01
 ETA2
+       .........  8.55E+01
 ETA3
+       ......... .........  1.25E+02
 ETA4
+       ......... ......... .........  1.05E+02
 ETA5
+       ......... ......... ......... .........  5.07E+00
 ETA6
+       ......... ......... ......... ......... .........  4.42E+00

 SIGMA - COV MATRIX FOR RANDOM EFFECTS - EPSILONS  ****
         EPS1
 EPS1
+        1.09E-01

 OMEGA - CORR MATRIX FOR RANDOM EFFECTS - ETAS  *******
         ETA1      ETA2      ETA3      ETA4      ETA5      ETA6
 ETA1
+        9.55E+01
 ETA2
+       .........  1.53E+02
 ETA3
+       ......... .........  1.74E+02
 ETA4
+       ......... ......... .........  9.30E+01
 ETA5
+       ......... ......... ......... .........  2.74E+00
 ETA6
+       ......... ......... ......... ......... .........  3.68E+00

 SIGMA - CORR MATRIX FOR RANDOM EFFECTS - EPSILONS  ***
         EPS1
 EPS1
+        4.91E-01
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
 ********************               FIRST ORDER CONDITIONAL ESTIMATION WITH INTERACTION              ********************
 ********************                      EIGENVALUES OF COR MATRIX OF ESTIMATE                     ********************

             1         2         3         4         5         6         7         8         9        10        11        12
             13        14        15        16        17        18        19        20        21        22        23        24
            25        26        27
        -2.61E-17  4.18E-17  8.40E-17  1.45E-16 -1.50E-16  2.19E-16 -2.41E-16  3.63E-16 -4.43E-16  1.35E-15  2.11E-15  3.85E-15
          5.47E-15  2.24E-14  3.72E-14  5.00E-14  7.50E-14  9.08E-14  1.33E-13  2.69E-13  1.01E-12  1.24E-12  1.36E-12  2.51E-12
         2.21E-11  1.09E-10  2.70E+01
 Elapsed finaloutput time in seconds:     0.27
 #CPUT: Total CPU Time in Seconds,     1788.672
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