28.07.2025
14:10
$SIZES PD=-1000 LVR=-150 LTH=-200
$PROBLEM single pyDarwin individual, one among multitude
$INPUT ID TIME AMT RATE DV DROP MDV AGE SEX LBM DROP CMT EVID
$DATA "D:\Users\selzer\Repos\GH\pyDarwinXploR\RemiR/data.csv" IGNORE=@
$SUBROUTINE ADVAN3 TRANS4
$PK

  TVCLSEX = 0
  IF(SEX == 1) THEN
  TVCLSEX = THETA(1)
  ENDIF
  CL = THETA(2) *(1 + THETA(3) * (AGE)) *(LBM/50)**(THETA(4)) *(1 + TVCLSEX) ; CL

  TVQSEX = 0
  IF(SEX == 1) THEN
  TVQSEX = THETA(5)
  ENDIF
  Q = THETA(6)   *(1 + TVQSEX) ; Q

  TVV1SEX = 0
  IF(SEX == 1) THEN
  TVV1SEX = THETA(7)
  ENDIF
  V1 = THETA(8)   *(1 + TVV1SEX)
  SC = V1 ; V1

  TVV2SEX = 0
  IF(SEX == 1) THEN
  TVV2SEX = THETA(9)
  ENDIF
  V2 = THETA(10)  *(LBM/50)**(THETA(11)) *(1 + TVV2SEX) ; V2
  ; Q2 is not used ; Q2
  ; Q3 is not used ; Q3
  ; V3 is not used ; V3
$ERROR
  IPRED = F
  Y = F *(1+EPS(1))+EPS(2)
$SIGMA
  ;proportional error
  0.2	; EPS(1)
  ;additive error
  1	; EPS(2)
$THETA

  (1.1);CL~SEX1
  (0, 2) ; CL
  (1); CL~AGE
  (1); CL~LBM

  (1);Q~SEX1
  (0, 1) ; Q

  (1);V1~SEX1
  (0, 7) ; V1

  (1);V2~SEX1
  (0, 9) ; V2

  (1); V2~LBM
  ; Q2 is not used
  ; Q3 is not used
  ; V3 is not used
; empty $OMEGA

  ; Q2 is not used
  ; Q3 is not used
  ; V3 is not used
$EST METHOD = COND INTER NOABORT MAX = 999999
$TABLE ID TIME AMT DV PRED IPRED WRES CWRES FILE=results.tab NOPRINT NOAPPEND ONEHEADER
$COV UNCOND PRINT=E

;; Phenotype: ([('ADVAN', 0), ('CL~AGE', 1), ('CL~LBM', 1), ('CL~SEX', 1), ('CL_OMEGA', 0), ('Q~AGE', 0), ('Q~LBM', 0), ('Q~SEX', 1), ('Q_OMEGA', 0), ('V1~AGE', 0), ('V1~LBM', 0), ('V1~SEX', 1), ('V1_OMEGA', 0), ('V2~AGE', 0), ('V2~LBM', 1), ('V2~SEX', 1), ('V2_OMEGA', 0), ('RESERR', 1)])
;; Genotype: [0, 1, 1, 1, 0, 0, 0, 1, 0, 0, 0, 1, 0, 0, 1, 1, 0, 0, 0, 0, 1, 0, 0, 1, 0, 0, 1, 1]
;; Num non-influential tokens: 10

NM-TRAN MESSAGES
 WARNINGS AND ERRORS (IF ANY) FOR PROBLEM    1
 (WARNING  132) SIGMA IS INTEPRETED AS RESIDUAL VARIANCE TO SINGLE SUBJECT ANALYSIS
 (WARNING  1) NM-TRAN INFERS THAT THE DATA ARE SINGLE-SUBJECT.
  NONMEM RUN CANNOT BE PARALLELIZED.
 AN ERROR WAS FOUND IN THE CONTROL STATEMENTS.
  350  $ESTIM: "METHOD=CONDITIONAL" INVALID WITH SINGLE-SUBJECT DATA.
OFV = 99999999
success = False
covariance = False
correlation = False
Condition # = 99999999
Num Non fixed THETAs = 0
Num Non fixed OMEGAs = 0
Num Non fixed SIGMAs = 0
Original run directory = D:\Users\selzer\Repos\GH\pyDarwinXploR\RemiR\temp\02\026
