28.07.2025
14:10
$SIZES PD=-1000 LVR=-150 LTH=-200
$PROBLEM single pyDarwin individual, one among multitude
$INPUT ID TIME AMT RATE DV DROP MDV AGE SEX LBM DROP CMT EVID
$DATA "D:\Users\selzer\Repos\GH\pyDarwinXploR\RemiR/data.csv" IGNORE=@
$SUBROUTINE ADVAN3 TRANS4
$PK

  CL = THETA(1)    ; CL

  Q = THETA(2)  *(LBM/50)**(THETA(3))  * EXP(ETA(1)) ; Q

  TVV1SEX = 0
  IF(SEX == 1) THEN
  TVV1SEX = THETA(4)
  ENDIF
  V1 = THETA(5)   *(1 + TVV1SEX) * EXP(ETA(2))
  SC = V1 ; V1

  V2 = THETA(6) *(1 + THETA(7) * (AGE)) *(LBM/50)**(THETA(8))  * EXP(ETA(3)) ; V2
  ; Q2 is not used ; Q2
  ; Q3 is not used ; Q3
  ; V3 is not used ; V3
$ERROR
  IPRED = F
  Y = F *(1+EPS(1))
$SIGMA
  ;proportional error
  0.1	; EPS(1)
$THETA

  (0, 2) ; CL

  (0, 1) ; Q

  (1); Q~LBM

  (1);V1~SEX1
  (0, 7) ; V1

  (0, 9) ; V2
  (1); V2~AGE
  (1); V2~LBM
  ; Q2 is not used
  ; Q3 is not used
  ; V3 is not used
$OMEGA

  0.3  ; Q
  0.3  ; V1
  0.3  ; V2
  ; Q2 is not used
  ; Q3 is not used
  ; V3 is not used
$EST METHOD = COND INTER NOABORT MAX = 999999
$TABLE ID TIME AMT DV PRED IPRED WRES CWRES FILE=results.tab NOPRINT NOAPPEND ONEHEADER
$COV UNCOND PRINT=E

;; Phenotype: ([('ADVAN', 0), ('CL~AGE', 0), ('CL~LBM', 0), ('CL~SEX', 0), ('CL_OMEGA', 0), ('Q~AGE', 0), ('Q~LBM', 1), ('Q~SEX', 0), ('Q_OMEGA', 1), ('V1~AGE', 0), ('V1~LBM', 0), ('V1~SEX', 1), ('V1_OMEGA', 1), ('V2~AGE', 1), ('V2~LBM', 1), ('V2~SEX', 0), ('V2_OMEGA', 1), ('RESERR', 0)])
;; Genotype: [0, 0, 0, 0, 0, 0, 1, 0, 1, 0, 0, 1, 1, 1, 1, 0, 1, 1, 0, 1, 1, 1, 0, 0, 1, 1, 1, 0]
;; Num non-influential tokens: 10

NM-TRAN MESSAGES
 WARNINGS AND ERRORS (IF ANY) FOR PROBLEM    1
 (WARNING  2) NM-TRAN INFERS THAT THE DATA ARE POPULATION.

1NONLINEAR MIXED EFFECTS MODEL PROGRAM (NONMEM) VERSION 7.4.3
 ORIGINALLY DEVELOPED BY STUART BEAL, LEWIS SHEINER, AND ALISON BOECKMANN
 CURRENT DEVELOPERS ARE ROBERT BAUER, ICON DEVELOPMENT SOLUTIONS,
 AND ALISON BOECKMANN. IMPLEMENTATION, EFFICIENCY, AND STANDARDIZATION
 PERFORMED BY NOUS INFOSYSTEMS.
 PROBLEM NO.:         1
 single pyDarwin individual, one among multitude
 TOT. NO. OF OBS RECS:     1992
 TOT. NO. OF INDIVIDUALS:       65
 TWO COMPARTMENT MODEL (ADVAN3)
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 #TBLN:      1
 #METH: First Order Conditional Estimation with Interaction
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
 #TERM:
0MINIMIZATION SUCCESSFUL
 HOWEVER, PROBLEMS OCCURRED WITH THE MINIMIZATION.
 REGARD THE RESULTS OF THE ESTIMATION STEP CAREFULLY, AND ACCEPT THEM ONLY
 AFTER CHECKING THAT THE COVARIANCE STEP PRODUCES REASONABLE OUTPUT.
 NO. OF FUNCTION EVALUATIONS USED:      867
 NO. OF SIG. DIGITS IN FINAL EST.:  3.1

 ETABAR IS THE ARITHMETIC MEAN OF THE ETA-ESTIMATES,
 AND THE P-VALUE IS GIVEN FOR THE NULL HYPOTHESIS THAT THE TRUE MEAN IS 0.

 ETABAR:        -6.7709E-02  7.7478E-02  1.8289E+00
 SE:             4.8025E-02  3.8351E-02  2.1163E-01
 N:                      65          65          65

 P VAL.:         1.5858E-01  4.3360E-02  5.5889E-18

 ETASHRINKSD(%)  1.6336E+01  1.4268E+01  3.5762E+01
 ETASHRINKVR(%)  3.0003E+01  2.6501E+01  5.8735E+01
 EBVSHRINKSD(%)  8.9838E+00  6.4969E+00  1.0989E-01
 EBVSHRINKVR(%)  1.7161E+01  1.2572E+01  2.1966E-01
 EPSSHRINKSD(%)  4.7237E+00
 EPSSHRINKVR(%)  9.2243E+00


 TOTAL DATA POINTS NORMALLY DISTRIBUTED (N):         1992
 N*LOG(2PI) CONSTANT TO OBJECTIVE FUNCTION:    3661.0511162874159
 OBJECTIVE FUNCTION VALUE WITHOUT CONSTANT:    6613.6661962073304
 OBJECTIVE FUNCTION VALUE WITH CONSTANT:       10274.717312494746
 REPORTED OBJECTIVE FUNCTION DOES NOT CONTAIN CONSTANT

 TOTAL EFFECTIVE ETAS (NIND*NETA):                           195


 #TERE:
 Elapsed estimation  time in seconds:    74.50

0PRED EXIT CODE = 1
0INDIVIDUAL NO.       3   ID= 3.00000000000000E+00   (WITHIN-INDIVIDUAL) DATA REC NO.   2
 THETA=
  2.50E+00   9.52E-01  -4.27E-01   8.82E-02   6.43E+00   7.09E-01  -1.01E-05   8.33E+00
 ETA=
  2.09E+01   6.75E+00  -1.69E+01
 OCCURS DURING SEARCH FOR ETA AT A NONZERO VALUE OF ETA
 A ROOT OF THE CHARACTERISTIC EQUATION IS ZERO BECAUSE
 K*K21 IS MUCH SMALLER THAN  (K+K12+K21)**2.
 PERHAPS K OR K21 IS VERY SMALL, OR K12 IS VERY LARGE.
0PROGRAM TERMINATED BY OBJ
 Elapsed covariance  time in seconds:     7.64
 MESSAGE ISSUED FROM COVARIANCE STEP

 ********************               FIRST ORDER CONDITIONAL ESTIMATION WITH INTERACTION              ********************
 #OBJT:**************                       MINIMUM VALUE OF OBJECTIVE FUNCTION                      ********************
 #OBJV:********************************************     6613.666       **************************************************

 ********************               FIRST ORDER CONDITIONAL ESTIMATION WITH INTERACTION              ********************
 ********************                             FINAL PARAMETER ESTIMATE                           ********************

 THETA - VECTOR OF FIXED EFFECTS PARAMETERS   *********
         TH 1      TH 2      TH 3      TH 4      TH 5      TH 6      TH 7      TH 8
         2.50E+00  9.52E-01 -4.27E-01  8.72E-02  6.43E+00  7.09E-01 -1.01E-05  8.33E+00

 OMEGA - COV MATRIX FOR RANDOM EFFECTS - ETAS  ********
         ETA1      ETA2      ETA3
 ETA1
+        2.18E-01
 ETA2
+        0.00E+00  1.32E-01
 ETA3
+        0.00E+00  0.00E+00  7.16E+00

 SIGMA - COV MATRIX FOR RANDOM EFFECTS - EPSILONS  ****
         EPS1
 EPS1
+        7.41E-02

 OMEGA - CORR MATRIX FOR RANDOM EFFECTS - ETAS  *******
         ETA1      ETA2      ETA3
 ETA1
+        4.66E-01
 ETA2
+        0.00E+00  3.63E-01
 ETA3
+        0.00E+00  0.00E+00  2.68E+00

 SIGMA - CORR MATRIX FOR RANDOM EFFECTS - EPSILONS  ***
         EPS1
 EPS1
+        2.72E-01
 #CPUT: Total CPU Time in Seconds,       82.422
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