28.07.2025
14:10
$SIZES PD=-1000 LVR=-150 LTH=-200
$PROBLEM single pyDarwin individual, one among multitude
$INPUT ID TIME AMT RATE DV DROP MDV AGE SEX LBM DROP CMT EVID
$DATA "D:\Users\selzer\Repos\GH\pyDarwinXploR\RemiR/data.csv" IGNORE=@
$SUBROUTINE ADVAN3 TRANS4
$PK

  TVCLSEX = 0
  IF(SEX == 1) THEN
  TVCLSEX = THETA(1)
  ENDIF
  CL = THETA(2) *(1 + THETA(3) * (AGE)) *(LBM/50)**(THETA(4)) *(1 + TVCLSEX) * EXP(ETA(1)) ; CL

  TVQSEX = 0
  IF(SEX == 1) THEN
  TVQSEX = THETA(5)
  ENDIF
  Q = THETA(6)   *(1 + TVQSEX) * EXP(ETA(2)) ; Q

  TVV1SEX = 0
  IF(SEX == 1) THEN
  TVV1SEX = THETA(7)
  ENDIF
  V1 = THETA(8)   *(1 + TVV1SEX) * EXP(ETA(3))
  SC = V1 ; V1

  V2 = THETA(9)    ; V2
  ; Q2 is not used ; Q2
  ; Q3 is not used ; Q3
  ; V3 is not used ; V3
$ERROR
  IPRED = F
  Y = F *(1+EPS(1))
$SIGMA
  ;proportional error
  0.1	; EPS(1)
$THETA

  (1.1);CL~SEX1
  (0, 2) ; CL
  (1); CL~AGE
  (1); CL~LBM

  (1);Q~SEX1
  (0, 1) ; Q

  (1);V1~SEX1
  (0, 7) ; V1

  (0, 9) ; V2

  ; Q2 is not used
  ; Q3 is not used
  ; V3 is not used
$OMEGA
  0.03  ; CL
  0.3  ; Q
  0.3  ; V1

  ; Q2 is not used
  ; Q3 is not used
  ; V3 is not used
$EST METHOD = COND INTER NOABORT MAX = 999999
$TABLE ID TIME AMT DV PRED IPRED WRES CWRES FILE=results.tab NOPRINT NOAPPEND ONEHEADER
$COV UNCOND PRINT=E

;; Phenotype: ([('ADVAN', 0), ('CL~AGE', 1), ('CL~LBM', 1), ('CL~SEX', 1), ('CL_OMEGA', 1), ('Q~AGE', 0), ('Q~LBM', 0), ('Q~SEX', 1), ('Q_OMEGA', 1), ('V1~AGE', 0), ('V1~LBM', 0), ('V1~SEX', 1), ('V1_OMEGA', 1), ('V2~AGE', 0), ('V2~LBM', 0), ('V2~SEX', 0), ('V2_OMEGA', 0), ('RESERR', 0)])
;; Genotype: [0, 1, 1, 1, 1, 0, 0, 1, 1, 0, 0, 1, 1, 0, 0, 0, 0, 0, 0, 0, 1, 0, 1, 1, 1, 1, 1, 0]
;; Num non-influential tokens: 10

NM-TRAN MESSAGES
 WARNINGS AND ERRORS (IF ANY) FOR PROBLEM    1
 (WARNING  2) NM-TRAN INFERS THAT THE DATA ARE POPULATION.

1NONLINEAR MIXED EFFECTS MODEL PROGRAM (NONMEM) VERSION 7.4.3
 ORIGINALLY DEVELOPED BY STUART BEAL, LEWIS SHEINER, AND ALISON BOECKMANN
 CURRENT DEVELOPERS ARE ROBERT BAUER, ICON DEVELOPMENT SOLUTIONS,
 AND ALISON BOECKMANN. IMPLEMENTATION, EFFICIENCY, AND STANDARDIZATION
 PERFORMED BY NOUS INFOSYSTEMS.
 PROBLEM NO.:         1
 single pyDarwin individual, one among multitude
 TOT. NO. OF OBS RECS:     1992
 TOT. NO. OF INDIVIDUALS:       65
 TWO COMPARTMENT MODEL (ADVAN3)
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 #TBLN:      1
 #METH: First Order Conditional Estimation with Interaction
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
 #TERM:
0MINIMIZATION TERMINATED
 DUE TO ROUNDING ERRORS (ERROR=134)
 NO. OF FUNCTION EVALUATIONS USED:     4002
 NO. OF SIG. DIGITS IN FINAL EST.:  2.4
 ADDITIONAL PROBLEMS OCCURRED WITH THE MINIMIZATION.
 REGARD THE RESULTS OF THE ESTIMATION STEP CAREFULLY, AND ACCEPT THEM ONLY
 AFTER CHECKING THAT THE COVARIANCE STEP PRODUCES REASONABLE OUTPUT.

 ETABAR IS THE ARITHMETIC MEAN OF THE ETA-ESTIMATES,
 AND THE P-VALUE IS GIVEN FOR THE NULL HYPOTHESIS THAT THE TRUE MEAN IS 0.

 ETABAR:         5.3865E-04 -1.5079E-03  1.4799E-03
 SE:             1.4417E-02  5.5397E-02  5.0770E-02
 N:                      65          65          65

 P VAL.:         9.7020E-01  9.7828E-01  9.7675E-01

 ETASHRINKSD(%)  4.2217E+00  1.4446E+00  6.2817E+00
 ETASHRINKVR(%)  8.2651E+00  2.8682E+00  1.2169E+01
 EBVSHRINKSD(%)  4.8863E+00  1.9202E+00  6.3209E+00
 EBVSHRINKVR(%)  9.5338E+00  3.8034E+00  1.2242E+01
 EPSSHRINKSD(%)  4.0245E+00
 EPSSHRINKVR(%)  7.8870E+00


 TOTAL DATA POINTS NORMALLY DISTRIBUTED (N):         1992
 N*LOG(2PI) CONSTANT TO OBJECTIVE FUNCTION:    3661.0511162874159
 OBJECTIVE FUNCTION VALUE WITHOUT CONSTANT:    5668.0171806446615
 OBJECTIVE FUNCTION VALUE WITH CONSTANT:       9329.0682969320769
 REPORTED OBJECTIVE FUNCTION DOES NOT CONTAIN CONSTANT

 TOTAL EFFECTIVE ETAS (NIND*NETA):                           195


 #TERE:
 Elapsed estimation  time in seconds:   228.46
 Elapsed covariance  time in seconds:    25.21
 Elapsed postprocess time in seconds:     0.20

 ********************               FIRST ORDER CONDITIONAL ESTIMATION WITH INTERACTION              ********************
 #OBJT:**************                       MINIMUM VALUE OF OBJECTIVE FUNCTION                      ********************
 #OBJV:********************************************     5668.017       **************************************************

 ********************               FIRST ORDER CONDITIONAL ESTIMATION WITH INTERACTION              ********************
 ********************                             FINAL PARAMETER ESTIMATE                           ********************

 THETA - VECTOR OF FIXED EFFECTS PARAMETERS   *********
         TH 1      TH 2      TH 3      TH 4      TH 5      TH 6      TH 7      TH 8      TH 9
        -1.37E-01  3.17E+00 -3.43E-03  5.93E-01 -3.71E-01  1.28E+00  6.24E-01  5.53E+00  8.84E+00

 OMEGA - COV MATRIX FOR RANDOM EFFECTS - ETAS  ********
         ETA1      ETA2      ETA3
 ETA1
+        1.50E-02
 ETA2
+        0.00E+00  2.09E-01
 ETA3
+        0.00E+00  0.00E+00  1.94E-01

 SIGMA - COV MATRIX FOR RANDOM EFFECTS - EPSILONS  ****
         EPS1
 EPS1
+        5.14E-02

 OMEGA - CORR MATRIX FOR RANDOM EFFECTS - ETAS  *******
         ETA1      ETA2      ETA3
 ETA1
+        1.22E-01
 ETA2
+        0.00E+00  4.57E-01
 ETA3
+        0.00E+00  0.00E+00  4.40E-01

 SIGMA - CORR MATRIX FOR RANDOM EFFECTS - EPSILONS  ***
         EPS1
 EPS1
+        2.27E-01

 ********************               FIRST ORDER CONDITIONAL ESTIMATION WITH INTERACTION              ********************
 ********************                            STANDARD ERROR OF ESTIMATE                          ********************

 THETA - VECTOR OF FIXED EFFECTS PARAMETERS   *********
         TH 1      TH 2      TH 3      TH 4      TH 5      TH 6      TH 7      TH 8      TH 9
         3.80E-02  1.41E-01  5.48E-04  1.21E-01  7.14E-02  1.54E-01  2.14E-01  6.08E-01  5.27E-01

 OMEGA - COV MATRIX FOR RANDOM EFFECTS - ETAS  ********
         ETA1      ETA2      ETA3
 ETA1
+        3.39E-03
 ETA2
+       .........  4.58E-02
 ETA3
+       ......... .........  4.02E-02

 SIGMA - COV MATRIX FOR RANDOM EFFECTS - EPSILONS  ****
         EPS1
 EPS1
+        4.92E-03

 OMEGA - CORR MATRIX FOR RANDOM EFFECTS - ETAS  *******
         ETA1      ETA2      ETA3
 ETA1
+        1.39E-02
 ETA2
+       .........  5.01E-02
 ETA3
+       ......... .........  4.57E-02

 SIGMA - CORR MATRIX FOR RANDOM EFFECTS - EPSILONS  ***
         EPS1
 EPS1
+        1.08E-02

 ********************               FIRST ORDER CONDITIONAL ESTIMATION WITH INTERACTION              ********************
 ********************                          COVARIANCE MATRIX OF ESTIMATE                         ********************

            TH 1      TH 2      TH 3      TH 4      TH 5      TH 6      TH 7      TH 8      TH 9      OM11      OM12      OM13
             OM22      OM23      OM33      SG11
 TH 1
+        1.44E-03
 TH 2
+       -2.56E-03  2.00E-02
 TH 3
+        7.75E-07 -5.64E-05  3.00E-07
 TH 4
+       -2.86E-03 -1.35E-03  1.03E-05  1.47E-02
 TH 5
+        4.98E-05  1.76E-03 -5.20E-06 -1.35E-03  5.09E-03
 TH 6
+        9.01E-04 -2.50E-03  1.10E-05  1.93E-03 -7.12E-03  2.37E-02
 TH 7
+        1.09E-03 -1.21E-02  2.65E-05  8.87E-03 -1.08E-02  1.74E-02  4.58E-02
 TH 8
+       -4.31E-03  4.17E-02 -6.81E-05 -2.71E-02  2.24E-02 -5.51E-02 -1.10E-01  3.70E-01
 TH 9
+        1.80E-03  1.10E-03  6.94E-05 -2.83E-03 -1.32E-02  6.50E-02  2.61E-02 -6.71E-02  2.78E-01
 OM11
+       -1.73E-05  2.12E-04 -1.26E-06  5.26E-05 -5.07E-05  4.71E-05  8.68E-05 -2.52E-04 -2.41E-04  1.15E-05
 OM12
+       ......... ......... ......... ......... ......... ......... ......... ......... ......... ......... .........
 OM13
+       ......... ......... ......... ......... ......... ......... ......... ......... ......... ......... ......... .........
 OM22
+       -2.12E-04  5.23E-05  1.14E-06  5.12E-04 -1.36E-03  1.37E-03  1.92E-03 -1.12E-03  7.72E-03  2.96E-05 ......... .........
          2.09E-03
 OM23
+       ......... ......... ......... ......... ......... ......... ......... ......... ......... ......... ......... .........
         ......... .........
 OM33
+       -1.26E-04  2.15E-03 -1.11E-05  2.30E-07 -3.18E-04  1.21E-03 -4.20E-04 -1.83E-03  3.81E-03  8.73E-05 ......... .........
          8.27E-04 .........  1.62E-03
 SG11
+       -3.19E-05  3.48E-05  3.14E-07  5.04E-05 -1.66E-04  9.10E-05  2.89E-04  4.85E-05  6.52E-04  1.21E-06 ......... .........
          1.38E-04 .........  3.45E-05  2.42E-05

 ********************               FIRST ORDER CONDITIONAL ESTIMATION WITH INTERACTION              ********************
 ********************                          CORRELATION MATRIX OF ESTIMATE                        ********************

            TH 1      TH 2      TH 3      TH 4      TH 5      TH 6      TH 7      TH 8      TH 9      OM11      OM12      OM13
             OM22      OM23      OM33      SG11
 TH 1
+        3.80E-02
 TH 2
+       -4.76E-01  1.41E-01
 TH 3
+        3.72E-02 -7.30E-01  5.48E-04
 TH 4
+       -6.20E-01 -7.88E-02  1.55E-01  1.21E-01
 TH 5
+        1.84E-02  1.75E-01 -1.33E-01 -1.56E-01  7.14E-02
 TH 6
+        1.54E-01 -1.15E-01  1.31E-01  1.03E-01 -6.48E-01  1.54E-01
 TH 7
+        1.34E-01 -4.02E-01  2.26E-01  3.41E-01 -7.10E-01  5.29E-01  2.14E-01
 TH 8
+       -1.87E-01  4.85E-01 -2.04E-01 -3.67E-01  5.15E-01 -5.89E-01 -8.45E-01  6.08E-01
 TH 9
+        8.97E-02  1.48E-02  2.40E-01 -4.42E-02 -3.50E-01  8.02E-01  2.31E-01 -2.09E-01  5.27E-01
 OM11
+       -1.35E-01  4.42E-01 -6.77E-01  1.28E-01 -2.09E-01  9.03E-02  1.20E-01 -1.22E-01 -1.35E-01  3.39E-03
 OM12
+       ......... ......... ......... ......... ......... ......... ......... ......... ......... ......... .........
 OM13
+       ......... ......... ......... ......... ......... ......... ......... ......... ......... ......... ......... .........
 OM22
+       -1.22E-01  8.09E-03  4.56E-02  9.23E-02 -4.15E-01  1.94E-01  1.96E-01 -4.03E-02  3.20E-01  1.90E-01 ......... .........
          4.58E-02
 OM23
+       ......... ......... ......... ......... ......... ......... ......... ......... ......... ......... ......... .........
         ......... .........
 OM33
+       -8.23E-02  3.79E-01 -5.03E-01  4.71E-05 -1.11E-01  1.96E-01 -4.88E-02 -7.49E-02  1.80E-01  6.40E-01 ......... .........
          4.49E-01 .........  4.02E-02
 SG11
+       -1.71E-01  5.01E-02  1.17E-01  8.45E-02 -4.74E-01  1.20E-01  2.75E-01  1.62E-02  2.51E-01  7.25E-02 ......... .........
          6.11E-01 .........  1.75E-01  4.92E-03
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
 ********************               FIRST ORDER CONDITIONAL ESTIMATION WITH INTERACTION              ********************
 ********************                      EIGENVALUES OF COR MATRIX OF ESTIMATE                     ********************

             1         2         3         4         5         6         7         8         9        10        11        12
             13
         1.67E-02  3.51E-02  8.28E-02  1.64E-01  2.31E-01  2.65E-01  3.31E-01  7.23E-01  1.13E+00  1.61E+00  1.71E+00  2.91E+00
          3.79E+00
 Elapsed finaloutput time in seconds:     0.24
 #CPUT: Total CPU Time in Seconds,      254.297
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