28.07.2025
16:10
$SIZES PD=-1000 LVR=-150 LTH=-200
$PROBLEM single pyDarwin individual, one among multitude
$INPUT ID TIME AMT RATE DV DROP MDV AGE SEX LBM DROP CMT EVID
$DATA "D:\Users\selzer\Repos\GH\pyDarwinXploR\RemiR/data.csv" IGNORE=@
$SUBROUTINE ADVAN3 TRANS4
$PK

  TVCLSEX = 0
  IF(SEX == 1) THEN
  TVCLSEX = THETA(1)
  ENDIF
  CL = THETA(2)  *(LBM/50)**(THETA(3)) *(1 + TVCLSEX) ; CL

  Q = THETA(4) *(1 + THETA(5) * (AGE))   * EXP(ETA(1)) ; Q

  V1 = THETA(6)  *(LBM/50)**(THETA(7))
  SC = V1 ; V1

  TVV2SEX = 0
  IF(SEX == 1) THEN
  TVV2SEX = THETA(8)
  ENDIF
  V2 = THETA(9)  *(LBM/50)**(THETA(10)) *(1 + TVV2SEX) * EXP(ETA(2)) ; V2
  ; Q2 is not used ; Q2
  ; Q3 is not used ; Q3
  ; V3 is not used ; V3
$ERROR
  IPRED = F
  Y = F *(1+EPS(1))+EPS(2)
$SIGMA
  ;proportional error
  0.2	; EPS(1)
  ;additive error
  1	; EPS(2)
$THETA

  (1.1);CL~SEX1
  (0, 2) ; CL

  (1); CL~LBM

  (0, 1) ; Q
  (1); Q~AGE

  (0, 7) ; V1

  (1); V1~LBM

  (1);V2~SEX1
  (0, 9) ; V2

  (1); V2~LBM
  ; Q2 is not used
  ; Q3 is not used
  ; V3 is not used
$OMEGA

  0.3  ; Q

  0.3  ; V2
  ; Q2 is not used
  ; Q3 is not used
  ; V3 is not used
$EST METHOD = COND INTER NOABORT MAX = 999999
$TABLE ID TIME AMT DV PRED IPRED WRES CWRES FILE=results.tab NOPRINT NOAPPEND ONEHEADER
$COV UNCOND PRINT=E

;; Phenotype: ([('ADVAN', 0), ('CL~AGE', 0), ('CL~LBM', 1), ('CL~SEX', 1), ('CL_OMEGA', 0), ('Q~AGE', 1), ('Q~LBM', 0), ('Q~SEX', 0), ('Q_OMEGA', 1), ('V1~AGE', 0), ('V1~LBM', 1), ('V1~SEX', 0), ('V1_OMEGA', 0), ('V2~AGE', 0), ('V2~LBM', 1), ('V2~SEX', 1), ('V2_OMEGA', 1), ('RESERR', 1)])
;; Genotype: [0, 0, 1, 1, 0, 1, 0, 0, 1, 0, 1, 0, 0, 0, 1, 1, 1, 0, 0, 0, 0, 1, 1, 1, 0, 0, 1, 1]
;; Num non-influential tokens: 10

NM-TRAN MESSAGES
 WARNINGS AND ERRORS (IF ANY) FOR PROBLEM    1
 (WARNING  2) NM-TRAN INFERS THAT THE DATA ARE POPULATION.

1NONLINEAR MIXED EFFECTS MODEL PROGRAM (NONMEM) VERSION 7.4.3
 ORIGINALLY DEVELOPED BY STUART BEAL, LEWIS SHEINER, AND ALISON BOECKMANN
 CURRENT DEVELOPERS ARE ROBERT BAUER, ICON DEVELOPMENT SOLUTIONS,
 AND ALISON BOECKMANN. IMPLEMENTATION, EFFICIENCY, AND STANDARDIZATION
 PERFORMED BY NOUS INFOSYSTEMS.
 PROBLEM NO.:         1
 single pyDarwin individual, one among multitude
 TOT. NO. OF OBS RECS:     1992
 TOT. NO. OF INDIVIDUALS:       65
 TWO COMPARTMENT MODEL (ADVAN3)
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 #TBLN:      1
 #METH: First Order Conditional Estimation with Interaction
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
 #TERM:
0MINIMIZATION TERMINATED
 DUE TO ROUNDING ERRORS (ERROR=134)
 NO. OF FUNCTION EVALUATIONS USED:     6311
 NO. OF SIG. DIGITS IN FINAL EST.:  2.6
 ADDITIONAL PROBLEMS OCCURRED WITH THE MINIMIZATION.
 REGARD THE RESULTS OF THE ESTIMATION STEP CAREFULLY, AND ACCEPT THEM ONLY
 AFTER CHECKING THAT THE COVARIANCE STEP PRODUCES REASONABLE OUTPUT.

 ETABAR IS THE ARITHMETIC MEAN OF THE ETA-ESTIMATES,
 AND THE P-VALUE IS GIVEN FOR THE NULL HYPOTHESIS THAT THE TRUE MEAN IS 0.

 ETABAR:         5.7573E-05  1.2413E-03
 SE:             4.2254E-02  3.5548E-02
 N:                      65          65

 P VAL.:         9.9891E-01  9.7214E-01

 ETASHRINKSD(%)  7.4667E+00  2.3263E+00
 ETASHRINKVR(%)  1.4376E+01  4.5985E+00
 EBVSHRINKSD(%)  7.9190E+00  2.8904E+00
 EBVSHRINKVR(%)  1.5211E+01  5.6972E+00
 EPSSHRINKSD(%)  2.7552E+00  2.7552E+00
 EPSSHRINKVR(%)  5.4345E+00  5.4345E+00


 TOTAL DATA POINTS NORMALLY DISTRIBUTED (N):         1992
 N*LOG(2PI) CONSTANT TO OBJECTIVE FUNCTION:    3661.0511162874159
 OBJECTIVE FUNCTION VALUE WITHOUT CONSTANT:    5713.0237555165359
 OBJECTIVE FUNCTION VALUE WITH CONSTANT:       9374.0748718039522
 REPORTED OBJECTIVE FUNCTION DOES NOT CONTAIN CONSTANT

 TOTAL EFFECTIVE ETAS (NIND*NETA):                           130


 #TERE:
 Elapsed estimation  time in seconds:   220.37
 Elapsed covariance  time in seconds:    21.86
 Elapsed postprocess time in seconds:     0.12

 ********************               FIRST ORDER CONDITIONAL ESTIMATION WITH INTERACTION              ********************
 #OBJT:**************                       MINIMUM VALUE OF OBJECTIVE FUNCTION                      ********************
 #OBJV:********************************************     5713.024       **************************************************

 ********************               FIRST ORDER CONDITIONAL ESTIMATION WITH INTERACTION              ********************
 ********************                             FINAL PARAMETER ESTIMATE                           ********************

 THETA - VECTOR OF FIXED EFFECTS PARAMETERS   *********
         TH 1      TH 2      TH 3      TH 4      TH 5      TH 6      TH 7      TH 8      TH 9      TH10
        -5.61E-02  2.46E+00  7.68E-01  1.08E+00  3.97E-03  5.65E+00  1.38E+00  3.02E-01  7.32E+00  4.07E-01

 OMEGA - COV MATRIX FOR RANDOM EFFECTS - ETAS  ********
         ETA1      ETA2
 ETA1
+        1.38E-01
 ETA2
+        0.00E+00  8.74E-02

 SIGMA - COV MATRIX FOR RANDOM EFFECTS - EPSILONS  ****
         EPS1      EPS2
 EPS1
+        4.91E-02
 EPS2
+        0.00E+00  9.76E-03

 OMEGA - CORR MATRIX FOR RANDOM EFFECTS - ETAS  *******
         ETA1      ETA2
 ETA1
+        3.71E-01
 ETA2
+        0.00E+00  2.96E-01

 SIGMA - CORR MATRIX FOR RANDOM EFFECTS - EPSILONS  ***
         EPS1      EPS2
 EPS1
+        2.22E-01
 EPS2
+        0.00E+00  9.88E-02

 ********************               FIRST ORDER CONDITIONAL ESTIMATION WITH INTERACTION              ********************
 ********************                            STANDARD ERROR OF ESTIMATE                          ********************

 THETA - VECTOR OF FIXED EFFECTS PARAMETERS   *********
         TH 1      TH 2      TH 3      TH 4      TH 5      TH 6      TH 7      TH 8      TH 9      TH10
         5.60E-02  1.09E-01  1.77E-01  1.87E-01  3.96E-03  4.04E-01  2.92E-01  1.94E-01  5.45E-01  3.58E-01

 OMEGA - COV MATRIX FOR RANDOM EFFECTS - ETAS  ********
         ETA1      ETA2
 ETA1
+        3.65E-02
 ETA2
+       .........  1.39E-02

 SIGMA - COV MATRIX FOR RANDOM EFFECTS - EPSILONS  ****
         EPS1      EPS2
 EPS1
+        6.83E-03
 EPS2
+       .........  3.83E-03

 OMEGA - CORR MATRIX FOR RANDOM EFFECTS - ETAS  *******
         ETA1      ETA2
 ETA1
+        4.92E-02
 ETA2
+       .........  2.34E-02

 SIGMA - CORR MATRIX FOR RANDOM EFFECTS - EPSILONS  ***
         EPS1      EPS2
 EPS1
+        1.54E-02
 EPS2
+       .........  1.94E-02

 ********************               FIRST ORDER CONDITIONAL ESTIMATION WITH INTERACTION              ********************
 ********************                          COVARIANCE MATRIX OF ESTIMATE                         ********************

            TH 1      TH 2      TH 3      TH 4      TH 5      TH 6      TH 7      TH 8      TH 9      TH10      OM11      OM12
             OM22      SG11      SG12      SG22
 TH 1
+        3.13E-03
 TH 2
+       -3.86E-03  1.20E-02
 TH 3
+       -5.22E-03 -3.81E-03  3.14E-02
 TH 4
+        1.12E-04  2.13E-03 -9.11E-04  3.50E-02
 TH 5
+        1.47E-06  7.02E-06 -2.74E-05 -6.57E-04  1.57E-05
 TH 6
+       -2.21E-03  2.70E-02 -3.44E-02 -6.35E-03 -4.44E-05  1.63E-01
 TH 7
+        2.16E-03 -1.94E-02  2.96E-02 -6.50E-03  1.28E-04 -8.49E-02  8.54E-02
 TH 8
+        7.57E-03 -8.06E-03 -1.32E-02  3.51E-03 -8.97E-05  4.84E-04  4.66E-03  3.76E-02
 TH 9
+       -1.63E-02  3.68E-02  4.18E-03  2.01E-02  1.06E-04  2.64E-02 -4.18E-02 -7.90E-02  2.97E-01
 TH10
+       -1.05E-02  4.03E-03  3.63E-02 -3.13E-03  7.38E-05 -2.47E-02  1.58E-02 -5.74E-02  9.29E-02  1.28E-01
 OM11
+        4.06E-04 -2.45E-03  2.93E-03 -1.26E-03  2.22E-05 -7.23E-03  5.25E-03  5.42E-04 -7.42E-03  3.95E-03  1.33E-03
 OM12
+       ......... ......... ......... ......... ......... ......... ......... ......... ......... ......... ......... .........
 OM22
+        1.82E-04 -3.85E-04  7.75E-05 -6.54E-04  1.56E-05 -6.20E-04  8.54E-04  4.91E-04 -1.97E-03  2.72E-04  2.59E-04 .........
          1.92E-04
 SG11
+        1.99E-05 -1.69E-04  2.66E-04 -8.26E-04  1.39E-05 -2.74E-05  4.77E-04  5.25E-05 -1.23E-03  3.41E-04  1.02E-04 .........
          2.29E-05  4.67E-05
 SG12
+       ......... ......... ......... ......... ......... ......... ......... ......... ......... ......... ......... .........
         ......... ......... .........
 SG22
+       -1.20E-05  8.42E-06  1.08E-05  2.26E-04 -2.65E-06 -2.67E-04  1.67E-04  3.87E-05  9.67E-05  4.63E-05  7.10E-06 .........
          1.21E-05 -4.53E-06 .........  1.47E-05

 ********************               FIRST ORDER CONDITIONAL ESTIMATION WITH INTERACTION              ********************
 ********************                          CORRELATION MATRIX OF ESTIMATE                        ********************

            TH 1      TH 2      TH 3      TH 4      TH 5      TH 6      TH 7      TH 8      TH 9      TH10      OM11      OM12
             OM22      SG11      SG12      SG22
 TH 1
+        5.60E-02
 TH 2
+       -6.30E-01  1.09E-01
 TH 3
+       -5.26E-01 -1.96E-01  1.77E-01
 TH 4
+        1.07E-02  1.04E-01 -2.75E-02  1.87E-01
 TH 5
+        6.62E-03  1.62E-02 -3.90E-02 -8.85E-01  3.96E-03
 TH 6
+       -9.78E-02  6.11E-01 -4.81E-01 -8.41E-02 -2.78E-02  4.04E-01
 TH 7
+        1.32E-01 -6.06E-01  5.72E-01 -1.19E-01  1.11E-01 -7.20E-01  2.92E-01
 TH 8
+        6.97E-01 -3.80E-01 -3.84E-01  9.67E-02 -1.17E-01  6.18E-03  8.22E-02  1.94E-01
 TH 9
+       -5.34E-01  6.18E-01  4.34E-02  1.98E-01  4.93E-02  1.20E-01 -2.63E-01 -7.47E-01  5.45E-01
 TH10
+       -5.23E-01  1.03E-01  5.73E-01 -4.67E-02  5.20E-02 -1.71E-01  1.51E-01 -8.27E-01  4.76E-01  3.58E-01
 OM11
+        1.99E-01 -6.13E-01  4.53E-01 -1.84E-01  1.54E-01 -4.91E-01  4.93E-01  7.66E-02 -3.73E-01  3.02E-01  3.65E-02
 OM12
+       ......... ......... ......... ......... ......... ......... ......... ......... ......... ......... ......... .........
 OM22
+        2.35E-01 -2.54E-01  3.16E-02 -2.52E-01  2.83E-01 -1.11E-01  2.11E-01  1.83E-01 -2.62E-01  5.48E-02  5.13E-01 .........
          1.39E-02
 SG11
+        5.21E-02 -2.26E-01  2.19E-01 -6.46E-01  5.11E-01 -9.95E-03  2.39E-01  3.96E-02 -3.32E-01  1.39E-01  4.08E-01 .........
          2.42E-01  6.83E-03
 SG12
+       ......... ......... ......... ......... ......... ......... ......... ......... ......... ......... ......... .........
         ......... ......... .........
 SG22
+       -5.60E-02  2.01E-02  1.60E-02  3.15E-01 -1.75E-01 -1.73E-01  1.50E-01  5.20E-02  4.63E-02  3.38E-02  5.08E-02 .........
          2.27E-01 -1.73E-01 .........  3.83E-03
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
 ********************               FIRST ORDER CONDITIONAL ESTIMATION WITH INTERACTION              ********************
 ********************                      EIGENVALUES OF COR MATRIX OF ESTIMATE                     ********************

             1         2         3         4         5         6         7         8         9        10        11        12
             13        14
         9.69E-03  2.40E-02  9.51E-02  1.20E-01  1.92E-01  2.88E-01  3.08E-01  4.93E-01  7.82E-01  8.68E-01  1.19E+00  2.41E+00
          3.27E+00  3.95E+00
 Elapsed finaloutput time in seconds:     0.20
 #CPUT: Total CPU Time in Seconds,      242.656
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