28.07.2025
16:10
$SIZES PD=-1000 LVR=-150 LTH=-200
$PROBLEM single pyDarwin individual, one among multitude
$INPUT ID TIME AMT RATE DV DROP MDV AGE SEX LBM DROP CMT EVID
$DATA "D:\Users\selzer\Repos\GH\pyDarwinXploR\RemiR/data.csv" IGNORE=@
$SUBROUTINE ADVAN3 TRANS4
$PK

  CL = THETA(1)  *(LBM/50)**(THETA(2))  * EXP(ETA(1)) ; CL

  TVQSEX = 0
  IF(SEX == 1) THEN
  TVQSEX = THETA(3)
  ENDIF
  Q = THETA(4) *(1 + THETA(5) * (AGE)) *(LBM/50)**(THETA(6)) *(1 + TVQSEX) ; Q

  TVV1SEX = 0
  IF(SEX == 1) THEN
  TVV1SEX = THETA(7)
  ENDIF
  V1 = THETA(8) *(1 + THETA(9) * (AGE)) *(LBM/50)**(THETA(10)) *(1 + TVV1SEX) * EXP(ETA(2))
  SC = V1 ; V1

  TVV2SEX = 0
  IF(SEX == 1) THEN
  TVV2SEX = THETA(11)
  ENDIF
  V2 = THETA(12) *(1 + THETA(13) * (AGE)) *(LBM/50)**(THETA(14)) *(1 + TVV2SEX) * EXP(ETA(3)) ; V2
  ; Q2 is not used ; Q2
  ; Q3 is not used ; Q3
  ; V3 is not used ; V3
$ERROR
  IPRED = F
  Y = F *(1+EPS(1))+EPS(2)
$SIGMA
  ;proportional error
  0.2	; EPS(1)
  ;additive error
  1	; EPS(2)
$THETA

  (0, 2) ; CL

  (1); CL~LBM

  (1);Q~SEX1
  (0, 1) ; Q
  (1); Q~AGE
  (1); Q~LBM

  (1);V1~SEX1
  (0, 7) ; V1
  (1); V1~AGE
  (1); V1~LBM

  (1);V2~SEX1
  (0, 9) ; V2
  (1); V2~AGE
  (1); V2~LBM
  ; Q2 is not used
  ; Q3 is not used
  ; V3 is not used
$OMEGA
  0.03  ; CL

  0.3  ; V1
  0.3  ; V2
  ; Q2 is not used
  ; Q3 is not used
  ; V3 is not used
$EST METHOD = COND INTER NOABORT MAX = 999999
$TABLE ID TIME AMT DV PRED IPRED WRES CWRES FILE=results.tab NOPRINT NOAPPEND ONEHEADER
$COV UNCOND PRINT=E

;; Phenotype: ([('ADVAN', 0), ('CL~AGE', 0), ('CL~LBM', 1), ('CL~SEX', 0), ('CL_OMEGA', 1), ('Q~AGE', 1), ('Q~LBM', 1), ('Q~SEX', 1), ('Q_OMEGA', 0), ('V1~AGE', 1), ('V1~LBM', 1), ('V1~SEX', 1), ('V1_OMEGA', 1), ('V2~AGE', 1), ('V2~LBM', 1), ('V2~SEX', 1), ('V2_OMEGA', 1), ('RESERR', 1)])
;; Genotype: [0, 0, 1, 0, 1, 1, 1, 1, 0, 1, 1, 1, 1, 1, 1, 1, 1, 0, 0, 1, 0, 1, 1, 0, 0, 0, 0, 1]
;; Num non-influential tokens: 10

NM-TRAN MESSAGES
 WARNINGS AND ERRORS (IF ANY) FOR PROBLEM    1
 (WARNING  2) NM-TRAN INFERS THAT THE DATA ARE POPULATION.

1NONLINEAR MIXED EFFECTS MODEL PROGRAM (NONMEM) VERSION 7.4.3
 ORIGINALLY DEVELOPED BY STUART BEAL, LEWIS SHEINER, AND ALISON BOECKMANN
 CURRENT DEVELOPERS ARE ROBERT BAUER, ICON DEVELOPMENT SOLUTIONS,
 AND ALISON BOECKMANN. IMPLEMENTATION, EFFICIENCY, AND STANDARDIZATION
 PERFORMED BY NOUS INFOSYSTEMS.
 PROBLEM NO.:         1
 single pyDarwin individual, one among multitude
 TOT. NO. OF OBS RECS:     1992
 TOT. NO. OF INDIVIDUALS:       65
 TWO COMPARTMENT MODEL (ADVAN3)
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 #TBLN:      1
 #METH: First Order Conditional Estimation with Interaction
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
 #TERM:
0MINIMIZATION TERMINATED
 DUE TO PROXIMITY OF LAST ITERATION EST. TO A VALUE
 AT WHICH THE OBJ. FUNC. IS INFINITE (ERROR=136)
0AT THE LAST COMPUTED INFINITE VALUE OF THE OBJ. FUNCT.:

0PRED EXIT CODE = 1
0INDIVIDUAL NO.       1   ID= 1.00000000000000E+00   (WITHIN-INDIVIDUAL) DATA REC NO.   1
 THETA=
  2.42E+00   4.92E-01   7.17E-01   7.76E-02   7.45E-01   1.79E+00  -1.00E+00   7.00E-02   8.45E-02  -7.74E+00
 -1.00E-01   1.57E+01  -3.00E-03   1.64E+00
 OCCURS DURING SEARCH FOR ETA AT INITIAL VALUE, ETA=0
 ERROR IN TRANS4 ROUTINE: V1  IS NEGATIVE

 NO. OF FUNCTION EVALUATIONS USED:     5727
 NO. OF SIG. DIGITS UNREPORTABLE
0PARAMETER ESTIMATE IS NEAR ITS BOUNDARY

 ETABAR IS THE ARITHMETIC MEAN OF THE ETA-ESTIMATES,
 AND THE P-VALUE IS GIVEN FOR THE NULL HYPOTHESIS THAT THE TRUE MEAN IS 0.

 ETABAR:         1.3315E-03  2.6046E-01 -7.0354E-02
 SE:             2.1856E-02  1.5523E-01  3.3868E-02
 N:                      65          65          65

 P VAL.:         9.5142E-01  9.3358E-02  3.7772E-02

 ETASHRINKSD(%)  3.8190E+00  5.4020E+01  7.3004E+00
 ETASHRINKVR(%)  7.4921E+00  7.8859E+01  1.4068E+01
 EBVSHRINKSD(%)  3.0997E+00  4.8221E+01  2.9500E+00
 EBVSHRINKVR(%)  6.1034E+00  7.3190E+01  5.8129E+00
 EPSSHRINKSD(%)  3.3987E+00  3.3987E+00
 EPSSHRINKVR(%)  6.6820E+00  6.6820E+00


 TOTAL DATA POINTS NORMALLY DISTRIBUTED (N):         1992
 N*LOG(2PI) CONSTANT TO OBJECTIVE FUNCTION:    3661.0511162874159
 OBJECTIVE FUNCTION VALUE WITHOUT CONSTANT:    6352.8749757780961
 OBJECTIVE FUNCTION VALUE WITH CONSTANT:       10013.926092065512
 REPORTED OBJECTIVE FUNCTION DOES NOT CONTAIN CONSTANT

 TOTAL EFFECTIVE ETAS (NIND*NETA):                           195


 #TERE:
 Elapsed estimation  time in seconds:   321.64

0PRED EXIT CODE = 1
0INDIVIDUAL NO.       1   ID= 1.00000000000000E+00   (WITHIN-INDIVIDUAL) DATA REC NO.   1
 THETA=
  2.42E+00   4.92E-01   7.17E-01   7.76E-02   7.45E-01   1.79E+00  -1.00E+00   7.00E-02   8.45E-02  -7.74E+00
 -1.00E-01   1.57E+01  -3.00E-03   1.64E+00
 OCCURS DURING SEARCH FOR ETA AT INITIAL VALUE, ETA=0
 ERROR IN TRANS4 ROUTINE: V1  IS NEGATIVE
0PROGRAM TERMINATED BY OBJ
 Elapsed covariance  time in seconds:     2.08
 MESSAGE ISSUED FROM COVARIANCE STEP

 ********************               FIRST ORDER CONDITIONAL ESTIMATION WITH INTERACTION              ********************
 #OBJT:**************                       MINIMUM VALUE OF OBJECTIVE FUNCTION                      ********************
 #OBJV:********************************************     6352.875       **************************************************

 ********************               FIRST ORDER CONDITIONAL ESTIMATION WITH INTERACTION              ********************
 ********************                             FINAL PARAMETER ESTIMATE                           ********************

 THETA - VECTOR OF FIXED EFFECTS PARAMETERS   *********
         TH 1      TH 2      TH 3      TH 4      TH 5      TH 6      TH 7      TH 8      TH 9      TH10      TH11      TH12
          TH13      TH14
         2.42E+00  4.92E-01  7.17E-01  7.76E-02  7.45E-01  1.79E+00 -1.00E+00  7.00E-02  8.45E-02 -7.74E+00 -1.00E-01  1.57E+01
         -3.00E-03  1.64E+00

 OMEGA - COV MATRIX FOR RANDOM EFFECTS - ETAS  ********
         ETA1      ETA2      ETA3
 ETA1
+        3.41E-02
 ETA2
+        0.00E+00  7.52E+00
 ETA3
+        0.00E+00  0.00E+00  8.81E-02

 SIGMA - COV MATRIX FOR RANDOM EFFECTS - EPSILONS  ****
         EPS1      EPS2
 EPS1
+        5.54E-02
 EPS2
+        0.00E+00  3.01E-02

 OMEGA - CORR MATRIX FOR RANDOM EFFECTS - ETAS  *******
         ETA1      ETA2      ETA3
 ETA1
+        1.85E-01
 ETA2
+        0.00E+00  2.74E+00
 ETA3
+        0.00E+00  0.00E+00  2.97E-01

 SIGMA - CORR MATRIX FOR RANDOM EFFECTS - EPSILONS  ***
         EPS1      EPS2
 EPS1
+        2.35E-01
 EPS2
+        0.00E+00  1.74E-01
 #CPUT: Total CPU Time in Seconds,      323.859
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