28.07.2025
21:11
$SIZES PD=-1000 LVR=-150 LTH=-200
$PROBLEM single pyDarwin individual, one among multitude
$INPUT ID TIME AMT RATE DV DROP MDV AGE SEX LBM DROP CMT EVID
$DATA "D:\Users\selzer\Repos\GH\pyDarwinXploR\RemiR/data.csv" IGNORE=@
$SUBROUTINE ADVAN3 TRANS4
$PK

  TVCLSEX = 0
  IF(SEX == 1) THEN
  TVCLSEX = THETA(1)
  ENDIF
  CL = THETA(2) *(1 + THETA(3) * (AGE))  *(1 + TVCLSEX) ; CL

  Q = THETA(4) *(1 + THETA(5) * (AGE)) *(LBM/50)**(THETA(6))  ; Q

  V1 = THETA(7)  *(LBM/50)**(THETA(8))  * EXP(ETA(1))
  SC = V1 ; V1

  TVV2SEX = 0
  IF(SEX == 1) THEN
  TVV2SEX = THETA(9)
  ENDIF
  V2 = THETA(10) *(1 + THETA(11) * (AGE))  *(1 + TVV2SEX) * EXP(ETA(2)) ; V2
  ; Q2 is not used ; Q2
  ; Q3 is not used ; Q3
  ; V3 is not used ; V3
$ERROR
  IPRED = F
  Y = F *(1+EPS(1))
$SIGMA
  ;proportional error
  0.1	; EPS(1)
$THETA

  (1.1);CL~SEX1
  (0, 2) ; CL
  (1); CL~AGE

  (0, 1) ; Q
  (1); Q~AGE
  (1); Q~LBM

  (0, 7) ; V1

  (1); V1~LBM

  (1);V2~SEX1
  (0, 9) ; V2
  (1); V2~AGE

  ; Q2 is not used
  ; Q3 is not used
  ; V3 is not used
$OMEGA

  0.3  ; V1
  0.3  ; V2
  ; Q2 is not used
  ; Q3 is not used
  ; V3 is not used
$EST METHOD = COND INTER NOABORT MAX = 999999
$TABLE ID TIME AMT DV PRED IPRED WRES CWRES FILE=results.tab NOPRINT NOAPPEND ONEHEADER
$COV UNCOND PRINT=E

;; Phenotype: ([('ADVAN', 0), ('CL~AGE', 1), ('CL~LBM', 0), ('CL~SEX', 1), ('CL_OMEGA', 0), ('Q~AGE', 1), ('Q~LBM', 1), ('Q~SEX', 0), ('Q_OMEGA', 0), ('V1~AGE', 0), ('V1~LBM', 1), ('V1~SEX', 0), ('V1_OMEGA', 1), ('V2~AGE', 1), ('V2~LBM', 0), ('V2~SEX', 1), ('V2_OMEGA', 1), ('RESERR', 0)])
;; Genotype: [0, 1, 0, 1, 0, 1, 1, 0, 0, 0, 1, 0, 1, 1, 0, 1, 1, 0, 0, 1, 1, 1, 1, 1, 0, 1, 1, 0]
;; Num non-influential tokens: 10

NM-TRAN MESSAGES
 WARNINGS AND ERRORS (IF ANY) FOR PROBLEM    1
 (WARNING  2) NM-TRAN INFERS THAT THE DATA ARE POPULATION.

1NONLINEAR MIXED EFFECTS MODEL PROGRAM (NONMEM) VERSION 7.4.3
 ORIGINALLY DEVELOPED BY STUART BEAL, LEWIS SHEINER, AND ALISON BOECKMANN
 CURRENT DEVELOPERS ARE ROBERT BAUER, ICON DEVELOPMENT SOLUTIONS,
 AND ALISON BOECKMANN. IMPLEMENTATION, EFFICIENCY, AND STANDARDIZATION
 PERFORMED BY NOUS INFOSYSTEMS.
 PROBLEM NO.:         1
 single pyDarwin individual, one among multitude
 TOT. NO. OF OBS RECS:     1992
 TOT. NO. OF INDIVIDUALS:       65
 TWO COMPARTMENT MODEL (ADVAN3)
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 #TBLN:      1
 #METH: First Order Conditional Estimation with Interaction
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
 #TERM:
0MINIMIZATION TERMINATED
 DUE TO ROUNDING ERRORS (ERROR=134)
 NO. OF FUNCTION EVALUATIONS USED:     3094
 NO. OF SIG. DIGITS UNREPORTABLE
0PARAMETER ESTIMATE IS NEAR ITS BOUNDARY

 ETABAR IS THE ARITHMETIC MEAN OF THE ETA-ESTIMATES,
 AND THE P-VALUE IS GIVEN FOR THE NULL HYPOTHESIS THAT THE TRUE MEAN IS 0.

 ETABAR:        -2.8274E+00 -5.5589E-02
 SE:             7.5257E-02  8.5188E-02
 N:                      65          65

 P VAL.:         7.762E-309  5.1405E-01

 ETASHRINKSD(%)  9.9060E+01  8.9558E-01
 ETASHRINKVR(%)  9.9991E+01  1.7831E+00
 EBVSHRINKSD(%)  9.6940E+01  2.4081E-01
 EBVSHRINKVR(%)  9.9906E+01  4.8104E-01
 EPSSHRINKSD(%)  1.0000E-10
 EPSSHRINKVR(%)  1.0000E-10


 TOTAL DATA POINTS NORMALLY DISTRIBUTED (N):         1992
 N*LOG(2PI) CONSTANT TO OBJECTIVE FUNCTION:    3661.0511162874159
 OBJECTIVE FUNCTION VALUE WITHOUT CONSTANT:    10599.661780332266
 OBJECTIVE FUNCTION VALUE WITH CONSTANT:       14260.712896619681
 REPORTED OBJECTIVE FUNCTION DOES NOT CONTAIN CONSTANT

 TOTAL EFFECTIVE ETAS (NIND*NETA):                           130


 #TERE:
 Elapsed estimation  time in seconds:   152.20

0PRED EXIT CODE = 1
0INDIVIDUAL NO.      35   ID= 3.50000000000000E+01   (WITHIN-INDIVIDUAL) DATA REC NO.   2
 THETA=
 -7.74E-02   3.43E+00  -5.14E-03   1.01E+00   2.26E+00   1.05E+00   7.00E-02  -7.23E-01   2.86E-01   1.13E+00
  4.32E-01
 ETA=
  2.43E+02  -4.48E-01
 OCCURS DURING SEARCH FOR ETA AT A NONZERO VALUE OF ETA
 A ROOT OF THE CHARACTERISTIC EQUATION IS ZERO BECAUSE
 K*K21 IS MUCH SMALLER THAN  (K+K12+K21)**2.
 PERHAPS K OR K21 IS VERY SMALL, OR K12 IS VERY LARGE.
0PROGRAM TERMINATED BY OBJ
 Elapsed covariance  time in seconds:     4.50
 MESSAGE ISSUED FROM COVARIANCE STEP

 ********************               FIRST ORDER CONDITIONAL ESTIMATION WITH INTERACTION              ********************
 #OBJT:**************                       MINIMUM VALUE OF OBJECTIVE FUNCTION                      ********************
 #OBJV:********************************************    10599.662       **************************************************

 ********************               FIRST ORDER CONDITIONAL ESTIMATION WITH INTERACTION              ********************
 ********************                             FINAL PARAMETER ESTIMATE                           ********************

 THETA - VECTOR OF FIXED EFFECTS PARAMETERS   *********
         TH 1      TH 2      TH 3      TH 4      TH 5      TH 6      TH 7      TH 8      TH 9      TH10      TH11
        -7.85E-02  3.43E+00 -5.14E-03  1.01E+00  2.26E+00  1.05E+00  7.00E-02 -7.23E-01  2.86E-01  1.13E+00  4.32E-01

 OMEGA - COV MATRIX FOR RANDOM EFFECTS - ETAS  ********
         ETA1      ETA2
 ETA1
+        4.23E+03
 ETA2
+        0.00E+00  4.88E-01

 SIGMA - COV MATRIX FOR RANDOM EFFECTS - EPSILONS  ****
         EPS1
 EPS1
+        5.52E-01

 OMEGA - CORR MATRIX FOR RANDOM EFFECTS - ETAS  *******
         ETA1      ETA2
 ETA1
+        6.51E+01
 ETA2
+        0.00E+00  6.98E-01

 SIGMA - CORR MATRIX FOR RANDOM EFFECTS - EPSILONS  ***
         EPS1
 EPS1
+        7.43E-01
 #CPUT: Total CPU Time in Seconds,      156.875
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