23.07.2025
15:00
$SIZES PD=-1000 LVR=-150 LTH=-200
$PROBLEM single pyDarwin individual, one among multitude
$INPUT ID TIME AMT DV WT EVID MDV
$DATA "D:\Users\selzer\Repos\GH\pyDarwinXploR\Datasets\Theo/dataset.csv" IGNORE=@
$SUBROUTINE ADVAN4 TRANS4
$PK
  CL = THETA(1) ; CL
  Ka = THETA(2) ; Ka
  ; V is not used ; V
  Q = THETA(3) ; Q
  V2 = THETA(4)
  SC = V2 ; V2
  V3 = THETA(5) * EXP(ETA(1)) ; V3
  ; Q3 is not used ; Q3
  ; Q4 is not used ; Q4
  ; V4 is not used ; V4
$ERROR
  IPRED = F
  Y = F +EPS(1)
$SIGMA
  ;additive error only
  1	; EPS(1)
$THETA
  (0, 5) ; CL
  (0, 1) ; Ka
  ; V is not used
  (0, 6) ; Q
  (0, 50) ; V2
  (0, 100) ; V3
  ; Q3 is not used
  ; Q4 is not used
  ; V4 is not used
$OMEGA

  ; V is not used

  0.3  ; V3
  ; Q3 is not used
  ; Q4 is not used
  ; V4 is not used
$EST METHOD = COND INTER NOABORT MAX = 999999
$TABLE ID TIME AMT DV PRED IPRED WRES CWRES FILE=results.tab NOPRINT NOAPPEND ONEHEADER
$COV UNCOND PRINT=E

;; Phenotype: ([('ADVAN', 1), ('CL~WT', 0), ('V~WT', 0), ('CL_OMEGA', 0), ('Ka_OMEGA', 0), ('Q_OMEGA', 0), ('V2_OMEGA', 0), ('V3_OMEGA', 1), ('RESERR', 0)])
;; Genotype: [1, 0, 0, 0, 0, 0, 0, 0, 1, 0, 0]
;; Num non-influential tokens: 2

NM-TRAN MESSAGES
 WARNINGS AND ERRORS (IF ANY) FOR PROBLEM    1
 (WARNING  2) NM-TRAN INFERS THAT THE DATA ARE POPULATION.

1NONLINEAR MIXED EFFECTS MODEL PROGRAM (NONMEM) VERSION 7.4.3
 ORIGINALLY DEVELOPED BY STUART BEAL, LEWIS SHEINER, AND ALISON BOECKMANN
 CURRENT DEVELOPERS ARE ROBERT BAUER, ICON DEVELOPMENT SOLUTIONS,
 AND ALISON BOECKMANN. IMPLEMENTATION, EFFICIENCY, AND STANDARDIZATION
 PERFORMED BY NOUS INFOSYSTEMS.
 PROBLEM NO.:         1
 single pyDarwin individual, one among multitude
 TOT. NO. OF OBS RECS:      132
 TOT. NO. OF INDIVIDUALS:       12
 TWO COMPARTMENT MODEL WITH FIRST-ORDER ABSORPTION (ADVAN4)
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 #TBLN:      1
 #METH: First Order Conditional Estimation with Interaction
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
 #TERM:
0MINIMIZATION TERMINATED
 DUE TO PROXIMITY OF LAST ITERATION EST. TO A VALUE
 AT WHICH THE OBJ. FUNC. IS INFINITE (ERROR=136)
0AT THE LAST COMPUTED INFINITE VALUE OF THE OBJ. FUNCT.:

0PRED EXIT CODE = 1
0INDIVIDUAL NO.       5   ID= 5.00000000000000E+00   (WITHIN-INDIVIDUAL) DATA REC NO.   3
 THETA=
  1.75E+00   1.48E+00   1.65E+00   3.22E+01   7.20E+10
 ETA=
 -6.77E+01
 OCCURS DURING SEARCH FOR ETA AT A NONZERO VALUE OF ETA
 A ROOT OF THE CHARACTERISTIC EQUATION IS ZERO BECAUSE
 K*K32 IS MUCH SMALLER THAN  (K+K23+K32)**2.
 PERHAPS K OR K32 IS VERY SMALL, OR K23 IS VERY LARGE.

 NO. OF FUNCTION EVALUATIONS USED:      485
 NO. OF SIG. DIGITS UNREPORTABLE

 ETABAR IS THE ARITHMETIC MEAN OF THE ETA-ESTIMATES,
 AND THE P-VALUE IS GIVEN FOR THE NULL HYPOTHESIS THAT THE TRUE MEAN IS 0.

 ETABAR:        -1.3092E+01
 SE:             5.3181E+00
 N:                      12

 P VAL.:         1.3821E-02

 ETASHRINKSD(%)  9.9892E+01
 ETASHRINKVR(%)  1.0000E+02
 EBVSHRINKSD(%)  9.5030E+01
 EBVSHRINKVR(%)  9.9753E+01
 EPSSHRINKSD(%)  1.0000E-10
 EPSSHRINKVR(%)  1.0000E-10


 TOTAL DATA POINTS NORMALLY DISTRIBUTED (N):          132
 N*LOG(2PI) CONSTANT TO OBJECTIVE FUNCTION:    242.59977276603360
 OBJECTIVE FUNCTION VALUE WITHOUT CONSTANT:    176.89164101672665
 OBJECTIVE FUNCTION VALUE WITH CONSTANT:       419.49141378276022
 REPORTED OBJECTIVE FUNCTION DOES NOT CONTAIN CONSTANT

 TOTAL EFFECTIVE ETAS (NIND*NETA):                            12


 #TERE:
 Elapsed estimation  time in seconds:     0.67

0PRED EXIT CODE = 1
0INDIVIDUAL NO.       1   ID= 1.00000000000000E+00   (WITHIN-INDIVIDUAL) DATA REC NO.   3
 THETA=
  1.76E+00   1.48E+00   1.65E+00   3.22E+01   7.20E+10
 ETA=
 -6.96E+01
 OCCURS DURING SEARCH FOR ETA AT A NONZERO VALUE OF ETA
 A ROOT OF THE CHARACTERISTIC EQUATION IS ZERO BECAUSE
 K*K32 IS MUCH SMALLER THAN  (K+K23+K32)**2.
 PERHAPS K OR K32 IS VERY SMALL, OR K23 IS VERY LARGE.
0PROGRAM TERMINATED BY OBJ
 Elapsed covariance  time in seconds:     0.01
 MESSAGE ISSUED FROM COVARIANCE STEP

 ********************               FIRST ORDER CONDITIONAL ESTIMATION WITH INTERACTION              ********************
 #OBJT:**************                       MINIMUM VALUE OF OBJECTIVE FUNCTION                      ********************
 #OBJV:********************************************      176.892       **************************************************

 ********************               FIRST ORDER CONDITIONAL ESTIMATION WITH INTERACTION              ********************
 ********************                             FINAL PARAMETER ESTIMATE                           ********************

 THETA - VECTOR OF FIXED EFFECTS PARAMETERS   *********
         TH 1      TH 2      TH 3      TH 4      TH 5
         1.75E+00  1.48E+00  1.65E+00  3.22E+01  7.20E+10

 OMEGA - COV MATRIX FOR RANDOM EFFECTS - ETAS  ********
         ETA1
 ETA1
+        3.17E+08

 SIGMA - COV MATRIX FOR RANDOM EFFECTS - EPSILONS  ****
         EPS1
 EPS1
+        1.40E+00

 OMEGA - CORR MATRIX FOR RANDOM EFFECTS - ETAS  *******
         ETA1
 ETA1
+        1.78E+04

 SIGMA - CORR MATRIX FOR RANDOM EFFECTS - EPSILONS  ***
         EPS1
 EPS1
+        1.18E+00
 #CPUT: Total CPU Time in Seconds,        0.688
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