23.07.2025
15:07
$SIZES PD=-1000 LVR=-150 LTH=-200
$PROBLEM single pyDarwin individual, one among multitude
$INPUT ID TIME AMT DV WT EVID MDV
$DATA "D:\Users\selzer\Repos\GH\pyDarwinXploR\Datasets\Theo/dataset.csv" IGNORE=@
$SUBROUTINE ADVAN4 TRANS4
$PK
  CL = THETA(1)*(WT/70)**(0.75) ; CL
  Ka = THETA(2) * EXP(ETA(1)) ; Ka
  ; V is not used ; V
  Q = THETA(3) * EXP(ETA(2)) ; Q
  V2 = THETA(4)*(WT/70)**(1) * EXP(ETA(3))
  SC = V2 ; V2
  V3 = THETA(5) * EXP(ETA(4)) ; V3
  ; Q3 is not used ; Q3
  ; Q4 is not used ; Q4
  ; V4 is not used ; V4
$ERROR
  IPRED = F
  Y = F +EPS(1)
$SIGMA
  ;additive error only
  1	; EPS(1)
$THETA
  (0, 5) ; CL
  (0, 1) ; Ka
  ; V is not used
  (0, 6) ; Q
  (0, 50) ; V2
  (0, 100) ; V3
  ; Q3 is not used
  ; Q4 is not used
  ; V4 is not used
$OMEGA

  0.3  ; Ka
  ; V is not used
  0.3  ; Q
  0.3  ; V2
  0.3  ; V3
  ; Q3 is not used
  ; Q4 is not used
  ; V4 is not used
$EST METHOD = COND INTER NOABORT MAX = 999999
$TABLE ID TIME AMT DV PRED IPRED WRES CWRES FILE=results.tab NOPRINT NOAPPEND ONEHEADER
$COV UNCOND PRINT=E

;; Phenotype: ([('ADVAN', 1), ('CL~WT', 2), ('V~WT', 1), ('CL_OMEGA', 0), ('Ka_OMEGA', 1), ('Q_OMEGA', 1), ('V2_OMEGA', 1), ('V3_OMEGA', 1), ('RESERR', 0)])
;; Genotype: [1, 2, 1, 0, 1, 0, 1, 1, 1, 0, 0]
;; Num non-influential tokens: 2

NM-TRAN MESSAGES
 WARNINGS AND ERRORS (IF ANY) FOR PROBLEM    1
 (WARNING  2) NM-TRAN INFERS THAT THE DATA ARE POPULATION.

1NONLINEAR MIXED EFFECTS MODEL PROGRAM (NONMEM) VERSION 7.4.3
 ORIGINALLY DEVELOPED BY STUART BEAL, LEWIS SHEINER, AND ALISON BOECKMANN
 CURRENT DEVELOPERS ARE ROBERT BAUER, ICON DEVELOPMENT SOLUTIONS,
 AND ALISON BOECKMANN. IMPLEMENTATION, EFFICIENCY, AND STANDARDIZATION
 PERFORMED BY NOUS INFOSYSTEMS.
 PROBLEM NO.:         1
 single pyDarwin individual, one among multitude
 TOT. NO. OF OBS RECS:      132
 TOT. NO. OF INDIVIDUALS:       12
 TWO COMPARTMENT MODEL WITH FIRST-ORDER ABSORPTION (ADVAN4)
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 #TBLN:      1
 #METH: First Order Conditional Estimation with Interaction
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
 #TERM:
0MINIMIZATION SUCCESSFUL
 NO. OF FUNCTION EVALUATIONS USED:      507
 NO. OF SIG. DIGITS IN FINAL EST.:  4.1
0PARAMETER ESTIMATE IS NEAR ITS BOUNDARY

 ETABAR IS THE ARITHMETIC MEAN OF THE ETA-ESTIMATES,
 AND THE P-VALUE IS GIVEN FOR THE NULL HYPOTHESIS THAT THE TRUE MEAN IS 0.

 ETABAR:        -1.0805E-02  3.0579E-03 -7.0138E-03  1.3894E-06
 SE:             1.8079E-01  7.1649E-02  3.1965E-02  1.1832E-06
 N:                      12          12          12          12

 P VAL.:         9.5234E-01  9.6596E-01  8.2632E-01  2.4030E-01

 ETASHRINKSD(%)  1.5690E+00  4.1510E+00  1.2264E+01  9.9922E+01
 ETASHRINKVR(%)  3.1133E+00  8.1297E+00  2.3024E+01  1.0000E+02
 EBVSHRINKSD(%)  4.1147E+00  8.2764E+00  1.5618E+01  9.9802E+01
 EBVSHRINKVR(%)  8.0600E+00  1.5868E+01  2.8797E+01  1.0000E+02
 EPSSHRINKSD(%)  1.1781E+01
 EPSSHRINKVR(%)  2.2174E+01


 TOTAL DATA POINTS NORMALLY DISTRIBUTED (N):          132
 N*LOG(2PI) CONSTANT TO OBJECTIVE FUNCTION:    242.59977276603360
 OBJECTIVE FUNCTION VALUE WITHOUT CONSTANT:    114.26664348297783
 OBJECTIVE FUNCTION VALUE WITH CONSTANT:       356.86641624901142
 REPORTED OBJECTIVE FUNCTION DOES NOT CONTAIN CONSTANT

 TOTAL EFFECTIVE ETAS (NIND*NETA):                            48


 #TERE:
 Elapsed estimation  time in seconds:     1.23
0S MATRIX ALGORITHMICALLY SINGULAR
0S MATRIX IS OUTPUT
0INVERSE COVARIANCE MATRIX SET TO RS*RMAT, WHERE S* IS A PSEUDO INVERSE OF S
 Elapsed covariance  time in seconds:     0.71
 Elapsed postprocess time in seconds:     0.02

 ********************               FIRST ORDER CONDITIONAL ESTIMATION WITH INTERACTION              ********************
 #OBJT:**************                       MINIMUM VALUE OF OBJECTIVE FUNCTION                      ********************
 #OBJV:********************************************      114.267       **************************************************

 ********************               FIRST ORDER CONDITIONAL ESTIMATION WITH INTERACTION              ********************
 ********************                             FINAL PARAMETER ESTIMATE                           ********************

 THETA - VECTOR OF FIXED EFFECTS PARAMETERS   *********
         TH 1      TH 2      TH 3      TH 4      TH 5
         5.00E-02  1.55E+00  2.84E+00  3.16E+01  6.19E+02

 OMEGA - COV MATRIX FOR RANDOM EFFECTS - ETAS  ********
         ETA1      ETA2      ETA3      ETA4
 ETA1
+        4.42E-01
 ETA2
+        0.00E+00  7.31E-02
 ETA3
+        0.00E+00  0.00E+00  1.74E-02
 ETA4
+        0.00E+00  0.00E+00  0.00E+00  3.00E-05

 SIGMA - COV MATRIX FOR RANDOM EFFECTS - EPSILONS  ****
         EPS1
 EPS1
+        4.73E-01

 OMEGA - CORR MATRIX FOR RANDOM EFFECTS - ETAS  *******
         ETA1      ETA2      ETA3      ETA4
 ETA1
+        6.65E-01
 ETA2
+        0.00E+00  2.70E-01
 ETA3
+        0.00E+00  0.00E+00  1.32E-01
 ETA4
+        0.00E+00  0.00E+00  0.00E+00  5.48E-03

 SIGMA - CORR MATRIX FOR RANDOM EFFECTS - EPSILONS  ***
         EPS1
 EPS1
+        6.88E-01

 ********************               FIRST ORDER CONDITIONAL ESTIMATION WITH INTERACTION              ********************
 ********************                            STANDARD ERROR OF ESTIMATE                          ********************

 THETA - VECTOR OF FIXED EFFECTS PARAMETERS   *********
         TH 1      TH 2      TH 3      TH 4      TH 5
         0.00E+00  3.16E-01  2.09E-01  1.40E+00  2.16E+02

 OMEGA - COV MATRIX FOR RANDOM EFFECTS - ETAS  ********
         ETA1      ETA2      ETA3      ETA4
 ETA1
+        2.43E-01
 ETA2
+       .........  3.32E-02
 ETA3
+       ......... .........  5.90E-03
 ETA4
+       ......... ......... .........  0.00E+00

 SIGMA - COV MATRIX FOR RANDOM EFFECTS - EPSILONS  ****
         EPS1
 EPS1
+        1.28E-01

 OMEGA - CORR MATRIX FOR RANDOM EFFECTS - ETAS  *******
         ETA1      ETA2      ETA3      ETA4
 ETA1
+        1.83E-01
 ETA2
+       .........  6.14E-02
 ETA3
+       ......... .........  2.24E-02
 ETA4
+       ......... ......... .........  0.00E+00

 SIGMA - CORR MATRIX FOR RANDOM EFFECTS - EPSILONS  ***
         EPS1
 EPS1
+        9.31E-02

 ********************               FIRST ORDER CONDITIONAL ESTIMATION WITH INTERACTION              ********************
 ********************                          COVARIANCE MATRIX OF ESTIMATE                         ********************

            TH 1      TH 2      TH 3      TH 4      TH 5      OM11      OM12      OM13      OM14      OM22      OM23      OM24
             OM33      OM34      OM44      SG11
 TH 1
+        0.00E+00
 TH 2
+        0.00E+00  9.96E-02
 TH 3
+        0.00E+00  9.52E-03  4.36E-02
 TH 4
+        0.00E+00  1.39E-02  1.55E-01  1.95E+00
 TH 5
+        0.00E+00  9.65E+00  4.16E+00  1.59E+02  4.68E+04
 OM11
+        0.00E+00  4.31E-02  6.51E-03 -1.08E-01 -8.67E+00  5.93E-02
 OM12
+       ......... ......... ......... ......... ......... ......... .........
 OM13
+       ......... ......... ......... ......... ......... ......... ......... .........
 OM14
+       ......... ......... ......... ......... ......... ......... ......... ......... .........
 OM22
+        0.00E+00 -2.38E-03 -2.39E-03 -1.34E-02 -4.12E+00 -1.71E-03 ......... ......... .........  1.10E-03
 OM23
+       ......... ......... ......... ......... ......... ......... ......... ......... ......... ......... .........
 OM24
+       ......... ......... ......... ......... ......... ......... ......... ......... ......... ......... ......... .........
 OM33
+        0.00E+00  1.18E-03  2.00E-04  3.88E-04 -2.57E-01  6.15E-04 ......... ......... .........  5.40E-05 ......... .........
          3.49E-05
 OM34
+       ......... ......... ......... ......... ......... ......... ......... ......... ......... ......... ......... .........
         ......... .........
 OM44
+        0.00E+00  0.00E+00  0.00E+00  0.00E+00  0.00E+00  0.00E+00 ......... ......... .........  0.00E+00 ......... .........
          0.00E+00 .........  0.00E+00
 SG11
+        0.00E+00 -2.41E-03 -5.23E-03 -1.26E-02 -5.45E+00 -1.26E-02 ......... ......... ......... -7.22E-04 ......... .........
         -2.57E-04 .........  0.00E+00  1.64E-02

 ********************               FIRST ORDER CONDITIONAL ESTIMATION WITH INTERACTION              ********************
 ********************                          CORRELATION MATRIX OF ESTIMATE                        ********************

            TH 1      TH 2      TH 3      TH 4      TH 5      OM11      OM12      OM13      OM14      OM22      OM23      OM24
             OM33      OM34      OM44      SG11
 TH 1
+        0.00E+00
 TH 2
+        0.00E+00  3.16E-01
 TH 3
+        0.00E+00  1.45E-01  2.09E-01
 TH 4
+        0.00E+00  3.15E-02  5.30E-01  1.40E+00
 TH 5
+        0.00E+00  1.41E-01  9.20E-02  5.25E-01  2.16E+02
 OM11
+        0.00E+00  5.61E-01  1.28E-01 -3.18E-01 -1.65E-01  2.43E-01
 OM12
+       ......... ......... ......... ......... ......... ......... .........
 OM13
+       ......... ......... ......... ......... ......... ......... ......... .........
 OM14
+       ......... ......... ......... ......... ......... ......... ......... ......... .........
 OM22
+        0.00E+00 -2.27E-01 -3.45E-01 -2.90E-01 -5.74E-01 -2.11E-01 ......... ......... .........  3.32E-02
 OM23
+       ......... ......... ......... ......... ......... ......... ......... ......... ......... ......... .........
 OM24
+       ......... ......... ......... ......... ......... ......... ......... ......... ......... ......... ......... .........
 OM33
+        0.00E+00  6.34E-01  1.62E-01  4.70E-02 -2.02E-01  4.28E-01 ......... ......... .........  2.75E-01 ......... .........
          5.90E-03
 OM34
+       ......... ......... ......... ......... ......... ......... ......... ......... ......... ......... ......... .........
         ......... .........
 OM44
+        0.00E+00  0.00E+00  0.00E+00  0.00E+00  0.00E+00  0.00E+00 ......... ......... .........  0.00E+00 ......... .........
          0.00E+00 .........  0.00E+00
 SG11
+        0.00E+00 -5.95E-02 -1.95E-01 -7.03E-02 -1.97E-01 -4.04E-01 ......... ......... ......... -1.70E-01 ......... .........
         -3.40E-01 .........  0.00E+00  1.28E-01
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
 ********************               FIRST ORDER CONDITIONAL ESTIMATION WITH INTERACTION              ********************
 ********************                      EIGENVALUES OF COR MATRIX OF ESTIMATE                     ********************

             1         2         3         4         5         6         7         8         9        10
         4.60E-02  1.59E-01  2.04E-01  8.36E-01  9.67E-01  1.00E+00  1.00E+00  1.22E+00  2.22E+00  2.35E+00
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 Elapsed finaloutput time in seconds:     0.05
 #CPUT: Total CPU Time in Seconds,        2.031
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