23.07.2025
13:59
$SIZES PD=-1000 LVR=-150 LTH=-200
$PROBLEM single pyDarwin individual, one among multitude
$INPUT ID TIME AMT DV
$DATA "D:\Users\selzer\Repos\GH\pyDarwinXploR\Datasets\Vera\darwin/dataset.csv" IGNORE=@
$SUBROUTINE ADVAN12 TRANS4
$PK
  CL = THETA(1) ; CL
  Ka = THETA(2) ; Ka
  ; V is not used ; V
  ; Q is not used ; Q
  V2 = THETA(3) * EXP(ETA(1))
  SC = V2/1000 ; V2
  V3 = THETA(4) * EXP(ETA(2)) ; V3
  Q3 = THETA(5) ; Q3
  Q4 = THETA(6) ; Q4
  V4 = THETA(7) ; V4
$ERROR
  IPRED = F
  Y = F *(1+EPS(1))
$SIGMA
  ;proportional error
  0.1	; EPS(1)
$THETA
  (0, 25) ; CL
  (0, 1) ; Ka
  ; V is not used
  ; Q is not used
  (0, 200) ; V2
  (0, 500) ; V3
  (0, 10) ; Q3
  (0, 8) ; Q4
  (0, 500) ; V4
$OMEGA

  ; V is not used
  ; Q is not used
  0.3  ; V2
  0.3  ; V3

  ; Q4 is not used
  ; V4 is not used
$EST METHOD = COND INTER NOABORT MAX = 999999
$TABLE ID TIME AMT DV PRED IPRED WRES CWRES FILE=results.tab NOPRINT NOAPPEND ONEHEADER
$COV UNCOND PRINT=E

;; Phenotype: ([('ADVAN', 2), ('CL_OMEGA', 0), ('Ka_OMEGA', 0), ('V2_OMEGA', 1), ('V3_OMEGA', 1), ('Q3_OMEGA', 0), ('RESERR', 0)])
;; Genotype: [2, 0, 0, 0, 0, 1, 1, 0, 0]
;; Num non-influential tokens: 2

NM-TRAN MESSAGES
 WARNINGS AND ERRORS (IF ANY) FOR PROBLEM    1
 (WARNING  2) NM-TRAN INFERS THAT THE DATA ARE POPULATION.

1NONLINEAR MIXED EFFECTS MODEL PROGRAM (NONMEM) VERSION 7.4.3
 ORIGINALLY DEVELOPED BY STUART BEAL, LEWIS SHEINER, AND ALISON BOECKMANN
 CURRENT DEVELOPERS ARE ROBERT BAUER, ICON DEVELOPMENT SOLUTIONS,
 AND ALISON BOECKMANN. IMPLEMENTATION, EFFICIENCY, AND STANDARDIZATION
 PERFORMED BY NOUS INFOSYSTEMS.
 PROBLEM NO.:         1
 single pyDarwin individual, one among multitude
 TOT. NO. OF OBS RECS:      179
 TOT. NO. OF INDIVIDUALS:       12
 THREE COMPARTMENT MODEL WITH FIRST-ORDER ABSORPTION (ADVAN12)
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 #TBLN:      1
 #METH: First Order Conditional Estimation with Interaction
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
0PRED EXIT CODE = 1
0INDIVIDUAL NO.       7   ID= 7.00000000000000E+00   (WITHIN-INDIVIDUAL) DATA REC NO.   2
 THETA=
  2.50E+01   1.00E+00   2.00E+02   5.00E+02   1.00E+01   8.00E+00   5.00E+02
 ETA=
  5.71E-02   2.23E-01
 OCCURS DURING SEARCH FOR ETA AT A NONZERO VALUE OF ETA
 KA, K32, OR K42 IS TOO CLOSE TO AN EIGENVALUE
0PROGRAM TERMINATED BY OBJ
 MESSAGE ISSUED FROM ESTIMATION STEP
 AT INITIAL OBJ. FUNCTION EVALUATION

 #TERM:

 TOTAL DATA POINTS NORMALLY DISTRIBUTED (N):           89
 N*LOG(2PI) CONSTANT TO OBJECTIVE FUNCTION:    163.57105891043173
 OBJECTIVE FUNCTION VALUE WITHOUT CONSTANT:   1.34078079299425971E+154
 OBJECTIVE FUNCTION VALUE WITH CONSTANT:      1.34078079299425971E+154
 REPORTED OBJECTIVE FUNCTION DOES NOT CONTAIN CONSTANT

 TOTAL EFFECTIVE ETAS (NIND*NETA):                            12


 #TERE:
 Elapsed estimation  time in seconds:     0.02
 #CPUT: Total CPU Time in Seconds,        0.078
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