23.07.2025
15:17
$SIZES PD=-1000 LVR=-150 LTH=-200
$PROBLEM single pyDarwin individual, one among multitude
$INPUT ID TIME AMT DV WT EVID MDV
$DATA "D:\Users\selzer\Repos\GH\pyDarwinXploR\Datasets\Theo/dataset.csv" IGNORE=@
$SUBROUTINE ADVAN2 TRANS2
$PK
  CL = THETA(1)*(WT/70)**(0.75) ; CL
  Ka = THETA(2) ; Ka
  V = THETA(3)*(WT/70)**(1)
  SC = V ; V
  ; Q is not used ; Q
  ; V2 is not used ; V2
  ; V3 is not used ; V3
  ; Q3 is not used ; Q3
  ; Q4 is not used ; Q4
  ; V4 is not used ; V4
$ERROR
  IPRED = F
  Y = F *(1+EPS(1))+EPS(2)
$SIGMA
  ;proportional error
  0.2	; EPS(1)
  ;additive error
  1	; EPS(2)
$THETA
  (0, 5) ; CL
  (0, 1) ; Ka
  (0, 50) ; V
  ; Q is not used
  ; V2 is not used
  ; V3 is not used
  ; Q3 is not used
  ; Q4 is not used
  ; V4 is not used
; empty $OMEGA

  ; Q is not used
  ; V2 is not used
  ; V3 is not used
  ; Q3 is not used
  ; Q4 is not used
  ; V4 is not used
$EST METHOD = COND INTER NOABORT MAX = 999999
$TABLE ID TIME AMT DV PRED IPRED WRES CWRES FILE=results.tab NOPRINT NOAPPEND ONEHEADER
$COV UNCOND PRINT=E

;; Phenotype: ([('ADVAN', 0), ('CL~WT', 2), ('V~WT', 1), ('CL_OMEGA', 0), ('Ka_OMEGA', 0), ('V_OMEGA', 0), ('RESERR', 1)])
;; Genotype: [0, 2, 1, 0, 0, 0, 0, 0, 0, 0, 1]
;; Num non-influential tokens: 4

NM-TRAN MESSAGES
 WARNINGS AND ERRORS (IF ANY) FOR PROBLEM    1
 (WARNING  132) SIGMA IS INTEPRETED AS RESIDUAL VARIANCE TO SINGLE SUBJECT ANALYSIS
 (WARNING  1) NM-TRAN INFERS THAT THE DATA ARE SINGLE-SUBJECT.
  NONMEM RUN CANNOT BE PARALLELIZED.
 AN ERROR WAS FOUND IN THE CONTROL STATEMENTS.
  350  $ESTIM: "METHOD=CONDITIONAL" INVALID WITH SINGLE-SUBJECT DATA.
OFV = 99999999
success = False
covariance = False
correlation = False
Condition # = 99999999
Num Non fixed THETAs = 0
Num Non fixed OMEGAs = 0
Num Non fixed SIGMAs = 0
Original run directory = D:\Users\selzer\Repos\GH\pyDarwinXploR\Datasets\Theo\temp\0\2316
