23.07.2025
15:24
$SIZES PD=-1000 LVR=-150 LTH=-200
$PROBLEM single pyDarwin individual, one among multitude
$INPUT ID TIME AMT DV WT EVID MDV
$DATA "D:\Users\selzer\Repos\GH\pyDarwinXploR\Datasets\Theo/dataset.csv" IGNORE=@
$SUBROUTINE ADVAN12 TRANS4
$PK
  CL = THETA(1)*(WT/70)**(1) * EXP(ETA(1)) ; CL
  Ka = THETA(2) * EXP(ETA(2)) ; Ka
  ; V is not used ; V
  ; Q is not used ; Q
  V2 = THETA(3)*(WT/70)**(1) * EXP(ETA(3))
  SC = V2 ; V2
  V3 = THETA(4) ; V3
  Q3 = THETA(5) ; Q3
  Q4 = THETA(6) ; Q4
  V4 = THETA(7) ; V4
$ERROR
  IPRED = F
  Y = F *(1+EPS(1))+EPS(2)
$SIGMA
  ;proportional error
  0.2	; EPS(1)
  ;additive error
  1	; EPS(2)
$THETA
  (0, 5) ; CL
  (0, 1) ; Ka
  ; V is not used
  ; Q is not used
  (0, 50) ; V2
  (0, 80) ; V3
  (0, 6) ; Q3
  (0, 1) ; Q4
  (0, 200) ; V4
$OMEGA
  0.3  ; CL
  0.3  ; Ka
  ; V is not used
  ; Q is not used
  0.3  ; V2

  ; Q4 is not used
  ; V4 is not used
$EST METHOD = COND INTER NOABORT MAX = 999999
$TABLE ID TIME AMT DV PRED IPRED WRES CWRES FILE=results.tab NOPRINT NOAPPEND ONEHEADER
$COV UNCOND PRINT=E

;; Phenotype: ([('ADVAN', 2), ('CL~WT', 1), ('V~WT', 1), ('CL_OMEGA', 1), ('Ka_OMEGA', 1), ('V2_OMEGA', 1), ('V3_OMEGA', 0), ('Q3_OMEGA', 0), ('RESERR', 1)])
;; Genotype: [2, 1, 1, 1, 1, 0, 0, 1, 0, 0, 1]
;; Num non-influential tokens: 2

NM-TRAN MESSAGES
 WARNINGS AND ERRORS (IF ANY) FOR PROBLEM    1
 (WARNING  2) NM-TRAN INFERS THAT THE DATA ARE POPULATION.

1NONLINEAR MIXED EFFECTS MODEL PROGRAM (NONMEM) VERSION 7.4.3
 ORIGINALLY DEVELOPED BY STUART BEAL, LEWIS SHEINER, AND ALISON BOECKMANN
 CURRENT DEVELOPERS ARE ROBERT BAUER, ICON DEVELOPMENT SOLUTIONS,
 AND ALISON BOECKMANN. IMPLEMENTATION, EFFICIENCY, AND STANDARDIZATION
 PERFORMED BY NOUS INFOSYSTEMS.
 PROBLEM NO.:         1
 single pyDarwin individual, one among multitude
 TOT. NO. OF OBS RECS:      132
 TOT. NO. OF INDIVIDUALS:       12
 THREE COMPARTMENT MODEL WITH FIRST-ORDER ABSORPTION (ADVAN12)
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 #TBLN:      1
 #METH: First Order Conditional Estimation with Interaction
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
 #TERM:
0MINIMIZATION TERMINATED
 DUE TO PROXIMITY OF NEXT ITERATION EST. TO A VALUE
 AT WHICH THE OBJ. FUNC. IS INFINITE
0AT THE LAST COMPUTED INFINITE VALUE OF THE OBJ. FUNCT.:

0PRED EXIT CODE = 1
0INDIVIDUAL NO.       1   ID= 1.00000000000000E+00   (WITHIN-INDIVIDUAL) DATA REC NO.   3
 THETA=
  2.80E+00   1.33E+00   2.97E+01   8.00E-01   3.96E-01   9.91E-01   2.00E+00
 ETA=
 -6.65E-01   1.22E-01  -1.69E-01
 KA, K32, OR K42 IS TOO CLOSE TO AN EIGENVALUE

 NO. OF FUNCTION EVALUATIONS USED:     1095
 NO. OF SIG. DIGITS UNREPORTABLE
0PARAMETER ESTIMATE IS NEAR ITS BOUNDARY

 ETABAR IS THE ARITHMETIC MEAN OF THE ETA-ESTIMATES,
 AND THE P-VALUE IS GIVEN FOR THE NULL HYPOTHESIS THAT THE TRUE MEAN IS 0.

 ETABAR:         1.6695E-03 -1.1899E-02 -5.1379E-03
 SE:             7.3393E-02  1.7709E-01  2.8652E-02
 N:                      12          12          12

 P VAL.:         9.8185E-01  9.4643E-01  8.5768E-01

 ETASHRINKSD(%)  7.9271E-01  1.5727E+00  1.8297E+01
 ETASHRINKVR(%)  1.5791E+00  3.1208E+00  3.3246E+01
 EBVSHRINKSD(%)  4.5005E+00  4.0035E+00  2.1817E+01
 EBVSHRINKVR(%)  8.7985E+00  7.8467E+00  3.8874E+01
 EPSSHRINKSD(%)  1.0506E+01  1.1384E+01
 EPSSHRINKVR(%)  1.9908E+01  2.1472E+01


 TOTAL DATA POINTS NORMALLY DISTRIBUTED (N):          132
 N*LOG(2PI) CONSTANT TO OBJECTIVE FUNCTION:    242.59977276603360
 OBJECTIVE FUNCTION VALUE WITHOUT CONSTANT:    101.06873928308374
 OBJECTIVE FUNCTION VALUE WITH CONSTANT:       343.66851204911734
 REPORTED OBJECTIVE FUNCTION DOES NOT CONTAIN CONSTANT

 TOTAL EFFECTIVE ETAS (NIND*NETA):                            36


 #TERE:
 Elapsed estimation  time in seconds:     4.21
0S MATRIX ALGORITHMICALLY SINGULAR
0S MATRIX IS OUTPUT
0INVERSE COVARIANCE MATRIX SET TO RS*RMAT, WHERE S* IS A PSEUDO INVERSE OF S
 Elapsed covariance  time in seconds:     2.07
 Elapsed postprocess time in seconds:     0.02

 ********************               FIRST ORDER CONDITIONAL ESTIMATION WITH INTERACTION              ********************
 #OBJT:**************                       MINIMUM VALUE OF OBJECTIVE FUNCTION                      ********************
 #OBJV:********************************************      101.069       **************************************************

 ********************               FIRST ORDER CONDITIONAL ESTIMATION WITH INTERACTION              ********************
 ********************                             FINAL PARAMETER ESTIMATE                           ********************

 THETA - VECTOR OF FIXED EFFECTS PARAMETERS   *********
         TH 1      TH 2      TH 3      TH 4      TH 5      TH 6      TH 7
         2.80E+00  1.33E+00  2.97E+01  8.00E-01  3.97E-01  9.91E-01  2.00E+00

 OMEGA - COV MATRIX FOR RANDOM EFFECTS - ETAS  ********
         ETA1      ETA2      ETA3
 ETA1
+        7.16E-02
 ETA2
+        0.00E+00  4.24E-01
 ETA3
+        0.00E+00  0.00E+00  1.61E-02

 SIGMA - COV MATRIX FOR RANDOM EFFECTS - EPSILONS  ****
         EPS1      EPS2
 EPS1
+        1.62E-02
 EPS2
+        0.00E+00  8.32E-02

 OMEGA - CORR MATRIX FOR RANDOM EFFECTS - ETAS  *******
         ETA1      ETA2      ETA3
 ETA1
+        2.68E-01
 ETA2
+        0.00E+00  6.51E-01
 ETA3
+        0.00E+00  0.00E+00  1.27E-01

 SIGMA - CORR MATRIX FOR RANDOM EFFECTS - EPSILONS  ***
         EPS1      EPS2
 EPS1
+        1.27E-01
 EPS2
+        0.00E+00  2.88E-01

 ********************               FIRST ORDER CONDITIONAL ESTIMATION WITH INTERACTION              ********************
 ********************                            STANDARD ERROR OF ESTIMATE                          ********************

 THETA - VECTOR OF FIXED EFFECTS PARAMETERS   *********
         TH 1      TH 2      TH 3      TH 4      TH 5      TH 6      TH 7
         2.44E-01  2.71E-01  1.34E+00  0.00E+00  6.12E-02  2.17E-02  0.00E+00

 OMEGA - COV MATRIX FOR RANDOM EFFECTS - ETAS  ********
         ETA1      ETA2      ETA3
 ETA1
+        4.62E-02
 ETA2
+       .........  2.34E-01
 ETA3
+       ......... .........  8.19E-03

 SIGMA - COV MATRIX FOR RANDOM EFFECTS - EPSILONS  ****
         EPS1      EPS2
 EPS1
+        1.18E-02
 EPS2
+       .........  1.12E-01

 OMEGA - CORR MATRIX FOR RANDOM EFFECTS - ETAS  *******
         ETA1      ETA2      ETA3
 ETA1
+        8.62E-02
 ETA2
+       .........  1.80E-01
 ETA3
+       ......... .........  3.23E-02

 SIGMA - CORR MATRIX FOR RANDOM EFFECTS - EPSILONS  ***
         EPS1      EPS2
 EPS1
+        4.62E-02
 EPS2
+       .........  1.94E-01

 ********************               FIRST ORDER CONDITIONAL ESTIMATION WITH INTERACTION              ********************
 ********************                          COVARIANCE MATRIX OF ESTIMATE                         ********************

            TH 1      TH 2      TH 3      TH 4      TH 5      TH 6      TH 7      OM11      OM12      OM13      OM22      OM23
             OM33      SG11      SG12      SG22
 TH 1
+        5.95E-02
 TH 2
+       -1.29E-02  7.33E-02
 TH 3
+        2.44E-01  1.77E-02  1.80E+00
 TH 4
+        0.00E+00  0.00E+00  0.00E+00  0.00E+00
 TH 5
+       -3.32E-03  1.12E-02 -6.87E-03  0.00E+00  3.75E-03
 TH 6
+       -2.40E-03  3.68E-03 -2.93E-03  0.00E+00  1.15E-03  4.71E-04
 TH 7
+        0.00E+00  0.00E+00  0.00E+00  0.00E+00  0.00E+00  0.00E+00  0.00E+00
 OM11
+       -8.84E-03  2.82E-03 -1.88E-02  0.00E+00  2.95E-05  3.86E-04  0.00E+00  2.13E-03
 OM12
+       ......... ......... ......... ......... ......... ......... ......... ......... .........
 OM13
+       ......... ......... ......... ......... ......... ......... ......... ......... ......... .........
 OM22
+       -7.78E-03  3.82E-02 -6.90E-02  0.00E+00  3.28E-03  1.04E-03  0.00E+00 -4.66E-04 ......... .........  5.49E-02
 OM23
+       ......... ......... ......... ......... ......... ......... ......... ......... ......... ......... ......... .........
 OM33
+       -5.11E-04  1.07E-03  2.00E-03  0.00E+00  7.73E-06  6.83E-05  0.00E+00  2.34E-04 ......... .........  6.30E-04 .........
          6.71E-05
 SG11
+        2.03E-03 -3.92E-04  5.15E-03  0.00E+00 -2.34E-05 -1.29E-04  0.00E+00 -4.23E-04 ......... ......... -4.74E-04 .........
         -6.59E-05  1.39E-04
 SG12
+       ......... ......... ......... ......... ......... ......... ......... ......... ......... ......... ......... .........
         ......... ......... .........
 SG22
+       -2.24E-02 -7.13E-04 -7.42E-02  0.00E+00 -6.00E-04  8.27E-04  0.00E+00  4.67E-03 ......... ......... -2.26E-03 .........
          4.70E-04 -1.18E-03 .........  1.25E-02

 ********************               FIRST ORDER CONDITIONAL ESTIMATION WITH INTERACTION              ********************
 ********************                          CORRELATION MATRIX OF ESTIMATE                        ********************

            TH 1      TH 2      TH 3      TH 4      TH 5      TH 6      TH 7      OM11      OM12      OM13      OM22      OM23
             OM33      SG11      SG12      SG22
 TH 1
+        2.44E-01
 TH 2
+       -1.96E-01  2.71E-01
 TH 3
+        7.44E-01  4.87E-02  1.34E+00
 TH 4
+        0.00E+00  0.00E+00  0.00E+00  0.00E+00
 TH 5
+       -2.22E-01  6.76E-01 -8.36E-02  0.00E+00  6.12E-02
 TH 6
+       -4.54E-01  6.26E-01 -1.01E-01  0.00E+00  8.66E-01  2.17E-02
 TH 7
+        0.00E+00  0.00E+00  0.00E+00  0.00E+00  0.00E+00  0.00E+00  0.00E+00
 OM11
+       -7.85E-01  2.26E-01 -3.03E-01  0.00E+00  1.04E-02  3.86E-01  0.00E+00  4.62E-02
 OM12
+       ......... ......... ......... ......... ......... ......... ......... ......... .........
 OM13
+       ......... ......... ......... ......... ......... ......... ......... ......... ......... .........
 OM22
+       -1.36E-01  6.02E-01 -2.19E-01  0.00E+00  2.28E-01  2.05E-01  0.00E+00 -4.30E-02 ......... .........  2.34E-01
 OM23
+       ......... ......... ......... ......... ......... ......... ......... ......... ......... ......... ......... .........
 OM33
+       -2.56E-01  4.84E-01  1.82E-01  0.00E+00  1.54E-02  3.84E-01  0.00E+00  6.20E-01 ......... .........  3.28E-01 .........
          8.19E-03
 SG11
+        7.05E-01 -1.23E-01  3.25E-01  0.00E+00 -3.24E-02 -5.05E-01  0.00E+00 -7.78E-01 ......... ......... -1.72E-01 .........
         -6.83E-01  1.18E-02
 SG12
+       ......... ......... ......... ......... ......... ......... ......... ......... ......... ......... ......... .........
         ......... ......... .........
 SG22
+       -8.20E-01 -2.35E-02 -4.94E-01  0.00E+00 -8.76E-02  3.41E-01  0.00E+00  9.04E-01 ......... ......... -8.60E-02 .........
          5.13E-01 -8.96E-01 .........  1.12E-01
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
 ********************               FIRST ORDER CONDITIONAL ESTIMATION WITH INTERACTION              ********************
 ********************                      EIGENVALUES OF COR MATRIX OF ESTIMATE                     ********************

             1         2         3         4         5         6         7         8         9        10        11        12
         9.92E-06  2.20E-03  3.18E-02  4.04E-02  1.07E-01  3.82E-01  1.00E+00  1.00E+00  1.07E+00  1.44E+00  2.42E+00  4.51E+00
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 Elapsed finaloutput time in seconds:     0.04
 #CPUT: Total CPU Time in Seconds,        6.406
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