25.06.2025
04:13
$SIZES PD=-1000 LVR=-150 LTH=-200
$PROBLEM single pyDarwin individual, one among multitude
$INPUT ID TIME DV AMT EVID MDV CMT WT DROP
$DATA "../../../dataset.csv" IGNORE=@
$SUBROUTINE ADVAN2 TRANS2
$PK
  CL = THETA(1)  * EXP(ETA(1)) ; CL
  Ka = THETA(2) ; Ka
  V = THETA(3) *(WT/70)**(THETA(4)) * EXP(ETA(2))
  SC = V ; V
  ; Q is not used ; Q
  ; V2 is not used ; V2
  ; V3 is not used ; V3
  ; Q3 is not used ; Q3
  ; Q4 is not used ; Q4
  ; V4 is not used ; V4
$ERROR
  IPRED = F
  Y = F *(1+EPS(1))+EPS(2)
$SIGMA
  ;proportional error
  0.015	; EPS(1)
  ;additive error
  0.01	; EPS(2)
$THETA
  (0, 2) ; CL

  (0, 1) ; Ka
  (0, 25) ; V
  (0.5); V~WT
  ; Q is not used
  ; V2 is not used
  ; V3 is not used
  ; Q3 is not used
  ; Q4 is not used
  ; V4 is not used
$OMEGA
  0.1  ; CL
  ; Ka is not used
  0.1  ; V
  ; Q is not used
  ; V2 is not used
  ; V3 is not used
  ; Q3 is not used
  ; Q4 is not used
  ; V4 is not used
$EST METHOD = COND INTER NOABORT MAX = 999999
$COV UNCOND PRINT=E

;; Phenotype: ([('ADVAN', 0), ('CL~WT', 0), ('CL_OMEGA', 1), ('V~WT', 1), ('V_OMEGA', 1), ('RESERR', 1)])
;; Genotype: [0, 0, 1, 1, 1, 0, 0, 0, 1]
;; Num non-influential tokens: 3

NM-TRAN MESSAGES
 WARNINGS AND ERRORS (IF ANY) FOR PROBLEM    1
 (WARNING  2) NM-TRAN INFERS THAT THE DATA ARE POPULATION.
 (DATA WARNING   5) RECORD         3, DATA ITEM   3, CONTENTS: 1.30815810101475
 THE DV DATA ITEM IS POSITIVE, BUT THE MDV DATA ITEM IS 1
 (DATA WARNING   5) RECORD         4, DATA ITEM   3, CONTENTS: 1.07131481058561
 THE DV DATA ITEM IS POSITIVE, BUT THE MDV DATA ITEM IS 1
 * THE MAXIMUM NUMBER OF WARNINGS OF ONE OR MORE TYPES WAS REACHED.
 IT IS POSSIBLE THAT SOME WARNING MESSAGES WERE SUPPRESSED.
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
1NONLINEAR MIXED EFFECTS MODEL PROGRAM (NONMEM) VERSION 7.4.3
 ORIGINALLY DEVELOPED BY STUART BEAL, LEWIS SHEINER, AND ALISON BOECKMANN
 CURRENT DEVELOPERS ARE ROBERT BAUER, ICON DEVELOPMENT SOLUTIONS,
 AND ALISON BOECKMANN. IMPLEMENTATION, EFFICIENCY, AND STANDARDIZATION
 PERFORMED BY NOUS INFOSYSTEMS.
 PROBLEM NO.:         1
 single pyDarwin individual, one among multitude
 TOT. NO. OF OBS RECS:       60
 TOT. NO. OF INDIVIDUALS:       10
 ONE COMPARTMENT MODEL WITH FIRST-ORDER ABSORPTION (ADVAN2)
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 #TBLN:      1
 #METH: First Order Conditional Estimation with Interaction
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
 #TERM:
0MINIMIZATION TERMINATED
 DUE TO PROXIMITY OF LAST ITERATION EST. TO A VALUE
 AT WHICH THE OBJ. FUNC. IS INFINITE (ERROR=136)
0AT THE LAST COMPUTED INFINITE VALUE OF THE OBJ. FUNCT.:

0PRED EXIT CODE = 1
0INDIVIDUAL NO.       1   ID= 1.00000000000000E+00   (WITHIN-INDIVIDUAL) DATA REC NO.   2
 THETA=
  4.35E+00  +Infinity   5.33E+01  -3.28E-01
 OCCURS DURING SEARCH FOR ETA AT INITIAL VALUE, ETA=0
 F OR DERIVATIVE RETURNED BY PRED IS INFINITE (INF) OR NOT A NUMBER (NAN).

 NO. OF FUNCTION EVALUATIONS USED:      521
 NO. OF SIG. DIGITS UNREPORTABLE
0PARAMETER ESTIMATE IS NEAR ITS BOUNDARY

 ETABAR IS THE ARITHMETIC MEAN OF THE ETA-ESTIMATES,
 AND THE P-VALUE IS GIVEN FOR THE NULL HYPOTHESIS THAT THE TRUE MEAN IS 0.

 ETABAR:        -4.3896E-03 -7.7653E-03
 SE:             1.0143E-01  3.1577E-02
 N:                      10          10

 P VAL.:         9.6548E-01  8.0575E-01

 ETASHRINKSD(%)  4.2712E-01  2.5906E+01
 ETASHRINKVR(%)  8.5242E-01  4.5101E+01
 EBVSHRINKSD(%)  4.7590E+00  3.0198E+01
 EBVSHRINKVR(%)  9.2915E+00  5.1277E+01
 EPSSHRINKSD(%)  1.2340E+01  1.2340E+01
 EPSSHRINKVR(%)  2.3157E+01  2.3157E+01


 TOTAL DATA POINTS NORMALLY DISTRIBUTED (N):           60
 N*LOG(2PI) CONSTANT TO OBJECTIVE FUNCTION:    110.27262398456072
 OBJECTIVE FUNCTION VALUE WITHOUT CONSTANT:   -148.98610521467810
 OBJECTIVE FUNCTION VALUE WITH CONSTANT:      -38.713481230117381
 REPORTED OBJECTIVE FUNCTION DOES NOT CONTAIN CONSTANT

 TOTAL EFFECTIVE ETAS (NIND*NETA):                            20


 #TERE:
 Elapsed estimation  time in seconds:     0.50
0ERROR RMATX-  1
 Elapsed covariance  time in seconds:     0.04

 ********************               FIRST ORDER CONDITIONAL ESTIMATION WITH INTERACTION              ********************
 #OBJT:**************                       MINIMUM VALUE OF OBJECTIVE FUNCTION                      ********************
 #OBJV:********************************************     -148.986       **************************************************

 ********************               FIRST ORDER CONDITIONAL ESTIMATION WITH INTERACTION              ********************
 ********************                             FINAL PARAMETER ESTIMATE                           ********************

 THETA - VECTOR OF FIXED EFFECTS PARAMETERS   *********
         TH 1      TH 2      TH 3      TH 4
         4.35E+00  1.3E+308  5.33E+01 -3.28E-01

 OMEGA - COV MATRIX FOR RANDOM EFFECTS - ETAS  ********
         ETA1      ETA2
 ETA1
+        1.15E-01
 ETA2
+        0.00E+00  2.02E-02

 SIGMA - COV MATRIX FOR RANDOM EFFECTS - EPSILONS  ****
         EPS1      EPS2
 EPS1
+        1.50E-06
 EPS2
+        0.00E+00  1.81E-02

 OMEGA - CORR MATRIX FOR RANDOM EFFECTS - ETAS  *******
         ETA1      ETA2
 ETA1
+        3.40E-01
 ETA2
+        0.00E+00  1.42E-01

 SIGMA - CORR MATRIX FOR RANDOM EFFECTS - EPSILONS  ***
         EPS1      EPS2
 EPS1
+        1.22E-03
 EPS2
+        0.00E+00  1.34E-01
 #CPUT: Total CPU Time in Seconds,        0.578
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