25.06.2025
21:37
$SIZES PD=-1000 LVR=-150 LTH=-200
$PROBLEM single pyDarwin individual, one among multitude
$INPUT ID TIME DV AMT EVID MDV CMT WT DROP
$DATA "../../../dataset.csv" IGNORE=@
$SUBROUTINE ADVAN2 TRANS2
$PK
  CL = THETA(1) *(WT/70)**(THETA(2)) * EXP(ETA(1)) ; CL
  Ka = THETA(3) ; Ka
  V = THETA(4) *(WT/70)**(THETA(5)) * EXP(ETA(2))
  SC = V ; V
  ; Q is not used ; Q
  ; V2 is not used ; V2
  ; V3 is not used ; V3
  ; Q3 is not used ; Q3
  ; Q4 is not used ; Q4
  ; V4 is not used ; V4
$ERROR
  IPRED = F
  Y = F *(1+EPS(1))+EPS(2)
$SIGMA
  ;proportional error
  0.015	; EPS(1)
  ;additive error
  0.01	; EPS(2)
$THETA
  (0, 2) ; CL
  (0.5); CL~WT
  (0, 1) ; Ka
  (0, 25) ; V
  (0.5); V~WT
  ; Q is not used
  ; V2 is not used
  ; V3 is not used
  ; Q3 is not used
  ; Q4 is not used
  ; V4 is not used
$OMEGA
  0.1  ; CL
  ; Ka is not used
  0.1  ; V
  ; Q is not used
  ; V2 is not used
  ; V3 is not used
  ; Q3 is not used
  ; Q4 is not used
  ; V4 is not used
$EST METHOD = COND INTER NOABORT MAX = 999999
$COV UNCOND PRINT=E

;; Phenotype: ([('ADVAN', 0), ('CL~WT', 1), ('CL_OMEGA', 1), ('V~WT', 1), ('V_OMEGA', 1), ('RESERR', 1)])
;; Genotype: [0, 1, 1, 1, 1, 0, 0, 0, 1]
;; Num non-influential tokens: 3

NM-TRAN MESSAGES
 WARNINGS AND ERRORS (IF ANY) FOR PROBLEM    1
 (WARNING  2) NM-TRAN INFERS THAT THE DATA ARE POPULATION.
 (DATA WARNING   5) RECORD         5, DATA ITEM   3, CONTENTS: 0.399445285143881
 THE DV DATA ITEM IS POSITIVE, BUT THE MDV DATA ITEM IS 1
 (DATA WARNING   5) RECORD         6, DATA ITEM   3, CONTENTS: 0.24778047320258
 THE DV DATA ITEM IS POSITIVE, BUT THE MDV DATA ITEM IS 1
 * THE MAXIMUM NUMBER OF WARNINGS OF ONE OR MORE TYPES WAS REACHED.
 IT IS POSSIBLE THAT SOME WARNING MESSAGES WERE SUPPRESSED.
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
1NONLINEAR MIXED EFFECTS MODEL PROGRAM (NONMEM) VERSION 7.4.3
 ORIGINALLY DEVELOPED BY STUART BEAL, LEWIS SHEINER, AND ALISON BOECKMANN
 CURRENT DEVELOPERS ARE ROBERT BAUER, ICON DEVELOPMENT SOLUTIONS,
 AND ALISON BOECKMANN. IMPLEMENTATION, EFFICIENCY, AND STANDARDIZATION
 PERFORMED BY NOUS INFOSYSTEMS.
 PROBLEM NO.:         1
 single pyDarwin individual, one among multitude
 TOT. NO. OF OBS RECS:       30
 TOT. NO. OF INDIVIDUALS:       10
 ONE COMPARTMENT MODEL WITH FIRST-ORDER ABSORPTION (ADVAN2)
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 #TBLN:      1
 #METH: First Order Conditional Estimation with Interaction
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
 #TERM:
0MINIMIZATION TERMINATED
 DUE TO ROUNDING ERRORS (ERROR=134)
 NO. OF FUNCTION EVALUATIONS USED:      701
 NO. OF SIG. DIGITS UNREPORTABLE
0PARAMETER ESTIMATE IS NEAR ITS BOUNDARY

 ETABAR IS THE ARITHMETIC MEAN OF THE ETA-ESTIMATES,
 AND THE P-VALUE IS GIVEN FOR THE NULL HYPOTHESIS THAT THE TRUE MEAN IS 0.

 ETABAR:        -1.3639E-03 -4.9128E-06
 SE:             5.7152E-02  1.2531E-05
 N:                      10          10

 P VAL.:         9.8096E-01  6.9501E-01

 ETASHRINKSD(%)  5.4758E+00  9.8679E+01
 ETASHRINKVR(%)  1.0652E+01  9.9983E+01
 EBVSHRINKSD(%)  1.1031E+01  9.8178E+01
 EBVSHRINKVR(%)  2.0846E+01  9.9967E+01
 EPSSHRINKSD(%)  1.4453E+01  1.4453E+01
 EPSSHRINKVR(%)  2.6816E+01  2.6816E+01


 TOTAL DATA POINTS NORMALLY DISTRIBUTED (N):           30
 N*LOG(2PI) CONSTANT TO OBJECTIVE FUNCTION:    55.136311992280362
 OBJECTIVE FUNCTION VALUE WITHOUT CONSTANT:   -92.445862574208903
 OBJECTIVE FUNCTION VALUE WITH CONSTANT:      -37.309550581928541
 REPORTED OBJECTIVE FUNCTION DOES NOT CONTAIN CONSTANT

 TOTAL EFFECTIVE ETAS (NIND*NETA):                            20


 #TERE:
 Elapsed estimation  time in seconds:     0.38
0S MATRIX ALGORITHMICALLY SINGULAR
0S MATRIX IS OUTPUT
0INVERSE COVARIANCE MATRIX SET TO RS*RMAT, WHERE S* IS A PSEUDO INVERSE OF S
 Elapsed covariance  time in seconds:     0.16
 Elapsed postprocess time in seconds:     0.00

 ********************               FIRST ORDER CONDITIONAL ESTIMATION WITH INTERACTION              ********************
 #OBJT:**************                       MINIMUM VALUE OF OBJECTIVE FUNCTION                      ********************
 #OBJV:********************************************      -92.446       **************************************************

 ********************               FIRST ORDER CONDITIONAL ESTIMATION WITH INTERACTION              ********************
 ********************                             FINAL PARAMETER ESTIMATE                           ********************

 THETA - VECTOR OF FIXED EFFECTS PARAMETERS   *********
         TH 1      TH 2      TH 3      TH 4      TH 5
         4.26E+00  3.65E-01  8.03E+08  4.23E+01 -4.25E-01

 OMEGA - COV MATRIX FOR RANDOM EFFECTS - ETAS  ********
         ETA1      ETA2
 ETA1
+        4.06E-02
 ETA2
+        0.00E+00  1.00E-05

 SIGMA - COV MATRIX FOR RANDOM EFFECTS - EPSILONS  ****
         EPS1      EPS2
 EPS1
+        2.77E-03
 EPS2
+        0.00E+00  8.35E-03

 OMEGA - CORR MATRIX FOR RANDOM EFFECTS - ETAS  *******
         ETA1      ETA2
 ETA1
+        2.02E-01
 ETA2
+        0.00E+00  3.16E-03

 SIGMA - CORR MATRIX FOR RANDOM EFFECTS - EPSILONS  ***
         EPS1      EPS2
 EPS1
+        5.26E-02
 EPS2
+        0.00E+00  9.14E-02

 ********************               FIRST ORDER CONDITIONAL ESTIMATION WITH INTERACTION              ********************
 ********************                            STANDARD ERROR OF ESTIMATE                          ********************

 THETA - VECTOR OF FIXED EFFECTS PARAMETERS   *********
         TH 1      TH 2      TH 3      TH 4      TH 5
         3.27E-01  4.20E-01  2.67E+10  2.56E+00  3.09E-01

 OMEGA - COV MATRIX FOR RANDOM EFFECTS - ETAS  ********
         ETA1      ETA2
 ETA1
+        2.78E-02
 ETA2
+       .........  0.00E+00

 SIGMA - COV MATRIX FOR RANDOM EFFECTS - EPSILONS  ****
         EPS1      EPS2
 EPS1
+        7.07E-03
 EPS2
+       .........  2.64E-03

 OMEGA - CORR MATRIX FOR RANDOM EFFECTS - ETAS  *******
         ETA1      ETA2
 ETA1
+        6.91E-02
 ETA2
+       .........  0.00E+00

 SIGMA - CORR MATRIX FOR RANDOM EFFECTS - EPSILONS  ***
         EPS1      EPS2
 EPS1
+        6.72E-02
 EPS2
+       .........  1.44E-02

 ********************               FIRST ORDER CONDITIONAL ESTIMATION WITH INTERACTION              ********************
 ********************                          COVARIANCE MATRIX OF ESTIMATE                         ********************

            TH 1      TH 2      TH 3      TH 4      TH 5      OM11      OM12      OM22      SG11      SG12      SG22
 TH 1
+        1.07E-01
 TH 2
+        9.25E-02  1.77E-01
 TH 3
+        5.66E+09  8.92E+09  7.12E+20
 TH 4
+        5.59E-01  5.16E-01  4.58E+10  6.54E+00
 TH 5
+        5.29E-02  7.21E-02  7.75E+09  4.75E-01  9.57E-02
 OM11
+       -2.75E-03  3.17E-05 -2.57E+08 -4.09E-02 -3.77E-03  7.76E-04
 OM12
+       ......... ......... ......... ......... ......... ......... .........
 OM22
+        0.00E+00  0.00E+00  0.00E+00  0.00E+00  0.00E+00  0.00E+00 .........  0.00E+00
 SG11
+        1.23E-03  1.25E-03  1.05E+08  1.30E-02  1.17E-03 -1.44E-04 .........  0.00E+00  5.00E-05
 SG12
+       ......... ......... ......... ......... ......... ......... ......... ......... ......... .........
 SG22
+       -1.90E-04 -2.48E-04 -5.07E+06  1.53E-03 -8.23E-05 -1.20E-05 .........  0.00E+00 -5.50E-06 .........  6.97E-06

 ********************               FIRST ORDER CONDITIONAL ESTIMATION WITH INTERACTION              ********************
 ********************                          CORRELATION MATRIX OF ESTIMATE                        ********************

            TH 1      TH 2      TH 3      TH 4      TH 5      OM11      OM12      OM22      SG11      SG12      SG22
 TH 1
+        3.27E-01
 TH 2
+        6.73E-01  4.20E-01
 TH 3
+        6.48E-01  7.96E-01  2.67E+10
 TH 4
+        6.68E-01  4.80E-01  6.72E-01  2.56E+00
 TH 5
+        5.23E-01  5.54E-01  9.39E-01  6.00E-01  3.09E-01
 OM11
+       -3.02E-01  2.71E-03 -3.46E-01 -5.75E-01 -4.37E-01  2.78E-02
 OM12
+       ......... ......... ......... ......... ......... ......... .........
 OM22
+        0.00E+00  0.00E+00  0.00E+00  0.00E+00  0.00E+00  0.00E+00 .........  0.00E+00
 SG11
+        5.30E-01  4.22E-01  5.55E-01  7.17E-01  5.35E-01 -7.32E-01 .........  0.00E+00  7.07E-03
 SG12
+       ......... ......... ......... ......... ......... ......... ......... ......... ......... .........
 SG22
+       -2.20E-01 -2.24E-01 -7.20E-02  2.27E-01 -1.01E-01 -1.63E-01 .........  0.00E+00 -2.94E-01 .........  2.64E-03
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
 ********************               FIRST ORDER CONDITIONAL ESTIMATION WITH INTERACTION              ********************
 ********************                      EIGENVALUES OF COR MATRIX OF ESTIMATE                     ********************

             1         2         3         4         5         6         7         8         9
         5.07E-08  1.36E-02  1.99E-01  2.95E-01  6.01E-01  1.00E+00  1.03E+00  1.45E+00  4.42E+00
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 Elapsed finaloutput time in seconds:     0.02
 #CPUT: Total CPU Time in Seconds,        0.578
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