29.06.2025
19:10
$SIZES PD=-1000 LVR=-150 LTH=-200
$PROBLEM single pyDarwin individual, one among multitude
$INPUT ID TIME DV AMT EVID MDV CMT WT DROP
$DATA "../../../dataset.csv" IGNORE=@
$SUBROUTINE ADVAN4 TRANS4
$PK
  CL = THETA(1) *(WT/70)**(THETA(2)) ; CL
  Ka = THETA(3) ; Ka
  ; V is not used ; V
  Q = THETA(4) ; Q
  V2 = THETA(5) *(WT/70)**(THETA(6))
  SC = V2 ; V2
  V3 = THETA(7)  ; V3
  ; Q3 is not used ; Q3
  ; Q4 is not used ; Q4
  ; V4 is not used ; V4
$ERROR
  IPRED = F
  Y = F *(1+EPS(1))+EPS(2)
$SIGMA
  ;proportional error
  0.015	; EPS(1)
  ;additive error
  0.01	; EPS(2)
$THETA
  (0, 2) ; CL
  (0.5); CL~WT
  (0, 1) ; Ka
  ; V is not used
  (0, 25) ; Q
  (0, 5) ; V2
  (0.5); V2~WT
  (0, 1) ; V3
  ; Q3 is not used
  ; Q4 is not used
  ; V4 is not used
; empty $OMEGA

  ; Ka is not used
  ; V is not used
  ; Q is not used

  ; Q3 is not used
  ; Q4 is not used
  ; V4 is not used
$EST METHOD = COND INTER NOABORT MAX = 999999
$COV UNCOND PRINT=E

;; Phenotype: ([('ADVAN', 1), ('CL~WT', 1), ('CL_OMEGA', 0), ('V2~WT', 1), ('V2_OMEGA', 0), ('V3_OMEGA', 0), ('RESERR', 1)])
;; Genotype: [1, 1, 0, 0, 0, 1, 0, 0, 1]
;; Num non-influential tokens: 2

NM-TRAN MESSAGES
 WARNINGS AND ERRORS (IF ANY) FOR PROBLEM    1
 (WARNING  132) SIGMA IS INTEPRETED AS RESIDUAL VARIANCE TO SINGLE SUBJECT ANALYSIS
 (WARNING  1) NM-TRAN INFERS THAT THE DATA ARE SINGLE-SUBJECT.
  NONMEM RUN CANNOT BE PARALLELIZED.
 AN ERROR WAS FOUND IN THE CONTROL STATEMENTS.
  350  $ESTIM: "METHOD=CONDITIONAL" INVALID WITH SINGLE-SUBJECT DATA.
OFV = 99999999
success = False
covariance = False
correlation = False
Condition # = 99999999
Num Non fixed THETAs = 0
Num Non fixed OMEGAs = 0
Num Non fixed SIGMAs = 0
Original run directory = D:\Users\selzer\Repos\GH\pyDarwinXploR\Datasets\Generated\1CP\sim_data_n10_repeated\125\dt1h\50pct\run\temp\0\436
