23.07.2025
15:46
$SIZES PD=-1000 LVR=-150 LTH=-200
$PROBLEM single pyDarwin individual, one among multitude
$INPUT ID TIME AMT DV WT EVID MDV
$DATA "D:\Users\selzer\Repos\GH\pyDarwinXploR\Datasets\Theo/dataset.csv" IGNORE=@
$SUBROUTINE ADVAN12 TRANS4
$PK
  CL = THETA(1)*(WT/70)**(0.75) * EXP(ETA(1)) ; CL
  Ka = THETA(2) * EXP(ETA(2)) ; Ka
  ; V is not used ; V
  ; Q is not used ; Q
  V2 = THETA(3)*(WT/70)**(1) * EXP(ETA(3))
  SC = V2 ; V2
  V3 = THETA(4) * EXP(ETA(4)) ; V3
  Q3 = THETA(5) * EXP(ETA(5)) ; Q3
  Q4 = THETA(6) ; Q4
  V4 = THETA(7) ; V4
$ERROR
  IPRED = F
  Y = F *(1+EPS(1))+EPS(2)
$SIGMA
  ;proportional error
  0.2	; EPS(1)
  ;additive error
  1	; EPS(2)
$THETA
  (0, 5) ; CL
  (0, 1) ; Ka
  ; V is not used
  ; Q is not used
  (0, 50) ; V2
  (0, 80) ; V3
  (0, 6) ; Q3
  (0, 1) ; Q4
  (0, 200) ; V4
$OMEGA
  0.3  ; CL
  0.3  ; Ka
  ; V is not used
  ; Q is not used
  0.3  ; V2
  0.3  ; V3
  0.3  ; Q3
  ; Q4 is not used
  ; V4 is not used
$EST METHOD = COND INTER NOABORT MAX = 999999
$TABLE ID TIME AMT DV PRED IPRED WRES CWRES FILE=results.tab NOPRINT NOAPPEND ONEHEADER
$COV UNCOND PRINT=E

;; Phenotype: ([('ADVAN', 2), ('CL~WT', 2), ('V~WT', 1), ('CL_OMEGA', 1), ('Ka_OMEGA', 1), ('V2_OMEGA', 1), ('V3_OMEGA', 1), ('Q3_OMEGA', 1), ('RESERR', 1)])
;; Genotype: [2, 2, 1, 1, 1, 0, 0, 1, 1, 1, 1]
;; Num non-influential tokens: 2

NM-TRAN MESSAGES
 WARNINGS AND ERRORS (IF ANY) FOR PROBLEM    1
 (WARNING  2) NM-TRAN INFERS THAT THE DATA ARE POPULATION.

1NONLINEAR MIXED EFFECTS MODEL PROGRAM (NONMEM) VERSION 7.4.3
 ORIGINALLY DEVELOPED BY STUART BEAL, LEWIS SHEINER, AND ALISON BOECKMANN
 CURRENT DEVELOPERS ARE ROBERT BAUER, ICON DEVELOPMENT SOLUTIONS,
 AND ALISON BOECKMANN. IMPLEMENTATION, EFFICIENCY, AND STANDARDIZATION
 PERFORMED BY NOUS INFOSYSTEMS.
 PROBLEM NO.:         1
 single pyDarwin individual, one among multitude
 TOT. NO. OF OBS RECS:      132
 TOT. NO. OF INDIVIDUALS:       12
 THREE COMPARTMENT MODEL WITH FIRST-ORDER ABSORPTION (ADVAN12)
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 #TBLN:      1
 #METH: First Order Conditional Estimation with Interaction
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
 #TERM:
0MINIMIZATION TERMINATED
 DUE TO PROXIMITY OF LAST ITERATION EST. TO A VALUE
 AT WHICH THE OBJ. FUNC. IS INFINITE (ERROR=136)
0AT THE LAST COMPUTED INFINITE VALUE OF THE OBJ. FUNCT.:

0PRED EXIT CODE = 1
0INDIVIDUAL NO.       9   ID= 9.00000000000000E+00   (WITHIN-INDIVIDUAL) DATA REC NO.   3
 THETA=
  1.32E+00   1.44E+00   3.20E+01   5.58E+02   1.25E+00   2.84E-01   1.39E+02
 ETA=
 -8.73E-02   1.43E+00  -1.59E-01  -2.66E-06  -8.64E-02
 OCCURS DURING SEARCH FOR ETA AT A NONZERO VALUE OF ETA
 KA, K32, OR K42 IS TOO CLOSE TO AN EIGENVALUE

 NO. OF FUNCTION EVALUATIONS USED:      734
 NO. OF SIG. DIGITS UNREPORTABLE

 ETABAR IS THE ARITHMETIC MEAN OF THE ETA-ESTIMATES,
 AND THE P-VALUE IS GIVEN FOR THE NULL HYPOTHESIS THAT THE TRUE MEAN IS 0.

 ETABAR:        -7.7038E-03 -4.7421E-03 -5.9596E-03 -7.5689E-07  7.6279E-03
 SE:             7.0989E-02  1.7926E-01  2.7563E-02  2.0937E-06  8.5459E-02
 N:                      12          12          12          12          12

 P VAL.:         9.1358E-01  9.7890E-01  8.2882E-01  7.1772E-01  9.2888E-01

 ETASHRINKSD(%)  3.2182E+01  1.8585E+00  1.7370E+01  9.9932E+01  2.9162E+01
 ETASHRINKVR(%)  5.4007E+01  3.6825E+00  3.1723E+01  1.0000E+02  4.9820E+01
 EBVSHRINKSD(%)  3.3859E+01  4.1709E+00  2.0789E+01  9.9837E+01  3.1141E+01
 EBVSHRINKVR(%)  5.6253E+01  8.1679E+00  3.7256E+01  1.0000E+02  5.2584E+01
 EPSSHRINKSD(%)  1.0627E+01  1.1052E+01
 EPSSHRINKVR(%)  2.0124E+01  2.0883E+01


 TOTAL DATA POINTS NORMALLY DISTRIBUTED (N):          132
 N*LOG(2PI) CONSTANT TO OBJECTIVE FUNCTION:    242.59977276603360
 OBJECTIVE FUNCTION VALUE WITHOUT CONSTANT:    102.13252806908557
 OBJECTIVE FUNCTION VALUE WITH CONSTANT:       344.73230083511919
 REPORTED OBJECTIVE FUNCTION DOES NOT CONTAIN CONSTANT

 TOTAL EFFECTIVE ETAS (NIND*NETA):                            60


 #TERE:
 Elapsed estimation  time in seconds:     8.03

0PRED EXIT CODE = 1
0INDIVIDUAL NO.       9   ID= 9.00000000000000E+00   (WITHIN-INDIVIDUAL) DATA REC NO.   3
 THETA=
  1.32E+00   1.44E+00   3.20E+01   5.58E+02   1.25E+00   2.84E-01   1.39E+02
 ETA=
 -8.83E-02   1.43E+00  -1.59E-01  -2.47E-06  -8.78E-02
 OCCURS DURING SEARCH FOR ETA AT A NONZERO VALUE OF ETA
 KA, K32, OR K42 IS TOO CLOSE TO AN EIGENVALUE
0PROGRAM TERMINATED BY OBJ
 Elapsed covariance  time in seconds:     0.26
 MESSAGE ISSUED FROM COVARIANCE STEP

 ********************               FIRST ORDER CONDITIONAL ESTIMATION WITH INTERACTION              ********************
 #OBJT:**************                       MINIMUM VALUE OF OBJECTIVE FUNCTION                      ********************
 #OBJV:********************************************      102.133       **************************************************

 ********************               FIRST ORDER CONDITIONAL ESTIMATION WITH INTERACTION              ********************
 ********************                             FINAL PARAMETER ESTIMATE                           ********************

 THETA - VECTOR OF FIXED EFFECTS PARAMETERS   *********
         TH 1      TH 2      TH 3      TH 4      TH 5      TH 6      TH 7
         1.32E+00  1.44E+00  3.20E+01  5.58E+02  1.25E+00  2.84E-01  1.39E+02

 OMEGA - COV MATRIX FOR RANDOM EFFECTS - ETAS  ********
         ETA1      ETA2      ETA3      ETA4      ETA5
 ETA1
+        1.43E-01
 ETA2
+        0.00E+00  4.37E-01
 ETA3
+        0.00E+00  0.00E+00  1.46E-02
 ETA4
+        0.00E+00  0.00E+00  0.00E+00  1.26E-04
 ETA5
+        0.00E+00  0.00E+00  0.00E+00  0.00E+00  1.91E-01

 SIGMA - COV MATRIX FOR RANDOM EFFECTS - EPSILONS  ****
         EPS1      EPS2
 EPS1
+        1.74E-02
 EPS2
+        0.00E+00  7.31E-02

 OMEGA - CORR MATRIX FOR RANDOM EFFECTS - ETAS  *******
         ETA1      ETA2      ETA3      ETA4      ETA5
 ETA1
+        3.79E-01
 ETA2
+        0.00E+00  6.61E-01
 ETA3
+        0.00E+00  0.00E+00  1.21E-01
 ETA4
+        0.00E+00  0.00E+00  0.00E+00  1.12E-02
 ETA5
+        0.00E+00  0.00E+00  0.00E+00  0.00E+00  4.36E-01

 SIGMA - CORR MATRIX FOR RANDOM EFFECTS - EPSILONS  ***
         EPS1      EPS2
 EPS1
+        1.32E-01
 EPS2
+        0.00E+00  2.70E-01
 #CPUT: Total CPU Time in Seconds,        8.313
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