25.06.2025
21:38
$SIZES PD=-1000 LVR=-150 LTH=-200
$PROBLEM single pyDarwin individual, one among multitude
$INPUT ID TIME DV AMT EVID MDV CMT WT DROP
$DATA "../../../dataset.csv" IGNORE=@
$SUBROUTINE ADVAN4 TRANS4
$PK
  CL = THETA(1)  * EXP(ETA(1)) ; CL
  Ka = THETA(2) ; Ka
  ; V is not used ; V
  Q = THETA(3) ; Q
  V2 = THETA(4) *(WT/70)**(THETA(5)) * EXP(ETA(2))
  SC = V2 ; V2
  V3 = THETA(6)  ; V3
  ; Q3 is not used ; Q3
  ; Q4 is not used ; Q4
  ; V4 is not used ; V4
$ERROR
  IPRED = F
  Y = F *(1+EPS(1))+EPS(2)
$SIGMA
  ;proportional error
  0.015	; EPS(1)
  ;additive error
  0.01	; EPS(2)
$THETA
  (0, 2) ; CL

  (0, 1) ; Ka
  ; V is not used
  (0, 25) ; Q
  (0, 5) ; V2
  (0.5); V2~WT
  (0, 1) ; V3
  ; Q3 is not used
  ; Q4 is not used
  ; V4 is not used
$OMEGA
  0.1  ; CL
  ; Ka is not used
  ; V is not used
  ; Q is not used
  0.1  ; V2

  ; Q3 is not used
  ; Q4 is not used
  ; V4 is not used
$EST METHOD = COND INTER NOABORT MAX = 999999
$COV UNCOND PRINT=E

;; Phenotype: ([('ADVAN', 1), ('CL~WT', 0), ('CL_OMEGA', 1), ('V2~WT', 1), ('V2_OMEGA', 1), ('V3_OMEGA', 0), ('RESERR', 1)])
;; Genotype: [1, 0, 1, 0, 0, 1, 1, 0, 1]
;; Num non-influential tokens: 2

NM-TRAN MESSAGES
 WARNINGS AND ERRORS (IF ANY) FOR PROBLEM    1
 (WARNING  2) NM-TRAN INFERS THAT THE DATA ARE POPULATION.
 (DATA WARNING   5) RECORD         5, DATA ITEM   3, CONTENTS: 0.399445285143881
 THE DV DATA ITEM IS POSITIVE, BUT THE MDV DATA ITEM IS 1
 (DATA WARNING   5) RECORD         6, DATA ITEM   3, CONTENTS: 0.24778047320258
 THE DV DATA ITEM IS POSITIVE, BUT THE MDV DATA ITEM IS 1
 * THE MAXIMUM NUMBER OF WARNINGS OF ONE OR MORE TYPES WAS REACHED.
 IT IS POSSIBLE THAT SOME WARNING MESSAGES WERE SUPPRESSED.
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
1NONLINEAR MIXED EFFECTS MODEL PROGRAM (NONMEM) VERSION 7.4.3
 ORIGINALLY DEVELOPED BY STUART BEAL, LEWIS SHEINER, AND ALISON BOECKMANN
 CURRENT DEVELOPERS ARE ROBERT BAUER, ICON DEVELOPMENT SOLUTIONS,
 AND ALISON BOECKMANN. IMPLEMENTATION, EFFICIENCY, AND STANDARDIZATION
 PERFORMED BY NOUS INFOSYSTEMS.
 PROBLEM NO.:         1
 single pyDarwin individual, one among multitude
 TOT. NO. OF OBS RECS:       30
 TOT. NO. OF INDIVIDUALS:       10
 TWO COMPARTMENT MODEL WITH FIRST-ORDER ABSORPTION (ADVAN4)
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 #TBLN:      1
 #METH: First Order Conditional Estimation with Interaction
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
 #TERM:
0MINIMIZATION TERMINATED
 DUE TO PROXIMITY OF NEXT ITERATION EST. TO A VALUE
 AT WHICH THE OBJ. FUNC. IS INFINITE
0AT THE LAST COMPUTED INFINITE VALUE OF THE OBJ. FUNCT.:

0PRED EXIT CODE = 1
0INDIVIDUAL NO.       1   ID= 1.00000000000000E+00   (WITHIN-INDIVIDUAL) DATA REC NO.   2
 THETA=
  3.49E+00  +Infinity   4.38E+00   1.61E+01  -1.71E+00   1.47E+01
 ETA=
 -3.96E-02   3.08E-03
 F OR DERIVATIVE RETURNED BY PRED IS INFINITE (INF) OR NOT A NUMBER (NAN).

 NO. OF FUNCTION EVALUATIONS USED:      734
 NO. OF SIG. DIGITS UNREPORTABLE

 ETABAR IS THE ARITHMETIC MEAN OF THE ETA-ESTIMATES,
 AND THE P-VALUE IS GIVEN FOR THE NULL HYPOTHESIS THAT THE TRUE MEAN IS 0.

 ETABAR:        -4.3478E-03 -3.4766E-03
 SE:             3.7313E-02  1.7077E-02
 N:                      10          10

 P VAL.:         9.0724E-01  8.3868E-01

 ETASHRINKSD(%)  1.5397E+01  7.4526E+01
 ETASHRINKVR(%)  2.8423E+01  9.3511E+01
 EBVSHRINKSD(%)  1.8911E+01  6.8448E+01
 EBVSHRINKVR(%)  3.4246E+01  9.0045E+01
 EPSSHRINKSD(%)  1.3796E+01  1.3796E+01
 EPSSHRINKVR(%)  2.5688E+01  2.5688E+01


 TOTAL DATA POINTS NORMALLY DISTRIBUTED (N):           30
 N*LOG(2PI) CONSTANT TO OBJECTIVE FUNCTION:    55.136311992280362
 OBJECTIVE FUNCTION VALUE WITHOUT CONSTANT:   -92.762898987820122
 OBJECTIVE FUNCTION VALUE WITH CONSTANT:      -37.626586995539760
 REPORTED OBJECTIVE FUNCTION DOES NOT CONTAIN CONSTANT

 TOTAL EFFECTIVE ETAS (NIND*NETA):                            20


 #TERE:
 Elapsed estimation  time in seconds:     0.34

0PRED EXIT CODE = 1
0INDIVIDUAL NO.       1   ID= 1.00000000000000E+00   (WITHIN-INDIVIDUAL) DATA REC NO.   2
 THETA=
  3.52E+00  +Infinity   4.40E+00   1.66E+01  -1.58E+00   1.44E+01
 OCCURS DURING SEARCH FOR ETA AT INITIAL VALUE, ETA=0
 F OR DERIVATIVE RETURNED BY PRED IS INFINITE (INF) OR NOT A NUMBER (NAN).
0PROGRAM TERMINATED BY OBJ
 Elapsed covariance  time in seconds:     0.02
 MESSAGE ISSUED FROM COVARIANCE STEP

 ********************               FIRST ORDER CONDITIONAL ESTIMATION WITH INTERACTION              ********************
 #OBJT:**************                       MINIMUM VALUE OF OBJECTIVE FUNCTION                      ********************
 #OBJV:********************************************      -92.763       **************************************************

 ********************               FIRST ORDER CONDITIONAL ESTIMATION WITH INTERACTION              ********************
 ********************                             FINAL PARAMETER ESTIMATE                           ********************

 THETA - VECTOR OF FIXED EFFECTS PARAMETERS   *********
         TH 1      TH 2      TH 3      TH 4      TH 5      TH 6
         3.52E+00  1.6E+308  4.40E+00  1.66E+01 -1.58E+00  1.44E+01

 OMEGA - COV MATRIX FOR RANDOM EFFECTS - ETAS  ********
         ETA1      ETA2
 ETA1
+        2.16E-02
 ETA2
+        0.00E+00  4.99E-02

 SIGMA - COV MATRIX FOR RANDOM EFFECTS - EPSILONS  ****
         EPS1      EPS2
 EPS1
+        9.72E-03
 EPS2
+        0.00E+00  6.99E-03

 OMEGA - CORR MATRIX FOR RANDOM EFFECTS - ETAS  *******
         ETA1      ETA2
 ETA1
+        1.47E-01
 ETA2
+        0.00E+00  2.23E-01

 SIGMA - CORR MATRIX FOR RANDOM EFFECTS - EPSILONS  ***
         EPS1      EPS2
 EPS1
+        9.86E-02
 EPS2
+        0.00E+00  8.36E-02
 #CPUT: Total CPU Time in Seconds,        0.359
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