23.06.2025
16:00
$SIZES PD=-1000 LVR=-150 LTH=-200
$PROBLEM single pyDarwin individual, one among multitude
$INPUT ID TIME DV AMT EVID MDV CMT WT DROP
$DATA "../../../dataset.csv" IGNORE=@
$SUBROUTINE ADVAN12 TRANS4
$PK
  CL = THETA(1)  * EXP(ETA(1)) ; CL
  Ka = THETA(2) ; Ka
  ; V is not used ; V
  ; Q is not used ; Q
  V2 = THETA(3)  * EXP(ETA(2))
  SC = V2 ; V2
  V3 = THETA(4)  * EXP(ETA(3)) ; V3
  Q3 = THETA(5) ; Q3
  Q4 = THETA(6) ; Q4
  V4 = THETA(7) ; V4
$ERROR
  IPRED = F
  Y = F *(1+EPS(1))+EPS(2)
$SIGMA
  ;proportional error
  0.015	; EPS(1)
  ;additive error
  0.01	; EPS(2)
$THETA
  (0, 2) ; CL

  (0, 1) ; Ka
  ; V is not used
  ; Q is not used
  (0, 5) ; V2

  (0, 1) ; V3
  (0, 25) ; Q3
  (0, 1) ; Q4
  (0, 10) ; V4
$OMEGA
  0.1  ; CL
  ; Ka is not used
  ; V is not used
  ; Q is not used
  0.1  ; V2
  0.1  ; V3
  ; Q3 is not used
  ; Q4 is not used
  ; V4 is not used
$EST METHOD = COND INTER NOABORT MAX = 999999
$COV UNCOND PRINT=E

;; Phenotype: ([('ADVAN', 2), ('CL~WT', 0), ('CL_OMEGA', 1), ('V2~WT', 0), ('V2_OMEGA', 1), ('V3_OMEGA', 1), ('RESERR', 1)])
;; Genotype: [2, 0, 1, 0, 0, 0, 1, 1, 1]
;; Num non-influential tokens: 2

NM-TRAN MESSAGES
 WARNINGS AND ERRORS (IF ANY) FOR PROBLEM    1
 (WARNING  2) NM-TRAN INFERS THAT THE DATA ARE POPULATION.
 (DATA WARNING   5) RECORD         2, DATA ITEM   3, CONTENTS: 0.49861059121726
 THE DV DATA ITEM IS POSITIVE, BUT THE MDV DATA ITEM IS 1
 (DATA WARNING   5) RECORD         3, DATA ITEM   3, CONTENTS: 0.903773155611878
 THE DV DATA ITEM IS POSITIVE, BUT THE MDV DATA ITEM IS 1
 * THE MAXIMUM NUMBER OF WARNINGS OF ONE OR MORE TYPES WAS REACHED.
 IT IS POSSIBLE THAT SOME WARNING MESSAGES WERE SUPPRESSED.
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
1NONLINEAR MIXED EFFECTS MODEL PROGRAM (NONMEM) VERSION 7.4.3
 ORIGINALLY DEVELOPED BY STUART BEAL, LEWIS SHEINER, AND ALISON BOECKMANN
 CURRENT DEVELOPERS ARE ROBERT BAUER, ICON DEVELOPMENT SOLUTIONS,
 AND ALISON BOECKMANN. IMPLEMENTATION, EFFICIENCY, AND STANDARDIZATION
 PERFORMED BY NOUS INFOSYSTEMS.
 PROBLEM NO.:         1
 single pyDarwin individual, one among multitude
 TOT. NO. OF OBS RECS:      180
 TOT. NO. OF INDIVIDUALS:       10
 THREE COMPARTMENT MODEL WITH FIRST-ORDER ABSORPTION (ADVAN12)
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 #TBLN:      1
 #METH: First Order Conditional Estimation with Interaction
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
 #TERM:
0MINIMIZATION SUCCESSFUL
 HOWEVER, PROBLEMS OCCURRED WITH THE MINIMIZATION.
 REGARD THE RESULTS OF THE ESTIMATION STEP CAREFULLY, AND ACCEPT THEM ONLY
 AFTER CHECKING THAT THE COVARIANCE STEP PRODUCES REASONABLE OUTPUT.
 NO. OF FUNCTION EVALUATIONS USED:     6990
 NO. OF SIG. DIGITS IN FINAL EST.:  3.2

 ETABAR IS THE ARITHMETIC MEAN OF THE ETA-ESTIMATES,
 AND THE P-VALUE IS GIVEN FOR THE NULL HYPOTHESIS THAT THE TRUE MEAN IS 0.

 ETABAR:         3.0623E-03 -8.0580E-04  6.1164E-04
 SE:             1.8318E-01  4.1761E-03  2.6217E-02
 N:                      10          10          10

 P VAL.:         9.8666E-01  8.4699E-01  9.8139E-01

 ETASHRINKSD(%)  1.0000E-10  8.7571E+01  3.1358E+01
 ETASHRINKVR(%)  1.0000E-10  9.8455E+01  5.2883E+01
 EBVSHRINKSD(%)  2.0509E+00  8.8073E+01  3.4801E+01
 EBVSHRINKVR(%)  4.0598E+00  9.8577E+01  5.7491E+01
 EPSSHRINKSD(%)  3.7867E+00  3.7867E+00
 EPSSHRINKVR(%)  7.4300E+00  7.4300E+00


 TOTAL DATA POINTS NORMALLY DISTRIBUTED (N):          180
 N*LOG(2PI) CONSTANT TO OBJECTIVE FUNCTION:    330.81787195368219
 OBJECTIVE FUNCTION VALUE WITHOUT CONSTANT:   -532.56782836207378
 OBJECTIVE FUNCTION VALUE WITH CONSTANT:      -201.74995640839160
 REPORTED OBJECTIVE FUNCTION DOES NOT CONTAIN CONSTANT

 TOTAL EFFECTIVE ETAS (NIND*NETA):                            30


 #TERE:
 Elapsed estimation  time in seconds:   109.18
0S MATRIX ALGORITHMICALLY SINGULAR
0S MATRIX IS OUTPUT
0INVERSE COVARIANCE MATRIX SET TO RS*RMAT, WHERE S* IS A PSEUDO INVERSE OF S
 Elapsed covariance  time in seconds:     6.02
 Elapsed postprocess time in seconds:     0.00

 ********************               FIRST ORDER CONDITIONAL ESTIMATION WITH INTERACTION              ********************
 #OBJT:**************                       MINIMUM VALUE OF OBJECTIVE FUNCTION                      ********************
 #OBJV:********************************************     -532.568       **************************************************

 ********************               FIRST ORDER CONDITIONAL ESTIMATION WITH INTERACTION              ********************
 ********************                             FINAL PARAMETER ESTIMATE                           ********************

 THETA - VECTOR OF FIXED EFFECTS PARAMETERS   *********
         TH 1      TH 2      TH 3      TH 4      TH 5      TH 6      TH 7
         2.41E+00  4.06E-01  6.23E+00  3.00E+01  8.57E+02  2.79E+00  2.77E+02

 OMEGA - COV MATRIX FOR RANDOM EFFECTS - ETAS  ********
         ETA1      ETA2      ETA3
 ETA1
+        3.55E-01
 ETA2
+        0.00E+00  1.25E-02
 ETA3
+        0.00E+00  0.00E+00  1.62E-02

 SIGMA - COV MATRIX FOR RANDOM EFFECTS - EPSILONS  ****
         EPS1      EPS2
 EPS1
+        2.26E-02
 EPS2
+        0.00E+00  8.21E-03

 OMEGA - CORR MATRIX FOR RANDOM EFFECTS - ETAS  *******
         ETA1      ETA2      ETA3
 ETA1
+        5.96E-01
 ETA2
+        0.00E+00  1.12E-01
 ETA3
+        0.00E+00  0.00E+00  1.27E-01

 SIGMA - CORR MATRIX FOR RANDOM EFFECTS - EPSILONS  ***
         EPS1      EPS2
 EPS1
+        1.50E-01
 EPS2
+        0.00E+00  9.06E-02

 ********************               FIRST ORDER CONDITIONAL ESTIMATION WITH INTERACTION              ********************
 ********************                            STANDARD ERROR OF ESTIMATE                          ********************

 THETA - VECTOR OF FIXED EFFECTS PARAMETERS   *********
         TH 1      TH 2      TH 3      TH 4      TH 5      TH 6      TH 7
         8.55E-01  1.61E-01  2.86E+01  3.65E+01  1.56E+04  3.09E-01  1.51E+02

 OMEGA - COV MATRIX FOR RANDOM EFFECTS - ETAS  ********
         ETA1      ETA2      ETA3
 ETA1
+        1.08E-01
 ETA2
+       .........  1.99E-03
 ETA3
+       ......... .........  3.04E-04

 SIGMA - COV MATRIX FOR RANDOM EFFECTS - EPSILONS  ****
         EPS1      EPS2
 EPS1
+        1.03E-02
 EPS2
+       .........  1.86E-03

 OMEGA - CORR MATRIX FOR RANDOM EFFECTS - ETAS  *******
         ETA1      ETA2      ETA3
 ETA1
+        9.06E-02
 ETA2
+       .........  8.89E-03
 ETA3
+       ......... .........  1.19E-03

 SIGMA - CORR MATRIX FOR RANDOM EFFECTS - EPSILONS  ***
         EPS1      EPS2
 EPS1
+        3.42E-02
 EPS2
+       .........  1.03E-02

 ********************               FIRST ORDER CONDITIONAL ESTIMATION WITH INTERACTION              ********************
 ********************                          COVARIANCE MATRIX OF ESTIMATE                         ********************

            TH 1      TH 2      TH 3      TH 4      TH 5      TH 6      TH 7      OM11      OM12      OM13      OM22      OM23
             OM33      SG11      SG12      SG22
 TH 1
+        7.32E-01
 TH 2
+       -6.39E-02  2.59E-02
 TH 3
+        1.54E+01 -4.18E+00  8.16E+02
 TH 4
+       -1.95E+01  5.51E+00 -1.04E+03  1.33E+03
 TH 5
+       -6.28E+03  2.35E+03 -4.30E+05  5.51E+05  2.45E+08
 TH 6
+       -4.58E-02 -4.23E-03  1.12E+00 -1.28E+00 -5.60E+02  9.55E-02
 TH 7
+       -1.19E+02  1.28E+01 -2.58E+03  3.35E+03  1.06E+06  1.57E+01  2.29E+04
 OM11
+        5.63E-02 -1.59E-02  3.08E+00 -3.92E+00 -1.63E+03  3.80E-03 -9.59E+00  1.17E-02
 OM12
+       ......... ......... ......... ......... ......... ......... ......... ......... .........
 OM13
+       ......... ......... ......... ......... ......... ......... ......... ......... ......... .........
 OM22
+       -1.20E-03  2.85E-04 -5.66E-02  7.18E-02  2.94E+01 -5.42E-05  1.99E-01 -2.13E-04 ......... .........  3.96E-06
 OM23
+       ......... ......... ......... ......... ......... ......... ......... ......... ......... ......... ......... .........
 OM33
+        5.62E-05  2.88E-05 -4.96E-03  6.23E-03  2.89E+00 -3.70E-05 -6.93E-03 -1.95E-05 ......... .........  2.93E-07 .........
          9.23E-08
 SG11
+        7.19E-03 -1.22E-03  2.63E-01 -3.31E-01 -1.31E+02  3.61E-04 -1.05E+00  9.79E-04 ......... ......... -1.90E-05 .........
         -7.34E-07  1.06E-04
 SG12
+       ......... ......... ......... ......... ......... ......... ......... ......... ......... ......... ......... .........
         ......... ......... .........
 SG22
+       -1.26E-03  2.32E-04 -4.60E-02  5.84E-02  2.15E+01 -7.12E-05  2.11E-01 -1.73E-04 ......... .........  3.29E-06 .........
          1.76E-07 -1.77E-05 .........  3.46E-06

 ********************               FIRST ORDER CONDITIONAL ESTIMATION WITH INTERACTION              ********************
 ********************                          CORRELATION MATRIX OF ESTIMATE                        ********************

            TH 1      TH 2      TH 3      TH 4      TH 5      TH 6      TH 7      OM11      OM12      OM13      OM22      OM23
             OM33      SG11      SG12      SG22
 TH 1
+        8.55E-01
 TH 2
+       -4.64E-01  1.61E-01
 TH 3
+        6.29E-01 -9.09E-01  2.86E+01
 TH 4
+       -6.26E-01  9.40E-01 -9.95E-01  3.65E+01
 TH 5
+       -4.69E-01  9.33E-01 -9.62E-01  9.66E-01  1.56E+04
 TH 6
+       -1.73E-01 -8.51E-02  1.27E-01 -1.14E-01 -1.16E-01  3.09E-01
 TH 7
+       -9.20E-01  5.25E-01 -5.97E-01  6.07E-01  4.49E-01  3.36E-01  1.51E+02
 OM11
+        6.10E-01 -9.16E-01  9.99E-01 -9.96E-01 -9.63E-01  1.14E-01 -5.88E-01  1.08E-01
 OM12
+       ......... ......... ......... ......... ......... ......... ......... ......... .........
 OM13
+       ......... ......... ......... ......... ......... ......... ......... ......... ......... .........
 OM22
+       -7.04E-01  8.89E-01 -9.95E-01  9.89E-01  9.44E-01 -8.82E-02  6.62E-01 -9.91E-01 ......... .........  1.99E-03
 OM23
+       ......... ......... ......... ......... ......... ......... ......... ......... ......... ......... ......... .........
 OM33
+        2.16E-01  5.89E-01 -5.71E-01  5.62E-01  6.08E-01 -3.94E-01 -1.51E-01 -5.94E-01 ......... .........  4.85E-01 .........
          3.04E-04
 SG11
+        8.17E-01 -7.34E-01  8.96E-01 -8.81E-01 -8.14E-01  1.14E-01 -6.72E-01  8.82E-01 ......... ......... -9.26E-01 .........
         -2.35E-01  1.03E-02
 SG12
+       ......... ......... ......... ......... ......... ......... ......... ......... ......... ......... ......... .........
         ......... ......... .........
 SG22
+       -7.95E-01  7.77E-01 -8.66E-01  8.61E-01  7.40E-01 -1.24E-01  7.50E-01 -8.59E-01 ......... .........  8.88E-01 .........
          3.12E-01 -9.23E-01 .........  1.86E-03
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
 ********************               FIRST ORDER CONDITIONAL ESTIMATION WITH INTERACTION              ********************
 ********************                      EIGENVALUES OF COR MATRIX OF ESTIMATE                     ********************

             1         2         3         4         5         6         7         8         9        10        11        12
         3.47E-15 -5.35E-15  3.66E-08  1.42E-04  1.25E-03  1.57E-02  1.09E-01  1.66E-01  2.41E-01  8.31E-01  2.10E+00  8.54E+00
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 Elapsed finaloutput time in seconds:     0.03
 #CPUT: Total CPU Time in Seconds,      115.234
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