28.07.2025
22:11
$SIZES PD=-1000 LVR=-150 LTH=-200
$PROBLEM single pyDarwin individual, one among multitude
$INPUT ID TIME AMT RATE DV DROP MDV AGE SEX LBM DROP CMT EVID
$DATA "D:\Users\selzer\Repos\GH\pyDarwinXploR\RemiR/data.csv" IGNORE=@
$SUBROUTINE ADVAN3 TRANS4
$PK

  CL = THETA(1) *(1 + THETA(2) * (AGE)) *(LBM/50)**(THETA(3))  * EXP(ETA(1)) ; CL

  TVQSEX = 0
  IF(SEX == 1) THEN
  TVQSEX = THETA(4)
  ENDIF
  Q = THETA(5) *(1 + THETA(6) * (AGE))  *(1 + TVQSEX) * EXP(ETA(2)) ; Q

  TVV1SEX = 0
  IF(SEX == 1) THEN
  TVV1SEX = THETA(7)
  ENDIF
  V1 = THETA(8)   *(1 + TVV1SEX) * EXP(ETA(3))
  SC = V1 ; V1

  TVV2SEX = 0
  IF(SEX == 1) THEN
  TVV2SEX = THETA(9)
  ENDIF
  V2 = THETA(10)   *(1 + TVV2SEX) * EXP(ETA(4)) ; V2
  ; Q2 is not used ; Q2
  ; Q3 is not used ; Q3
  ; V3 is not used ; V3
$ERROR
  IPRED = F
  Y = F *(1+EPS(1))
$SIGMA
  ;proportional error
  0.1	; EPS(1)
$THETA

  (0, 2) ; CL
  (1); CL~AGE
  (1); CL~LBM

  (1);Q~SEX1
  (0, 1) ; Q
  (1); Q~AGE

  (1);V1~SEX1
  (0, 7) ; V1

  (1);V2~SEX1
  (0, 9) ; V2

  ; Q2 is not used
  ; Q3 is not used
  ; V3 is not used
$OMEGA
  0.03  ; CL
  0.3  ; Q
  0.3  ; V1
  0.3  ; V2
  ; Q2 is not used
  ; Q3 is not used
  ; V3 is not used
$EST METHOD = COND INTER NOABORT MAX = 999999
$TABLE ID TIME AMT DV PRED IPRED WRES CWRES FILE=results.tab NOPRINT NOAPPEND ONEHEADER
$COV UNCOND PRINT=E

;; Phenotype: ([('ADVAN', 0), ('CL~AGE', 1), ('CL~LBM', 1), ('CL~SEX', 0), ('CL_OMEGA', 1), ('Q~AGE', 1), ('Q~LBM', 0), ('Q~SEX', 1), ('Q_OMEGA', 1), ('V1~AGE', 0), ('V1~LBM', 0), ('V1~SEX', 1), ('V1_OMEGA', 1), ('V2~AGE', 0), ('V2~LBM', 0), ('V2~SEX', 1), ('V2_OMEGA', 1), ('RESERR', 0)])
;; Genotype: [0, 1, 1, 0, 1, 1, 0, 1, 1, 0, 0, 1, 1, 0, 0, 1, 1, 0, 0, 0, 1, 0, 0, 1, 0, 1, 0, 0]
;; Num non-influential tokens: 10

NM-TRAN MESSAGES
 WARNINGS AND ERRORS (IF ANY) FOR PROBLEM    1
 (WARNING  2) NM-TRAN INFERS THAT THE DATA ARE POPULATION.

1NONLINEAR MIXED EFFECTS MODEL PROGRAM (NONMEM) VERSION 7.4.3
 ORIGINALLY DEVELOPED BY STUART BEAL, LEWIS SHEINER, AND ALISON BOECKMANN
 CURRENT DEVELOPERS ARE ROBERT BAUER, ICON DEVELOPMENT SOLUTIONS,
 AND ALISON BOECKMANN. IMPLEMENTATION, EFFICIENCY, AND STANDARDIZATION
 PERFORMED BY NOUS INFOSYSTEMS.
 PROBLEM NO.:         1
 single pyDarwin individual, one among multitude
 TOT. NO. OF OBS RECS:     1992
 TOT. NO. OF INDIVIDUALS:       65
 TWO COMPARTMENT MODEL (ADVAN3)
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 #TBLN:      1
 #METH: First Order Conditional Estimation with Interaction
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
0PROGRAM TERMINATED BY OBJ
 ERROR IN CELS   WITH INDIVIDUAL       1   ID= 1.00000000000000E+00
 SUM OF "SQUARED" WEIGHTED INDIVIDUAL RESIDUALS IS INFINITE
 MESSAGE ISSUED FROM ESTIMATION STEP
 AT INITIAL OBJ. FUNCTION EVALUATION

 #TERM:

 TOTAL DATA POINTS NORMALLY DISTRIBUTED (N):            0
 N*LOG(2PI) CONSTANT TO OBJECTIVE FUNCTION:    0.0000000000000000
 OBJECTIVE FUNCTION VALUE WITHOUT CONSTANT:   1.34078079299425971E+154
 OBJECTIVE FUNCTION VALUE WITH CONSTANT:      1.34078079299425971E+154
 REPORTED OBJECTIVE FUNCTION DOES NOT CONTAIN CONSTANT

 TOTAL EFFECTIVE ETAS (NIND*NETA):                             0


 #TERE:
 Elapsed estimation  time in seconds:     0.00
 #CPUT: Total CPU Time in Seconds,        0.063
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