28.07.2025
22:11
$SIZES PD=-1000 LVR=-150 LTH=-200
$PROBLEM single pyDarwin individual, one among multitude
$INPUT ID TIME AMT RATE DV DROP MDV AGE SEX LBM DROP CMT EVID
$DATA "D:\Users\selzer\Repos\GH\pyDarwinXploR\RemiR/data.csv" IGNORE=@
$SUBROUTINE ADVAN11 TRANS4
$PK

  TVCLSEX = 0
  IF(SEX == 1) THEN
  TVCLSEX = THETA(1)
  ENDIF
  CL = THETA(2)   *(1 + TVCLSEX) * EXP(ETA(1)) ; CL
  ; Q is not used ; Q

  V1 = THETA(3) *(1 + THETA(4) * (AGE)) *(LBM/50)**(THETA(5))  * EXP(ETA(2))
  SC = V1 ; V1

  V2 = THETA(6)  *(LBM/50)**(THETA(7))  * EXP(ETA(3)) ; V2

  TVQ2SEX = 0
  IF(SEX == 1) THEN
  TVQ2SEX = THETA(8)
  ENDIF
  Q2 = THETA(9) *(1 + THETA(10) * (AGE)) *(LBM/50)**(THETA(11)) *(1 + TVQ2SEX) * EXP(ETA(4)) ; Q2

  TVQ3SEX = 0
  IF(SEX == 1) THEN
  TVQ3SEX = THETA(12)
  ENDIF
  Q3 = THETA(13) *(1 + THETA(14) * (AGE)) *(LBM/50)**(THETA(15)) *(1 + TVQ3SEX) * EXP(ETA(5)) ; Q3

  TVV3SEX = 0
  IF(SEX == 1) THEN
  TVV3SEX = THETA(16)
  ENDIF
  V3 = THETA(17)   *(1 + TVV3SEX) * EXP(ETA(6)) ; V3
$ERROR
  IPRED = F
  Y = F *(1+EPS(1))+EPS(2)
$SIGMA
  ;proportional error
  0.2	; EPS(1)
  ;additive error
  1	; EPS(2)
$THETA

  (1.1);CL~SEX1
  (0, 2) ; CL

  ; Q is not used

  (0, 5) ; V1
  (1); V1~AGE
  (1); V1~LBM

  (0, 10) ; V2

  (1); V2~LBM

  (0.1);Q2~SEX1
  (0, 2) ; Q2
  (1); Q2~AGE
  (1); Q2~LBM

  (1);Q3~SEX1
  (0, 0.05) ; Q3
  (1); Q3~AGE
  (1); Q3~LBM

  (1);V3~SEX1
  (0, 5) ; V3

$OMEGA
  0.3  ; CL
  ; Q is not used
  0.3  ; V1
  0.3  ; V2
  0.3  ; Q2
  0.3  ; Q3
  0.3  ; V3
$EST METHOD = COND INTER NOABORT MAX = 999999
$TABLE ID TIME AMT DV PRED IPRED WRES CWRES FILE=results.tab NOPRINT NOAPPEND ONEHEADER
$COV UNCOND PRINT=E

;; Phenotype: ([('ADVAN', 1), ('CL~AGE', 0), ('CL~LBM', 0), ('CL~SEX', 1), ('V1~AGE', 1), ('V1~LBM', 1), ('V1~SEX', 0), ('V2~AGE', 0), ('V2~LBM', 1), ('V2~SEX', 0), ('Q2~AGE', 1), ('Q2~LBM', 1), ('Q2~SEX', 1), ('Q3~AGE', 1), ('Q3~LBM', 1), ('Q3~SEX', 1), ('V3~AGE', 0), ('V3~LBM', 0), ('V3~SEX', 1), ('V3_OMEGA', 1), ('RESERR', 1)])
;; Genotype: [1, 0, 0, 1, 0, 0, 0, 1, 1, 1, 1, 0, 1, 0, 1, 0, 0, 1, 1, 1, 1, 1, 1, 0, 0, 1, 1, 1]
;; Num non-influential tokens: 7

NM-TRAN MESSAGES
 WARNINGS AND ERRORS (IF ANY) FOR PROBLEM    1
 (WARNING  2) NM-TRAN INFERS THAT THE DATA ARE POPULATION.

1NONLINEAR MIXED EFFECTS MODEL PROGRAM (NONMEM) VERSION 7.4.3
 ORIGINALLY DEVELOPED BY STUART BEAL, LEWIS SHEINER, AND ALISON BOECKMANN
 CURRENT DEVELOPERS ARE ROBERT BAUER, ICON DEVELOPMENT SOLUTIONS,
 AND ALISON BOECKMANN. IMPLEMENTATION, EFFICIENCY, AND STANDARDIZATION
 PERFORMED BY NOUS INFOSYSTEMS.
 PROBLEM NO.:         1
 single pyDarwin individual, one among multitude
 TOT. NO. OF OBS RECS:     1992
 TOT. NO. OF INDIVIDUALS:       65
 THREE COMPARTMENT MODEL (ADVAN11)
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 #TBLN:      1
 #METH: First Order Conditional Estimation with Interaction
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
 #TERM:
0MINIMIZATION TERMINATED
 DUE TO PROXIMITY OF NEXT ITERATION EST. TO A VALUE
 AT WHICH THE OBJ. FUNC. IS INFINITE
0AT THE LAST COMPUTED INFINITE VALUE OF THE OBJ. FUNCT.:

0PRED EXIT CODE = 1
0INDIVIDUAL NO.      55   ID= 5.50000000000000E+01   (WITHIN-INDIVIDUAL) DATA REC NO.   2
 THETA=
  1.02E+00   2.00E+00   4.96E+00  -1.18E-02   9.34E-01   9.97E+00   9.73E-01   8.40E-02   2.00E+00   9.98E-01
  1.00E+00  -4.65E-01   4.99E-02   8.02E-01   9.76E-01   1.04E+00   5.00E+00
 ETA=
  1.36E-01  -2.77E+00  -5.96E-01   1.34E-01  -7.97E-01   4.46E-01
 OCCURS DURING SEARCH FOR ETA AT A NONZERO VALUE OF ETA
 THE CHARACTERISTIC EQUATION CANNOT BE SOLVED

 NO. OF FUNCTION EVALUATIONS USED:      367
 NO. OF SIG. DIGITS UNREPORTABLE

 ETABAR IS THE ARITHMETIC MEAN OF THE ETA-ESTIMATES,
 AND THE P-VALUE IS GIVEN FOR THE NULL HYPOTHESIS THAT THE TRUE MEAN IS 0.

 ETABAR:        -2.0767E-02 -1.8427E-01 -5.6889E-01 -6.2214E-03 -4.2041E-01  2.6034E-01
 SE:             3.9630E-02  1.4991E-02  3.1802E-02  3.6216E-03  5.0328E-02  2.8619E-02
 N:                      65          65          65          65          65          65

 P VAL.:         6.0027E-01  1.0391E-34  1.5451E-71  8.5818E-02  6.7119E-17  9.4438E-20

 ETASHRINKSD(%)  4.1182E+01  7.8330E+01  5.2962E+01  9.4628E+01  2.5462E+01  5.7532E+01
 ETASHRINKVR(%)  6.5405E+01  9.5304E+01  7.7875E+01  9.9711E+01  4.4442E+01  8.1965E+01
 EBVSHRINKSD(%)  1.2700E+00  7.4395E+01  2.6742E+01  9.4924E+01  3.0042E+01  1.1015E+01
 EBVSHRINKVR(%)  2.5239E+00  9.3444E+01  4.6332E+01  9.9742E+01  5.1058E+01  2.0817E+01
 EPSSHRINKSD(%)  5.3392E+01  5.3392E+01
 EPSSHRINKVR(%)  7.8277E+01  7.8277E+01


 TOTAL DATA POINTS NORMALLY DISTRIBUTED (N):         1992
 N*LOG(2PI) CONSTANT TO OBJECTIVE FUNCTION:    3661.0511162874159
 OBJECTIVE FUNCTION VALUE WITHOUT CONSTANT:    7908.4411047977892
 OBJECTIVE FUNCTION VALUE WITH CONSTANT:       11569.492221085206
 REPORTED OBJECTIVE FUNCTION DOES NOT CONTAIN CONSTANT

 TOTAL EFFECTIVE ETAS (NIND*NETA):                           390


 #TERE:
 Elapsed estimation  time in seconds:    66.35

0PRED EXIT CODE = 1
0INDIVIDUAL NO.      44   ID= 4.40000000000000E+01   (WITHIN-INDIVIDUAL) DATA REC NO.   1
 THETA=
  1.08E+00   2.00E+00   4.96E+00  -1.28E-02   9.34E-01   9.97E+00   9.73E-01   1.00E-01   2.00E+00   9.98E-01
  1.00E+00   9.30E-01   4.99E-02   8.02E-01   9.76E-01   1.01E+00   5.00E+00
 OCCURS DURING SEARCH FOR ETA AT INITIAL VALUE, ETA=0
 ERROR IN TRANS4 ROUTINE: V1  IS NEGATIVE
0PROGRAM TERMINATED BY OBJ
 Elapsed covariance  time in seconds:     4.47
 MESSAGE ISSUED FROM COVARIANCE STEP

 ********************               FIRST ORDER CONDITIONAL ESTIMATION WITH INTERACTION              ********************
 #OBJT:**************                       MINIMUM VALUE OF OBJECTIVE FUNCTION                      ********************
 #OBJV:********************************************     7908.441       **************************************************

 ********************               FIRST ORDER CONDITIONAL ESTIMATION WITH INTERACTION              ********************
 ********************                             FINAL PARAMETER ESTIMATE                           ********************

 THETA - VECTOR OF FIXED EFFECTS PARAMETERS   *********
         TH 1      TH 2      TH 3      TH 4      TH 5      TH 6      TH 7      TH 8      TH 9      TH10      TH11      TH12
          TH13      TH14      TH15      TH16      TH17
         1.08E+00  2.00E+00  4.96E+00 -1.18E-02  9.34E-01  9.97E+00  9.73E-01  1.00E-01  2.00E+00  9.98E-01  1.00E+00  9.30E-01
          4.99E-02  8.02E-01  9.76E-01  1.01E+00  5.00E+00

 OMEGA - COV MATRIX FOR RANDOM EFFECTS - ETAS  ********
         ETA1      ETA2      ETA3      ETA4      ETA5      ETA6
 ETA1
+        3.00E-01
 ETA2
+        0.00E+00  3.16E-01
 ETA3
+        0.00E+00  0.00E+00  3.02E-01
 ETA4
+        0.00E+00  0.00E+00  0.00E+00  3.00E-01
 ETA5
+        0.00E+00  0.00E+00  0.00E+00  0.00E+00  3.01E-01
 ETA6
+        0.00E+00  0.00E+00  0.00E+00  0.00E+00  0.00E+00  3.00E-01

 SIGMA - COV MATRIX FOR RANDOM EFFECTS - EPSILONS  ****
         EPS1      EPS2
 EPS1
+        1.97E-01
 EPS2
+        0.00E+00  9.89E-01

 OMEGA - CORR MATRIX FOR RANDOM EFFECTS - ETAS  *******
         ETA1      ETA2      ETA3      ETA4      ETA5      ETA6
 ETA1
+        5.47E-01
 ETA2
+        0.00E+00  5.62E-01
 ETA3
+        0.00E+00  0.00E+00  5.49E-01
 ETA4
+        0.00E+00  0.00E+00  0.00E+00  5.48E-01
 ETA5
+        0.00E+00  0.00E+00  0.00E+00  0.00E+00  5.49E-01
 ETA6
+        0.00E+00  0.00E+00  0.00E+00  0.00E+00  0.00E+00  5.48E-01

 SIGMA - CORR MATRIX FOR RANDOM EFFECTS - EPSILONS  ***
         EPS1      EPS2
 EPS1
+        4.44E-01
 EPS2
+        0.00E+00  9.94E-01
 #CPUT: Total CPU Time in Seconds,       71.391
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