28.07.2025
22:11
$SIZES PD=-1000 LVR=-150 LTH=-200
$PROBLEM single pyDarwin individual, one among multitude
$INPUT ID TIME AMT RATE DV DROP MDV AGE SEX LBM DROP CMT EVID
$DATA "D:\Users\selzer\Repos\GH\pyDarwinXploR\RemiR/data.csv" IGNORE=@
$SUBROUTINE ADVAN11 TRANS4
$PK

  CL = THETA(1)    * EXP(ETA(1)) ; CL
  ; Q is not used ; Q

  V1 = THETA(2) *(1 + THETA(3) * (AGE)) *(LBM/50)**(THETA(4))  * EXP(ETA(2))
  SC = V1 ; V1

  TVV2SEX = 0
  IF(SEX == 1) THEN
  TVV2SEX = THETA(5)
  ENDIF
  V2 = THETA(6)   *(1 + TVV2SEX) * EXP(ETA(3)) ; V2

  TVQ2SEX = 0
  IF(SEX == 1) THEN
  TVQ2SEX = THETA(7)
  ENDIF
  Q2 = THETA(8) *(1 + THETA(9) * (AGE))  *(1 + TVQ2SEX) * EXP(ETA(4)) ; Q2

  TVQ3SEX = 0
  IF(SEX == 1) THEN
  TVQ3SEX = THETA(10)
  ENDIF
  Q3 = THETA(11)  *(LBM/50)**(THETA(12)) *(1 + TVQ3SEX) * EXP(ETA(5)) ; Q3

  TVV3SEX = 0
  IF(SEX == 1) THEN
  TVV3SEX = THETA(13)
  ENDIF
  V3 = THETA(14) *(1 + THETA(15) * (AGE))  *(1 + TVV3SEX) * EXP(ETA(6)) ; V3
$ERROR
  IPRED = F
  Y = F *(1+EPS(1))+EPS(2)
$SIGMA
  ;proportional error
  0.2	; EPS(1)
  ;additive error
  1	; EPS(2)
$THETA

  (0, 2) ; CL

  ; Q is not used

  (0, 5) ; V1
  (1); V1~AGE
  (1); V1~LBM

  (1);V2~SEX1
  (0, 10) ; V2

  (0.1);Q2~SEX1
  (0, 2) ; Q2
  (1); Q2~AGE

  (1);Q3~SEX1
  (0, 0.05) ; Q3

  (1); Q3~LBM

  (1);V3~SEX1
  (0, 5) ; V3
  (1); V3~AGE

$OMEGA
  0.3  ; CL
  ; Q is not used
  0.3  ; V1
  0.3  ; V2
  0.3  ; Q2
  0.3  ; Q3
  0.3  ; V3
$EST METHOD = COND INTER NOABORT MAX = 999999
$TABLE ID TIME AMT DV PRED IPRED WRES CWRES FILE=results.tab NOPRINT NOAPPEND ONEHEADER
$COV UNCOND PRINT=E

;; Phenotype: ([('ADVAN', 1), ('CL~AGE', 0), ('CL~LBM', 0), ('CL~SEX', 0), ('V1~AGE', 1), ('V1~LBM', 1), ('V1~SEX', 0), ('V2~AGE', 0), ('V2~LBM', 0), ('V2~SEX', 1), ('Q2~AGE', 1), ('Q2~LBM', 0), ('Q2~SEX', 1), ('Q3~AGE', 0), ('Q3~LBM', 1), ('Q3~SEX', 1), ('V3~AGE', 1), ('V3~LBM', 0), ('V3~SEX', 1), ('V3_OMEGA', 1), ('RESERR', 1)])
;; Genotype: [1, 0, 0, 0, 1, 0, 0, 1, 1, 1, 1, 0, 0, 0, 0, 1, 1, 1, 0, 1, 0, 1, 1, 1, 0, 1, 1, 1]
;; Num non-influential tokens: 7

NM-TRAN MESSAGES
 WARNINGS AND ERRORS (IF ANY) FOR PROBLEM    1
 (WARNING  2) NM-TRAN INFERS THAT THE DATA ARE POPULATION.

1NONLINEAR MIXED EFFECTS MODEL PROGRAM (NONMEM) VERSION 7.4.3
 ORIGINALLY DEVELOPED BY STUART BEAL, LEWIS SHEINER, AND ALISON BOECKMANN
 CURRENT DEVELOPERS ARE ROBERT BAUER, ICON DEVELOPMENT SOLUTIONS,
 AND ALISON BOECKMANN. IMPLEMENTATION, EFFICIENCY, AND STANDARDIZATION
 PERFORMED BY NOUS INFOSYSTEMS.
 PROBLEM NO.:         1
 single pyDarwin individual, one among multitude
 TOT. NO. OF OBS RECS:     1992
 TOT. NO. OF INDIVIDUALS:       65
 THREE COMPARTMENT MODEL (ADVAN11)
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 #TBLN:      1
 #METH: First Order Conditional Estimation with Interaction
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
 #TERM:
0MINIMIZATION TERMINATED
 DUE TO ROUNDING ERRORS (ERROR=134)
 NO. OF FUNCTION EVALUATIONS USED:     4851
 NO. OF SIG. DIGITS UNREPORTABLE
0PARAMETER ESTIMATE IS NEAR ITS BOUNDARY

 ETABAR IS THE ARITHMETIC MEAN OF THE ETA-ESTIMATES,
 AND THE P-VALUE IS GIVEN FOR THE NULL HYPOTHESIS THAT THE TRUE MEAN IS 0.

 ETABAR:        -1.2443E-02 -1.1082E-02  5.7166E-04  3.3720E-01  9.4874E-02 -1.0278E-03
 SE:             2.9508E-02  2.6681E-02  4.8550E-02  2.4790E-01  4.6595E-02  1.0736E-01
 N:                      65          65          65          65          65          65

 P VAL.:         6.7324E-01  6.7789E-01  9.9061E-01  1.7375E-01  4.1737E-02  9.9236E-01

 ETASHRINKSD(%)  2.0723E-01  1.9277E+01  1.0000E-10  1.3300E+01  2.4010E+01  1.6668E+01
 ETASHRINKVR(%)  4.1404E-01  3.4837E+01  1.0000E-10  2.4830E+01  4.2255E+01  3.0557E+01
 EBVSHRINKSD(%)  7.2032E-01  1.6644E+01  3.0983E+00  2.2763E-01  2.8635E+01  1.3553E+01
 EBVSHRINKVR(%)  1.4354E+00  3.0517E+01  6.1006E+00  4.5474E-01  4.9071E+01  2.5270E+01
 EPSSHRINKSD(%)  8.2896E+00  8.2896E+00
 EPSSHRINKVR(%)  1.5892E+01  1.5892E+01


 TOTAL DATA POINTS NORMALLY DISTRIBUTED (N):         1992
 N*LOG(2PI) CONSTANT TO OBJECTIVE FUNCTION:    3661.0511162874159
 OBJECTIVE FUNCTION VALUE WITHOUT CONSTANT:    3605.7726812396254
 OBJECTIVE FUNCTION VALUE WITH CONSTANT:       7266.8237975270413
 REPORTED OBJECTIVE FUNCTION DOES NOT CONTAIN CONSTANT

 TOTAL EFFECTIVE ETAS (NIND*NETA):                           390


 #TERE:
 Elapsed estimation  time in seconds:  1045.04
0S MATRIX ALGORITHMICALLY SINGULAR
0S MATRIX IS OUTPUT
0INVERSE COVARIANCE MATRIX SET TO RS*RMAT, WHERE S* IS A PSEUDO INVERSE OF S
 Elapsed covariance  time in seconds:   271.55
 Elapsed postprocess time in seconds:     0.60

 ********************               FIRST ORDER CONDITIONAL ESTIMATION WITH INTERACTION              ********************
 #OBJT:**************                       MINIMUM VALUE OF OBJECTIVE FUNCTION                      ********************
 #OBJV:********************************************     3605.773       **************************************************

 ********************               FIRST ORDER CONDITIONAL ESTIMATION WITH INTERACTION              ********************
 ********************                             FINAL PARAMETER ESTIMATE                           ********************

 THETA - VECTOR OF FIXED EFFECTS PARAMETERS   *********
         TH 1      TH 2      TH 3      TH 4      TH 5      TH 6      TH 7      TH 8      TH 9      TH10      TH11      TH12
          TH13      TH14      TH15
         2.48E+00  5.16E+00 -3.31E-03  9.78E-01  3.26E-01  7.25E+00  5.47E+01  2.01E-01 -7.92E-03  7.33E-01  7.89E-02 -7.21E-01
         -8.36E-01  2.04E+00  1.88E-01

 OMEGA - COV MATRIX FOR RANDOM EFFECTS - ETAS  ********
         ETA1      ETA2      ETA3      ETA4      ETA5      ETA6
 ETA1
+        5.77E-02
 ETA2
+        0.00E+00  7.21E-02
 ETA3
+        0.00E+00  0.00E+00  1.52E-01
 ETA4
+        0.00E+00  0.00E+00  0.00E+00  5.40E+00
 ETA5
+        0.00E+00  0.00E+00  0.00E+00  0.00E+00  2.48E-01
 ETA6
+        0.00E+00  0.00E+00  0.00E+00  0.00E+00  0.00E+00  1.10E+00

 SIGMA - COV MATRIX FOR RANDOM EFFECTS - EPSILONS  ****
         EPS1      EPS2
 EPS1
+        1.21E-02
 EPS2
+        0.00E+00  1.00E-04

 OMEGA - CORR MATRIX FOR RANDOM EFFECTS - ETAS  *******
         ETA1      ETA2      ETA3      ETA4      ETA5      ETA6
 ETA1
+        2.40E-01
 ETA2
+        0.00E+00  2.69E-01
 ETA3
+        0.00E+00  0.00E+00  3.90E-01
 ETA4
+        0.00E+00  0.00E+00  0.00E+00  2.32E+00
 ETA5
+        0.00E+00  0.00E+00  0.00E+00  0.00E+00  4.98E-01
 ETA6
+        0.00E+00  0.00E+00  0.00E+00  0.00E+00  0.00E+00  1.05E+00

 SIGMA - CORR MATRIX FOR RANDOM EFFECTS - EPSILONS  ***
         EPS1      EPS2
 EPS1
+        1.10E-01
 EPS2
+        0.00E+00  1.00E-02

 ********************               FIRST ORDER CONDITIONAL ESTIMATION WITH INTERACTION              ********************
 ********************                            STANDARD ERROR OF ESTIMATE                          ********************

 THETA - VECTOR OF FIXED EFFECTS PARAMETERS   *********
         TH 1      TH 2      TH 3      TH 4      TH 5      TH 6      TH 7      TH 8      TH 9      TH10      TH11      TH12
          TH13      TH14      TH15
         8.22E+02  5.66E+03  2.20E-01  1.05E+03  3.99E+02  1.69E+03  8.25E+04  2.43E+00  1.83E-01  5.72E+02  1.61E-02  1.12E+00
          2.35E+01  9.83E-01  1.76E-01

 OMEGA - COV MATRIX FOR RANDOM EFFECTS - ETAS  ********
         ETA1      ETA2      ETA3      ETA4      ETA5      ETA6
 ETA1
+        2.32E+01
 ETA2
+       .........  2.96E+00
 ETA3
+       ......... .........  4.83E+00
 ETA4
+       ......... ......... .........  6.07E+02
 ETA5
+       ......... ......... ......... .........  4.28E+00
 ETA6
+       ......... ......... ......... ......... .........  9.94E-01

 SIGMA - COV MATRIX FOR RANDOM EFFECTS - EPSILONS  ****
         EPS1      EPS2
 EPS1
+        1.29E-02
 EPS2
+       .........  0.00E+00

 OMEGA - CORR MATRIX FOR RANDOM EFFECTS - ETAS  *******
         ETA1      ETA2      ETA3      ETA4      ETA5      ETA6
 ETA1
+        4.83E+01
 ETA2
+       .........  5.51E+00
 ETA3
+       ......... .........  6.20E+00
 ETA4
+       ......... ......... .........  1.31E+02
 ETA5
+       ......... ......... ......... .........  4.29E+00
 ETA6
+       ......... ......... ......... ......... .........  4.75E-01

 SIGMA - CORR MATRIX FOR RANDOM EFFECTS - EPSILONS  ***
         EPS1      EPS2
 EPS1
+        5.85E-02
 EPS2
+       .........  0.00E+00
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
 ********************               FIRST ORDER CONDITIONAL ESTIMATION WITH INTERACTION              ********************
 ********************                      EIGENVALUES OF COR MATRIX OF ESTIMATE                     ********************

             1         2         3         4         5         6         7         8         9        10        11        12
             13        14        15        16        17        18        19        20        21        22        23
        -1.71E-16  1.30E-15 -2.19E-15  2.38E-15  5.68E-14  2.69E-12  4.11E-12  1.07E-11  1.23E-10  2.66E-10  1.48E-09  3.87E-09
          5.97E-09  8.82E-09  1.40E-08  2.63E-08  6.56E-08  1.92E-07  7.33E-07  1.58E-06  1.27E-05  1.00E+00  2.20E+01
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 Elapsed finaloutput time in seconds:     0.29
 #CPUT: Total CPU Time in Seconds,     1317.469
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