28.07.2025
22:11
$SIZES PD=-1000 LVR=-150 LTH=-200
$PROBLEM single pyDarwin individual, one among multitude
$INPUT ID TIME AMT RATE DV DROP MDV AGE SEX LBM DROP CMT EVID
$DATA "D:\Users\selzer\Repos\GH\pyDarwinXploR\RemiR/data.csv" IGNORE=@
$SUBROUTINE ADVAN3 TRANS4
$PK

  CL = THETA(1)  *(LBM/50)**(THETA(2))  * EXP(ETA(1)) ; CL

  TVQSEX = 0
  IF(SEX == 1) THEN
  TVQSEX = THETA(3)
  ENDIF
  Q = THETA(4)  *(LBM/50)**(THETA(5)) *(1 + TVQSEX) * EXP(ETA(2)) ; Q

  TVV1SEX = 0
  IF(SEX == 1) THEN
  TVV1SEX = THETA(6)
  ENDIF
  V1 = THETA(7) *(1 + THETA(8) * (AGE)) *(LBM/50)**(THETA(9)) *(1 + TVV1SEX) * EXP(ETA(3))
  SC = V1 ; V1

  TVV2SEX = 0
  IF(SEX == 1) THEN
  TVV2SEX = THETA(10)
  ENDIF
  V2 = THETA(11)  *(LBM/50)**(THETA(12)) *(1 + TVV2SEX) * EXP(ETA(4)) ; V2
  ; Q2 is not used ; Q2
  ; Q3 is not used ; Q3
  ; V3 is not used ; V3
$ERROR
  IPRED = F
  Y = F *(1+EPS(1))+EPS(2)
$SIGMA
  ;proportional error
  0.2	; EPS(1)
  ;additive error
  1	; EPS(2)
$THETA

  (0, 2) ; CL

  (1); CL~LBM

  (1);Q~SEX1
  (0, 1) ; Q

  (1); Q~LBM

  (1);V1~SEX1
  (0, 7) ; V1
  (1); V1~AGE
  (1); V1~LBM

  (1);V2~SEX1
  (0, 9) ; V2

  (1); V2~LBM
  ; Q2 is not used
  ; Q3 is not used
  ; V3 is not used
$OMEGA
  0.03  ; CL
  0.3  ; Q
  0.3  ; V1
  0.3  ; V2
  ; Q2 is not used
  ; Q3 is not used
  ; V3 is not used
$EST METHOD = COND INTER NOABORT MAX = 999999
$TABLE ID TIME AMT DV PRED IPRED WRES CWRES FILE=results.tab NOPRINT NOAPPEND ONEHEADER
$COV UNCOND PRINT=E

;; Phenotype: ([('ADVAN', 0), ('CL~AGE', 0), ('CL~LBM', 1), ('CL~SEX', 0), ('CL_OMEGA', 1), ('Q~AGE', 0), ('Q~LBM', 1), ('Q~SEX', 1), ('Q_OMEGA', 1), ('V1~AGE', 1), ('V1~LBM', 1), ('V1~SEX', 1), ('V1_OMEGA', 1), ('V2~AGE', 0), ('V2~LBM', 1), ('V2~SEX', 1), ('V2_OMEGA', 1), ('RESERR', 1)])
;; Genotype: [0, 0, 1, 0, 1, 0, 1, 1, 1, 1, 1, 1, 1, 0, 1, 1, 1, 1, 1, 0, 1, 0, 1, 0, 0, 1, 0, 1]
;; Num non-influential tokens: 10

NM-TRAN MESSAGES
 WARNINGS AND ERRORS (IF ANY) FOR PROBLEM    1
 (WARNING  2) NM-TRAN INFERS THAT THE DATA ARE POPULATION.

1NONLINEAR MIXED EFFECTS MODEL PROGRAM (NONMEM) VERSION 7.4.3
 ORIGINALLY DEVELOPED BY STUART BEAL, LEWIS SHEINER, AND ALISON BOECKMANN
 CURRENT DEVELOPERS ARE ROBERT BAUER, ICON DEVELOPMENT SOLUTIONS,
 AND ALISON BOECKMANN. IMPLEMENTATION, EFFICIENCY, AND STANDARDIZATION
 PERFORMED BY NOUS INFOSYSTEMS.
 PROBLEM NO.:         1
 single pyDarwin individual, one among multitude
 TOT. NO. OF OBS RECS:     1992
 TOT. NO. OF INDIVIDUALS:       65
 TWO COMPARTMENT MODEL (ADVAN3)
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 #TBLN:      1
 #METH: First Order Conditional Estimation with Interaction
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
 #TERM:
0MINIMIZATION TERMINATED
 DUE TO ROUNDING ERRORS (ERROR=134)
 NO. OF FUNCTION EVALUATIONS USED:     3301
 NO. OF SIG. DIGITS IN FINAL EST.:  2.2
 ADDITIONAL PROBLEMS OCCURRED WITH THE MINIMIZATION.
 REGARD THE RESULTS OF THE ESTIMATION STEP CAREFULLY, AND ACCEPT THEM ONLY
 AFTER CHECKING THAT THE COVARIANCE STEP PRODUCES REASONABLE OUTPUT.

 ETABAR IS THE ARITHMETIC MEAN OF THE ETA-ESTIMATES,
 AND THE P-VALUE IS GIVEN FOR THE NULL HYPOTHESIS THAT THE TRUE MEAN IS 0.

 ETABAR:        -8.7153E-04 -1.1946E-02  4.7873E-03 -4.5373E-03
 SE:             2.4290E-02  5.2235E-02  3.1534E-02  4.0433E-02
 N:                      65          65          65          65

 P VAL.:         9.7138E-01  8.1910E-01  8.7933E-01  9.1065E-01

 ETASHRINKSD(%)  2.7952E-01  4.5816E+00  9.2678E+00  2.0526E+00
 ETASHRINKVR(%)  5.5827E-01  8.9532E+00  1.7677E+01  4.0630E+00
 EBVSHRINKSD(%)  1.0757E+00  4.7857E+00  9.8200E+00  2.6634E+00
 EBVSHRINKVR(%)  2.1399E+00  9.3425E+00  1.8676E+01  5.2559E+00
 EPSSHRINKSD(%)  5.9895E+00  5.9895E+00
 EPSSHRINKVR(%)  1.1620E+01  1.1620E+01


 TOTAL DATA POINTS NORMALLY DISTRIBUTED (N):         1992
 N*LOG(2PI) CONSTANT TO OBJECTIVE FUNCTION:    3661.0511162874159
 OBJECTIVE FUNCTION VALUE WITHOUT CONSTANT:    4142.7444418215018
 OBJECTIVE FUNCTION VALUE WITH CONSTANT:       7803.7955581089172
 REPORTED OBJECTIVE FUNCTION DOES NOT CONTAIN CONSTANT

 TOTAL EFFECTIVE ETAS (NIND*NETA):                           260


 #TERE:
 Elapsed estimation  time in seconds:   162.97
 Elapsed covariance  time in seconds:    47.27
 Elapsed postprocess time in seconds:     0.14

 ********************               FIRST ORDER CONDITIONAL ESTIMATION WITH INTERACTION              ********************
 #OBJT:**************                       MINIMUM VALUE OF OBJECTIVE FUNCTION                      ********************
 #OBJV:********************************************     4142.744       **************************************************

 ********************               FIRST ORDER CONDITIONAL ESTIMATION WITH INTERACTION              ********************
 ********************                             FINAL PARAMETER ESTIMATE                           ********************

 THETA - VECTOR OF FIXED EFFECTS PARAMETERS   *********
         TH 1      TH 2      TH 3      TH 4      TH 5      TH 6      TH 7      TH 8      TH 9      TH10      TH11      TH12
         2.38E+00  5.74E-01 -6.74E-02  1.46E+00  8.47E-01  5.34E-02  6.97E+00 -5.77E-03  7.13E-01  2.68E-01  7.71E+00  5.14E-01

 OMEGA - COV MATRIX FOR RANDOM EFFECTS - ETAS  ********
         ETA1      ETA2      ETA3      ETA4
 ETA1
+        3.92E-02
 ETA2
+        0.00E+00  1.98E-01
 ETA3
+        0.00E+00  0.00E+00  7.97E-02
 ETA4
+        0.00E+00  0.00E+00  0.00E+00  1.12E-01

 SIGMA - COV MATRIX FOR RANDOM EFFECTS - EPSILONS  ****
         EPS1      EPS2
 EPS1
+        1.42E-02
 EPS2
+        0.00E+00  1.26E-02

 OMEGA - CORR MATRIX FOR RANDOM EFFECTS - ETAS  *******
         ETA1      ETA2      ETA3      ETA4
 ETA1
+        1.98E-01
 ETA2
+        0.00E+00  4.45E-01
 ETA3
+        0.00E+00  0.00E+00  2.82E-01
 ETA4
+        0.00E+00  0.00E+00  0.00E+00  3.35E-01

 SIGMA - CORR MATRIX FOR RANDOM EFFECTS - EPSILONS  ***
         EPS1      EPS2
 EPS1
+        1.19E-01
 EPS2
+        0.00E+00  1.12E-01

 ********************               FIRST ORDER CONDITIONAL ESTIMATION WITH INTERACTION              ********************
 ********************                            STANDARD ERROR OF ESTIMATE                          ********************

 THETA - VECTOR OF FIXED EFFECTS PARAMETERS   *********
         TH 1      TH 2      TH 3      TH 4      TH 5      TH 6      TH 7      TH 8      TH 9      TH10      TH11      TH12
         7.69E-02  1.40E-01  1.97E-01  2.09E-01  5.42E-01  1.57E-01  9.77E-01  8.71E-04  3.87E-01  1.84E-01  6.77E-01  3.67E-01

 OMEGA - COV MATRIX FOR RANDOM EFFECTS - ETAS  ********
         ETA1      ETA2      ETA3      ETA4
 ETA1
+        8.85E-03
 ETA2
+       .........  4.50E-02
 ETA3
+       ......... .........  2.23E-02
 ETA4
+       ......... ......... .........  2.81E-02

 SIGMA - COV MATRIX FOR RANDOM EFFECTS - EPSILONS  ****
         EPS1      EPS2
 EPS1
+        1.70E-03
 EPS2
+       .........  4.97E-03

 OMEGA - CORR MATRIX FOR RANDOM EFFECTS - ETAS  *******
         ETA1      ETA2      ETA3      ETA4
 ETA1
+        2.24E-02
 ETA2
+       .........  5.06E-02
 ETA3
+       ......... .........  3.94E-02
 ETA4
+       ......... ......... .........  4.19E-02

 SIGMA - CORR MATRIX FOR RANDOM EFFECTS - EPSILONS  ***
         EPS1      EPS2
 EPS1
+        7.14E-03
 EPS2
+       .........  2.21E-02
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
 ********************               FIRST ORDER CONDITIONAL ESTIMATION WITH INTERACTION              ********************
 ********************                      EIGENVALUES OF COR MATRIX OF ESTIMATE                     ********************

             1         2         3         4         5         6         7         8         9        10        11        12
             13        14        15        16        17        18
         5.73E-03  2.17E-02  3.99E-02  5.80E-02  7.10E-02  1.53E-01  1.72E-01  2.06E-01  2.77E-01  3.73E-01  5.56E-01  7.97E-01
          1.02E+00  1.51E+00  2.30E+00  2.51E+00  3.22E+00  4.70E+00
 Elapsed finaloutput time in seconds:     0.23
 #CPUT: Total CPU Time in Seconds,      210.578
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