01/04/2025
10:03
$SIZES PD=-1000 LVR=-150 LTH=-200
$PROBLEM single pyDarwin individual, one among multitude
$INPUT ID TIME AMT RATE MDV EVID DV WT DROP
$DATA "../../../dataset.csv" IGNORE=@
$SUBROUTINE ADVAN1 TRANS2
$PK
  CL = THETA(1) *(WT)**(THETA(2)) * EXP(ETA(1)) ; CL
  V = THETA(3)  * EXP(ETA(2))
  SC = V ; V
  ALAG1 = THETA(4)  *(WT)**(THETA(5)) * EXP(ETA(3)) ; ALAG1
  F1 = THETA(6)  *(WT)**(THETA(7)) ; F1
  ; Ka is not used ; Ka
  ; ALAG2 is not used ; ALAG2
  ; F2 is not used ; F2
  ; Q is not used ; Q
  ; V1 is not used ; V1
  ; V2 is not used ; V2
  ; V3 is not used ; V3
  ; ALAG3 is not used ; ALAG3
  ; F3 is not used ; F3
$ERROR
  IPRED = F
  Y = F *(1+EPS(1))
$SIGMA
  ;proportional error
  0.1	; EPS(1)
$THETA
  (0, 1) ; CL
  (0.1); CL~WT
  (0, 5) ; V

  (0, 1) ; ALAG1
  (0.1); ALAG1~WT
  (0, 0.5) ; F1
  (0.1); F1~WT
  ; Ka is not used
  ; ALAG2 is not used
  ; F2 is not used
  ; Q is not used
  ; V1 is not used
  ; V2 is not used
  ; V3 is not used
  ; ALAG3 is not used
  ; F3 is not used
$OMEGA
  0.3  ; CL
  0.3  ; V
  0.3  ; ALAG1
  ; F1 is not used
  ; Ka is not used
  ; ALAG2 is not used
  ; F2 is not used
  ; Q is not used
  ; V1 is not used
  ; V2 is not used
  ; V3 is not used
  ; ALAG3 is not used
  ; F3 is not used
$EST METHOD = COND INTER NOABORT MAX = 999999
$COV UNCOND PRINT=E

;; Phenotype: ({'ADVAN': 0, 'CL~WT': 1, 'CL_OMEGA': 1, 'V~WT': 0, 'V_OMEGA': 1, 'ALAG1_OMEGA': 1, 'ALAG1~WT': 1, 'ALAG1_THETA': 1, 'F1_OMEGA': 0, 'F1~WT': 1, 'F1_THETA': 1, 'Ka~WT': 0, 'Ka_OMEGA': 0, 'ALAG2_OMEGA': 0, 'ALAG2_THETA': 1, 'F2_OMEGA': 0, 'F2_THETA': 0, 'Q~WT': 1, 'V1~WT': 0, 'V2~WT': 1, 'V3~WT': 1, 'ALAG3_OMEGA': 0, 'ALAG3_THETA': 0, 'F3_OMEGA': 1, 'F3_THETA': 0, 'RESERR': 0})
;; Genotype: [0, 1, 1, 0, 1, 1, 1, 1, 0, 1, 1, 0, 0, 0, 1, 0, 0, 1, 0, 1, 1, 0, 0, 1, 0, 0]
;; Num non-influential tokens: 5

NM-TRAN MESSAGES
 WARNINGS AND ERRORS (IF ANY) FOR PROBLEM    1
 (WARNING  2) NM-TRAN INFERS THAT THE DATA ARE POPULATION.

1NONLINEAR MIXED EFFECTS MODEL PROGRAM (NONMEM) VERSION 7.4.3
 ORIGINALLY DEVELOPED BY STUART BEAL, LEWIS SHEINER, AND ALISON BOECKMANN
 CURRENT DEVELOPERS ARE ROBERT BAUER, ICON DEVELOPMENT SOLUTIONS,
 AND ALISON BOECKMANN. IMPLEMENTATION, EFFICIENCY, AND STANDARDIZATION
 PERFORMED BY NOUS INFOSYSTEMS.
 PROBLEM NO.:         1
 single pyDarwin individual, one among multitude
 TOT. NO. OF OBS RECS:      120
 TOT. NO. OF INDIVIDUALS:       12
 ONE COMPARTMENT MODEL (ADVAN1)
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 #TBLN:      1
 #METH: First Order Conditional Estimation with Interaction
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
0PROGRAM TERMINATED BY OBJ
 ERROR IN CELS   WITH INDIVIDUAL       1   ID= 1.00000000000000E+00
 SUM OF "SQUARED" WEIGHTED INDIVIDUAL RESIDUALS IS INFINITE
 MESSAGE ISSUED FROM ESTIMATION STEP
 AT INITIAL OBJ. FUNCTION EVALUATION

 #TERM:

 TOTAL DATA POINTS NORMALLY DISTRIBUTED (N):            0
 N*LOG(2PI) CONSTANT TO OBJECTIVE FUNCTION:    0.0000000000000000
 OBJECTIVE FUNCTION VALUE WITHOUT CONSTANT:   1.34078079299425971E+154
 OBJECTIVE FUNCTION VALUE WITH CONSTANT:      1.34078079299425971E+154
 REPORTED OBJECTIVE FUNCTION DOES NOT CONTAIN CONSTANT

 TOTAL EFFECTIVE ETAS (NIND*NETA):                             0


 #TERE:
 Elapsed estimation  time in seconds:     0.01
 #CPUT: Total CPU Time in Seconds,        0.078
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