01/04/2025
10:03
$SIZES PD=-1000 LVR=-150 LTH=-200
$PROBLEM single pyDarwin individual, one among multitude
$INPUT ID TIME AMT RATE MDV EVID DV WT DROP
$DATA "../../../dataset.csv" IGNORE=@
$SUBROUTINE ADVAN4 TRANS4
$PK
  CL = THETA(1)  * EXP(ETA(1)) ; CL
  ; V is not used ; V
  ALAG1 = THETA(2)   ; ALAG1
  ; F1
  Ka = THETA(3) *(WT)**(THETA(4)) * EXP(ETA(2)) ; Ka
  ; ALAG2
  F2 = THETA(5)  ; F2
  Q = THETA(6)  * EXP(ETA(3)) ; Q
  ; V1 is not used ; V1
  V2 = THETA(7) *(WT)**(THETA(8)) * EXP(ETA(4))
  SC = V2 ; V2
  V3 = THETA(9) *(WT)**(THETA(10)) * EXP(ETA(5)) ; V3
  ; ALAG3
  ; F3
$ERROR
  IPRED = F
  Y = F *(1+EPS(1))+EPS(2)
$SIGMA
  ;proportional error
  0.2	; EPS(1)
  ;additive error
  1	; EPS(2)
$THETA
  (0, 1) ; CL

  ; V is not used
  (0, 1) ; ALAG1
  ; F1 is not used
  (0, 1) ; Ka
  (0.1); Ka~WT
  ; ALAG2 is not used
  (0, 0.5) ; F2
  (0, 1) ; Q

  ; V1 is not used
  (0, 5) ; V2
  (0.1); V2~WT
  (0, 1) ; V3
  (0.1); V3~WT
  ; ALAG3 is not used
  ; F3 is not used
$OMEGA
  0.3  ; CL
  ; V is not used
  ; ALAG1 is not used
  ; F1 is not used
  0.3  ; Ka
  ; ALAG2 is not used
  ; F2 is not used
  0.3  ; Q
  ; V1 is not used
  0.3  ; V2
  0.3  ; V3
  ; ALAG3 is not used
  ; F3 is not used
$EST METHOD = COND INTER NOABORT MAX = 999999
$COV UNCOND PRINT=E

;; Phenotype: ({'ADVAN': 3, 'CL~WT': 0, 'CL_OMEGA': 1, 'V~WT': 1, 'V_OMEGA': 0, 'ALAG1_OMEGA': 0, 'ALAG1~WT': 0, 'ALAG1_THETA': 1, 'F1_OMEGA': 1, 'F1~WT': 1, 'F1_THETA': 0, 'Ka~WT': 1, 'Ka_OMEGA': 1, 'ALAG2_OMEGA': 0, 'ALAG2_THETA': 0, 'F2_OMEGA': 0, 'F2_THETA': 1, 'Q~WT': 0, 'V1~WT': 1, 'V2~WT': 1, 'V3~WT': 1, 'ALAG3_OMEGA': 1, 'ALAG3_THETA': 0, 'F3_OMEGA': 0, 'F3_THETA': 0, 'RESERR': 1})
;; Genotype: [3, 0, 1, 1, 0, 0, 0, 1, 1, 1, 0, 1, 1, 0, 0, 0, 1, 0, 1, 1, 1, 1, 0, 0, 0, 1]
;; Num non-influential tokens: 7

NM-TRAN MESSAGES
 WARNINGS AND ERRORS (IF ANY) FOR PROBLEM    1
 (WARNING  2) NM-TRAN INFERS THAT THE DATA ARE POPULATION.

1NONLINEAR MIXED EFFECTS MODEL PROGRAM (NONMEM) VERSION 7.4.3
 ORIGINALLY DEVELOPED BY STUART BEAL, LEWIS SHEINER, AND ALISON BOECKMANN
 CURRENT DEVELOPERS ARE ROBERT BAUER, ICON DEVELOPMENT SOLUTIONS,
 AND ALISON BOECKMANN. IMPLEMENTATION, EFFICIENCY, AND STANDARDIZATION
 PERFORMED BY NOUS INFOSYSTEMS.
 PROBLEM NO.:         1
 single pyDarwin individual, one among multitude
 TOT. NO. OF OBS RECS:      120
 TOT. NO. OF INDIVIDUALS:       12
 TWO COMPARTMENT MODEL WITH FIRST-ORDER ABSORPTION (ADVAN4)
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 #TBLN:      1
 #METH: First Order Conditional Estimation with Interaction
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
 #TERM:
0MINIMIZATION TERMINATED
 DUE TO PROXIMITY OF NEXT ITERATION EST. TO A VALUE
 AT WHICH THE OBJ. FUNC. IS INFINITE
0AT THE LAST COMPUTED INFINITE VALUE OF THE OBJ. FUNCT.:

0PRED EXIT CODE = 1
0INDIVIDUAL NO.       1   ID= 1.00000000000000E+00   (WITHIN-INDIVIDUAL) DATA REC NO.   2
 THETA=
  4.38E-02   1.36E-01   2.45E-01   5.42E-01   5.00E-01   2.89E+01   1.96E+00  -2.75E-01   8.16E-01  -6.49E-01
 ETA=
 -7.16E-01   6.02E-03  -1.42E-04  -3.80E-01   1.16E+03
 OCCURS DURING SEARCH FOR ETA AT A NONZERO VALUE OF ETA
 PK PARAMETER FOR K32 IS NON-POSITIVE

 NO. OF FUNCTION EVALUATIONS USED:      435
 NO. OF SIG. DIGITS UNREPORTABLE
0PARAMETER ESTIMATE IS NEAR ITS BOUNDARY

 ETABAR IS THE ARITHMETIC MEAN OF THE ETA-ESTIMATES,
 AND THE P-VALUE IS GIVEN FOR THE NULL HYPOTHESIS THAT THE TRUE MEAN IS 0.

 ETABAR:        -1.1736E-01 -1.3453E-02 -3.5458E-11 -2.4730E-01 -8.0170E+00
 SE:             7.7271E-02  2.0708E-01  5.1066E-11  3.6771E-02  2.0366E-01
 N:                      12          12          12          12          12

 P VAL.:         1.2882E-01  9.4820E-01  4.8746E-01  1.7618E-11  0.0000E+00

 ETASHRINKSD(%)  7.5556E+01  1.6664E+01  1.0000E+02  5.9358E+01  9.9784E+01
 ETASHRINKVR(%)  9.4025E+01  3.0552E+01  1.0000E+02  8.3482E+01  1.0000E+02
 EBVSHRINKSD(%)  5.4518E-01  2.8990E+00  1.0000E+02  2.6313E+00  9.4539E+01
 EBVSHRINKVR(%)  1.0874E+00  5.7140E+00  1.0000E+02  5.1934E+00  9.9702E+01
 EPSSHRINKSD(%)  2.7444E+01  2.7444E+01
 EPSSHRINKVR(%)  4.7356E+01  4.7356E+01


 TOTAL DATA POINTS NORMALLY DISTRIBUTED (N):          120
 N*LOG(2PI) CONSTANT TO OBJECTIVE FUNCTION:    220.54524796912145
 OBJECTIVE FUNCTION VALUE WITHOUT CONSTANT:    129.77616436872736
 OBJECTIVE FUNCTION VALUE WITH CONSTANT:       350.32141233784881
 REPORTED OBJECTIVE FUNCTION DOES NOT CONTAIN CONSTANT

 TOTAL EFFECTIVE ETAS (NIND*NETA):                            60


 #TERE:
 Elapsed estimation  time in seconds:     2.88

0PRED EXIT CODE = 1
0INDIVIDUAL NO.       1   ID= 1.00000000000000E+00   (WITHIN-INDIVIDUAL) DATA REC NO.   2
 THETA=
  4.37E-02   1.36E-01   2.45E-01   5.42E-01   5.00E-01   2.89E+01   1.96E+00  -2.75E-01   8.16E-01  -6.50E-01
 ETA=
 -1.01E-01   3.08E-02  -3.44E-05  -3.74E-01  -7.71E+01
 OCCURS DURING SEARCH FOR ETA AT A NONZERO VALUE OF ETA
 A ROOT OF THE CHARACTERISTIC EQUATION IS ZERO BECAUSE
 K*K32 IS MUCH SMALLER THAN  (K+K23+K32)**2.
 PERHAPS K OR K32 IS VERY SMALL, OR K23 IS VERY LARGE.
0PROGRAM TERMINATED BY OBJ
 Elapsed covariance  time in seconds:     1.08
 MESSAGE ISSUED FROM COVARIANCE STEP

 ********************               FIRST ORDER CONDITIONAL ESTIMATION WITH INTERACTION              ********************
 #OBJT:**************                       MINIMUM VALUE OF OBJECTIVE FUNCTION                      ********************
 #OBJV:********************************************      129.776       **************************************************

 ********************               FIRST ORDER CONDITIONAL ESTIMATION WITH INTERACTION              ********************
 ********************                             FINAL PARAMETER ESTIMATE                           ********************

 THETA - VECTOR OF FIXED EFFECTS PARAMETERS   *********
         TH 1      TH 2      TH 3      TH 4      TH 5      TH 6      TH 7      TH 8      TH 9      TH10
         4.38E-02  1.36E-01  2.45E-01  5.42E-01  5.00E-01  2.89E+01  1.96E+00 -2.75E-01  8.16E-01 -6.50E-01

 OMEGA - COV MATRIX FOR RANDOM EFFECTS - ETAS  ********
         ETA1      ETA2      ETA3      ETA4      ETA5
 ETA1
+        1.31E+00
 ETA2
+        0.00E+00  8.08E-01
 ETA3
+        0.00E+00  0.00E+00  1.06E-01
 ETA4
+        0.00E+00  0.00E+00  0.00E+00  1.07E-01
 ETA5
+        0.00E+00  0.00E+00  0.00E+00  0.00E+00  1.16E+05

 SIGMA - COV MATRIX FOR RANDOM EFFECTS - EPSILONS  ****
         EPS1      EPS2
 EPS1
+        2.00E-05
 EPS2
+        0.00E+00  4.75E-01

 OMEGA - CORR MATRIX FOR RANDOM EFFECTS - ETAS  *******
         ETA1      ETA2      ETA3      ETA4      ETA5
 ETA1
+        1.14E+00
 ETA2
+        0.00E+00  8.99E-01
 ETA3
+        0.00E+00  0.00E+00  3.26E-01
 ETA4
+        0.00E+00  0.00E+00  0.00E+00  3.27E-01
 ETA5
+        0.00E+00  0.00E+00  0.00E+00  0.00E+00  3.41E+02

 SIGMA - CORR MATRIX FOR RANDOM EFFECTS - EPSILONS  ***
         EPS1      EPS2
 EPS1
+        4.47E-03
 EPS2
+        0.00E+00  6.90E-01
 #CPUT: Total CPU Time in Seconds,        3.813
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