01/04/2025
10:03
$SIZES PD=-1000 LVR=-150 LTH=-200
$PROBLEM single pyDarwin individual, one among multitude
$INPUT ID TIME AMT RATE MDV EVID DV WT DROP
$DATA "../../../dataset.csv" IGNORE=@
$SUBROUTINE ADVAN1 TRANS2
$PK
  CL = THETA(1)  * EXP(ETA(1)) ; CL
  V = THETA(2) *(WT)**(THETA(3))
  SC = V ; V
  ALAG1 = THETA(4)  *(WT)**(THETA(5)) * EXP(ETA(2)) ; ALAG1
  ; F1
  ; Ka is not used ; Ka
  ; ALAG2 is not used ; ALAG2
  ; F2 is not used ; F2
  ; Q is not used ; Q
  ; V1 is not used ; V1
  ; V2 is not used ; V2
  ; V3 is not used ; V3
  ; ALAG3 is not used ; ALAG3
  ; F3 is not used ; F3
$ERROR
  IPRED = F
  Y = F *(1+EPS(1))+EPS(2)
$SIGMA
  ;proportional error
  0.2	; EPS(1)
  ;additive error
  1	; EPS(2)
$THETA
  (0, 1) ; CL

  (0, 5) ; V
  (0.1); V~WT
  (0, 1) ; ALAG1
  (0.1); ALAG1~WT
  ; F1 is not used
  ; Ka is not used
  ; ALAG2 is not used
  ; F2 is not used
  ; Q is not used
  ; V1 is not used
  ; V2 is not used
  ; V3 is not used
  ; ALAG3 is not used
  ; F3 is not used
$OMEGA
  0.3  ; CL

  0.3  ; ALAG1
  ; F1 is not used
  ; Ka is not used
  ; ALAG2 is not used
  ; F2 is not used
  ; Q is not used
  ; V1 is not used
  ; V2 is not used
  ; V3 is not used
  ; ALAG3 is not used
  ; F3 is not used
$EST METHOD = COND INTER NOABORT MAX = 999999
$COV UNCOND PRINT=E

;; Phenotype: ({'ADVAN': 0, 'CL~WT': 0, 'CL_OMEGA': 1, 'V~WT': 1, 'V_OMEGA': 0, 'ALAG1_OMEGA': 1, 'ALAG1~WT': 1, 'ALAG1_THETA': 1, 'F1_OMEGA': 0, 'F1~WT': 1, 'F1_THETA': 0, 'Ka~WT': 0, 'Ka_OMEGA': 0, 'ALAG2_OMEGA': 1, 'ALAG2_THETA': 1, 'F2_OMEGA': 1, 'F2_THETA': 0, 'Q~WT': 0, 'V1~WT': 1, 'V2~WT': 1, 'V3~WT': 0, 'ALAG3_OMEGA': 0, 'ALAG3_THETA': 1, 'F3_OMEGA': 1, 'F3_THETA': 1, 'RESERR': 1})
;; Genotype: [0, 0, 1, 1, 0, 1, 1, 1, 0, 1, 0, 0, 0, 1, 1, 1, 0, 0, 1, 1, 0, 0, 1, 1, 1, 1]
;; Num non-influential tokens: 9

NM-TRAN MESSAGES
 WARNINGS AND ERRORS (IF ANY) FOR PROBLEM    1
 (WARNING  2) NM-TRAN INFERS THAT THE DATA ARE POPULATION.

1NONLINEAR MIXED EFFECTS MODEL PROGRAM (NONMEM) VERSION 7.4.3
 ORIGINALLY DEVELOPED BY STUART BEAL, LEWIS SHEINER, AND ALISON BOECKMANN
 CURRENT DEVELOPERS ARE ROBERT BAUER, ICON DEVELOPMENT SOLUTIONS,
 AND ALISON BOECKMANN. IMPLEMENTATION, EFFICIENCY, AND STANDARDIZATION
 PERFORMED BY NOUS INFOSYSTEMS.
 PROBLEM NO.:         1
 single pyDarwin individual, one among multitude
 TOT. NO. OF OBS RECS:      120
 TOT. NO. OF INDIVIDUALS:       12
 ONE COMPARTMENT MODEL (ADVAN1)
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 #TBLN:      1
 #METH: First Order Conditional Estimation with Interaction
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
 #TERM:
0MINIMIZATION TERMINATED
 DUE TO ROUNDING ERRORS (ERROR=134)
 NO. OF FUNCTION EVALUATIONS USED:     1962
 NO. OF SIG. DIGITS UNREPORTABLE
0PARAMETER ESTIMATE IS NEAR ITS BOUNDARY

 ETABAR IS THE ARITHMETIC MEAN OF THE ETA-ESTIMATES,
 AND THE P-VALUE IS GIVEN FOR THE NULL HYPOTHESIS THAT THE TRUE MEAN IS 0.

 ETABAR:         1.1584E-02  2.2656E-81
 SE:             6.1708E-02  2.0147E-81
 N:                      12          12

 P VAL.:         8.5109E-01  2.6078E-01

 ETASHRINKSD(%)  9.0854E+00  1.0000E+02
 ETASHRINKVR(%)  1.7345E+01  1.0000E+02
 EBVSHRINKSD(%)  1.3074E+01  1.0000E+02
 EBVSHRINKVR(%)  2.4439E+01  1.0000E+02
 EPSSHRINKSD(%)  2.6537E+00  2.6537E+00
 EPSSHRINKVR(%)  5.2371E+00  5.2371E+00


 TOTAL DATA POINTS NORMALLY DISTRIBUTED (N):          120
 N*LOG(2PI) CONSTANT TO OBJECTIVE FUNCTION:    220.54524796912145
 OBJECTIVE FUNCTION VALUE WITHOUT CONSTANT:    254.74228852003134
 OBJECTIVE FUNCTION VALUE WITH CONSTANT:       475.28753648915279
 REPORTED OBJECTIVE FUNCTION DOES NOT CONTAIN CONSTANT

 TOTAL EFFECTIVE ETAS (NIND*NETA):                            24


 #TERE:
 Elapsed estimation  time in seconds:     3.50
0S MATRIX ALGORITHMICALLY SINGULAR
0S MATRIX IS OUTPUT
0INVERSE COVARIANCE MATRIX SET TO RS*RMAT, WHERE S* IS A PSEUDO INVERSE OF S
 Elapsed covariance  time in seconds:     0.50
 Elapsed postprocess time in seconds:     0.00

 ********************               FIRST ORDER CONDITIONAL ESTIMATION WITH INTERACTION              ********************
 #OBJT:**************                       MINIMUM VALUE OF OBJECTIVE FUNCTION                      ********************
 #OBJV:********************************************      254.742       **************************************************

 ********************               FIRST ORDER CONDITIONAL ESTIMATION WITH INTERACTION              ********************
 ********************                             FINAL PARAMETER ESTIMATE                           ********************

 THETA - VECTOR OF FIXED EFFECTS PARAMETERS   *********
         TH 1      TH 2      TH 3      TH 4      TH 5
         4.01E-02  1.88E+01 -8.26E-01  1.00E-02 -4.42E+01

 OMEGA - COV MATRIX FOR RANDOM EFFECTS - ETAS  ********
         ETA1      ETA2
 ETA1
+        6.03E-02
 ETA2
+        0.00E+00  5.01E-01

 SIGMA - COV MATRIX FOR RANDOM EFFECTS - EPSILONS  ****
         EPS1      EPS2
 EPS1
+        1.03E-01
 EPS2
+        0.00E+00  1.00E-04

 OMEGA - CORR MATRIX FOR RANDOM EFFECTS - ETAS  *******
         ETA1      ETA2
 ETA1
+        2.46E-01
 ETA2
+        0.00E+00  7.08E-01

 SIGMA - CORR MATRIX FOR RANDOM EFFECTS - EPSILONS  ***
         EPS1      EPS2
 EPS1
+        3.22E-01
 EPS2
+        0.00E+00  1.00E-02

 ********************               FIRST ORDER CONDITIONAL ESTIMATION WITH INTERACTION              ********************
 ********************                            STANDARD ERROR OF ESTIMATE                          ********************

 THETA - VECTOR OF FIXED EFFECTS PARAMETERS   *********
         TH 1      TH 2      TH 3      TH 4      TH 5
         3.70E-03  2.03E+01  2.58E-01  0.00E+00  0.00E+00

 OMEGA - COV MATRIX FOR RANDOM EFFECTS - ETAS  ********
         ETA1      ETA2
 ETA1
+        4.52E-02
 ETA2
+       .........  3.06E+03

 SIGMA - COV MATRIX FOR RANDOM EFFECTS - EPSILONS  ****
         EPS1      EPS2
 EPS1
+        1.66E-02
 EPS2
+       .........  0.00E+00

 OMEGA - CORR MATRIX FOR RANDOM EFFECTS - ETAS  *******
         ETA1      ETA2
 ETA1
+        9.20E-02
 ETA2
+       .........  2.16E+03

 SIGMA - CORR MATRIX FOR RANDOM EFFECTS - EPSILONS  ***
         EPS1      EPS2
 EPS1
+        2.57E-02
 EPS2
+       .........  0.00E+00

 ********************               FIRST ORDER CONDITIONAL ESTIMATION WITH INTERACTION              ********************
 ********************                          COVARIANCE MATRIX OF ESTIMATE                         ********************

            TH 1      TH 2      TH 3      TH 4      TH 5      OM11      OM12      OM22      SG11      SG12      SG22
 TH 1
+        1.37E-05
 TH 2
+       -4.34E-02  4.13E+02
 TH 3
+        5.61E-04 -5.24E+00  6.64E-02
 TH 4
+        0.00E+00  0.00E+00  0.00E+00  0.00E+00
 TH 5
+        0.00E+00  0.00E+00  0.00E+00  0.00E+00  0.00E+00
 OM11
+       -1.23E-04  5.15E-01 -6.49E-03  0.00E+00  0.00E+00  2.04E-03
 OM12
+       ......... ......... ......... ......... ......... ......... .........
 OM22
+       -2.72E+00  3.18E+04 -4.13E+02  0.00E+00  0.00E+00  3.54E+01 .........  9.34E+06
 SG11
+        1.47E-05 -1.72E-01  2.24E-03  0.00E+00  0.00E+00 -1.92E-04 ......... -5.06E+01  2.74E-04
 SG12
+       ......... ......... ......... ......... ......... ......... ......... ......... ......... .........
 SG22
+        0.00E+00  0.00E+00  0.00E+00  0.00E+00  0.00E+00  0.00E+00 .........  0.00E+00  0.00E+00 .........  0.00E+00

 ********************               FIRST ORDER CONDITIONAL ESTIMATION WITH INTERACTION              ********************
 ********************                          CORRELATION MATRIX OF ESTIMATE                        ********************

            TH 1      TH 2      TH 3      TH 4      TH 5      OM11      OM12      OM22      SG11      SG12      SG22
 TH 1
+        3.70E-03
 TH 2
+       -5.78E-01  2.03E+01
 TH 3
+        5.89E-01 -9.99E-01  2.58E-01
 TH 4
+        0.00E+00  0.00E+00  0.00E+00  0.00E+00
 TH 5
+        0.00E+00  0.00E+00  0.00E+00  0.00E+00  0.00E+00
 OM11
+       -7.37E-01  5.61E-01 -5.58E-01  0.00E+00  0.00E+00  4.52E-02
 OM12
+       ......... ......... ......... ......... ......... ......... .........
 OM22
+       -2.40E-01  5.11E-01 -5.24E-01  0.00E+00  0.00E+00  2.56E-01 .........  3.06E+03
 SG11
+        2.40E-01 -5.11E-01  5.24E-01  0.00E+00  0.00E+00 -2.56E-01 ......... -1.00E+00  1.66E-02
 SG12
+       ......... ......... ......... ......... ......... ......... ......... ......... ......... .........
 SG22
+        0.00E+00  0.00E+00  0.00E+00  0.00E+00  0.00E+00  0.00E+00 .........  0.00E+00  0.00E+00 .........  0.00E+00
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
 ********************               FIRST ORDER CONDITIONAL ESTIMATION WITH INTERACTION              ********************
 ********************                      EIGENVALUES OF COR MATRIX OF ESTIMATE                     ********************

             1         2         3         4         5         6         7         8         9
         8.17E-17  2.09E-04  2.61E-01  6.06E-01  1.00E+00  1.00E+00  1.00E+00  1.40E+00  3.73E+00
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 Elapsed finaloutput time in seconds:     0.02
 #CPUT: Total CPU Time in Seconds,        3.891
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