01/04/2025
10:04
$SIZES PD=-1000 LVR=-150 LTH=-200
$PROBLEM single pyDarwin individual, one among multitude
$INPUT ID TIME AMT RATE MDV EVID DV WT DROP
$DATA "../../../dataset.csv" IGNORE=@
$SUBROUTINE ADVAN4 TRANS4
$PK
  CL = THETA(1) *(WT)**(THETA(2)) * EXP(ETA(1)) ; CL
  ; V is not used ; V
  ; ALAG1
  ; F1
  Ka = THETA(3) *(WT)**(THETA(4)) * EXP(ETA(2)) ; Ka
  ALAG2 = THETA(5)  * EXP(ETA(3)) ; ALAG2
  ; F2
  Q = THETA(6)  * EXP(ETA(4)) ; Q
  ; V1 is not used ; V1
  V2 = THETA(7) *(WT)**(THETA(8)) * EXP(ETA(5))
  SC = V2 ; V2
  V3 = THETA(9) *(WT)**(THETA(10)) * EXP(ETA(6)) ; V3
  ALAG3 = THETA(11)  * EXP(ETA(7)) ; ALAG3
  F3 = THETA(12)  ; F3
$ERROR
  IPRED = F
  Y = F *(1+EPS(1))
$SIGMA
  ;proportional error
  0.1	; EPS(1)
$THETA
  (0, 1) ; CL
  (0.1); CL~WT
  ; V is not used
  ; ALAG1 is not used
  ; F1 is not used
  (0, 1) ; Ka
  (0.1); Ka~WT
  (0, 1) ; ALAG2
  ; F2 is not used
  (0, 1) ; Q

  ; V1 is not used
  (0, 5) ; V2
  (0.1); V2~WT
  (0, 1) ; V3
  (0.1); V3~WT
  (0, 1) ; ALAG3
  (0, 0.5) ; F3
$OMEGA
  0.3  ; CL
  ; V is not used
  ; ALAG1 is not used
  ; F1 is not used
  0.3  ; Ka
  0.3  ; ALAG2
  ; F2 is not used
  0.3  ; Q
  ; V1 is not used
  0.3  ; V2
  0.3  ; V3
  0.3  ; ALAG3
  ; F3 is not used
$EST METHOD = COND INTER NOABORT MAX = 999999
$COV UNCOND PRINT=E

;; Phenotype: ({'ADVAN': 3, 'CL~WT': 1, 'CL_OMEGA': 1, 'V~WT': 0, 'V_OMEGA': 0, 'ALAG1_OMEGA': 1, 'ALAG1~WT': 0, 'ALAG1_THETA': 0, 'F1_OMEGA': 0, 'F1~WT': 0, 'F1_THETA': 0, 'Ka~WT': 1, 'Ka_OMEGA': 0, 'ALAG2_OMEGA': 1, 'ALAG2_THETA': 1, 'F2_OMEGA': 1, 'F2_THETA': 0, 'Q~WT': 0, 'V1~WT': 1, 'V2~WT': 1, 'V3~WT': 1, 'ALAG3_OMEGA': 1, 'ALAG3_THETA': 1, 'F3_OMEGA': 0, 'F3_THETA': 1, 'RESERR': 0})
;; Genotype: [3, 1, 1, 0, 0, 1, 0, 0, 0, 0, 0, 1, 0, 1, 1, 1, 0, 0, 1, 1, 1, 1, 1, 0, 1, 0]
;; Num non-influential tokens: 4

NM-TRAN MESSAGES
 WARNINGS AND ERRORS (IF ANY) FOR PROBLEM    1
 (WARNING  2) NM-TRAN INFERS THAT THE DATA ARE POPULATION.

1NONLINEAR MIXED EFFECTS MODEL PROGRAM (NONMEM) VERSION 7.4.3
 ORIGINALLY DEVELOPED BY STUART BEAL, LEWIS SHEINER, AND ALISON BOECKMANN
 CURRENT DEVELOPERS ARE ROBERT BAUER, ICON DEVELOPMENT SOLUTIONS,
 AND ALISON BOECKMANN. IMPLEMENTATION, EFFICIENCY, AND STANDARDIZATION
 PERFORMED BY NOUS INFOSYSTEMS.
 PROBLEM NO.:         1
 single pyDarwin individual, one among multitude
 TOT. NO. OF OBS RECS:      120
 TOT. NO. OF INDIVIDUALS:       12
 TWO COMPARTMENT MODEL WITH FIRST-ORDER ABSORPTION (ADVAN4)
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 #TBLN:      1
 #METH: First Order Conditional Estimation with Interaction
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
 #TERM:
0MINIMIZATION TERMINATED
 DUE TO ROUNDING ERRORS (ERROR=134)
 NO. OF FUNCTION EVALUATIONS USED:     1642
 NO. OF SIG. DIGITS UNREPORTABLE
0PARAMETER ESTIMATE IS NEAR ITS BOUNDARY

 ETABAR IS THE ARITHMETIC MEAN OF THE ETA-ESTIMATES,
 AND THE P-VALUE IS GIVEN FOR THE NULL HYPOTHESIS THAT THE TRUE MEAN IS 0.

 ETABAR:         3.1897E-03 -2.2260E-02  0.0000E+00 -1.7322E-08 -5.1933E-03 -4.2454E-03  0.0000E+00
 SE:             6.5427E-02  1.5709E-01  0.0000E+00  4.5213E-08  2.1938E-02  1.1323E-02  0.0000E+00
 N:                      12          12          12          12          12          12          12

 P VAL.:         9.6112E-01  8.8731E-01  1.0000E+00  7.0163E-01  8.1287E-01  7.0771E-01  1.0000E+00

 ETASHRINKSD(%)  7.7328E-03  2.6938E+00  1.0000E+02  1.0000E+02  2.1640E+01  9.4902E+01  1.0000E+02
 ETASHRINKVR(%)  1.5465E-02  5.3151E+00  1.0000E+02  1.0000E+02  3.8596E+01  9.9740E+01  1.0000E+02
 EBVSHRINKSD(%)  3.6833E+00  5.1096E+00  1.0000E+02  1.0000E+02  2.5186E+01  9.5012E+01  1.0000E+02
 EBVSHRINKVR(%)  7.2310E+00  9.9581E+00  1.0000E+02  1.0000E+02  4.4028E+01  9.9751E+01  1.0000E+02
 EPSSHRINKSD(%)  1.1812E+01
 EPSSHRINKVR(%)  2.2229E+01


 TOTAL DATA POINTS NORMALLY DISTRIBUTED (N):          120
 N*LOG(2PI) CONSTANT TO OBJECTIVE FUNCTION:    220.54524796912145
 OBJECTIVE FUNCTION VALUE WITHOUT CONSTANT:    127.31434811632342
 OBJECTIVE FUNCTION VALUE WITH CONSTANT:       347.85959608544488
 REPORTED OBJECTIVE FUNCTION DOES NOT CONTAIN CONSTANT

 TOTAL EFFECTIVE ETAS (NIND*NETA):                            60


 #TERE:
 Elapsed estimation  time in seconds:     6.89
0S MATRIX ALGORITHMICALLY SINGULAR
0S MATRIX IS OUTPUT
0INVERSE COVARIANCE MATRIX SET TO RS*RMAT, WHERE S* IS A PSEUDO INVERSE OF S
 Elapsed covariance  time in seconds:     3.80
 Elapsed postprocess time in seconds:     0.00

 ********************               FIRST ORDER CONDITIONAL ESTIMATION WITH INTERACTION              ********************
 #OBJT:**************                       MINIMUM VALUE OF OBJECTIVE FUNCTION                      ********************
 #OBJV:********************************************      127.314       **************************************************

 ********************               FIRST ORDER CONDITIONAL ESTIMATION WITH INTERACTION              ********************
 ********************                             FINAL PARAMETER ESTIMATE                           ********************

 THETA - VECTOR OF FIXED EFFECTS PARAMETERS   *********
         TH 1      TH 2      TH 3      TH 4      TH 5      TH 6      TH 7      TH 8      TH 9      TH10      TH11      TH12
         8.71E-01 -7.25E-01  1.00E-02  1.18E+00  1.00E+00  3.65E+05  2.67E+00 -4.14E-01  6.68E-01 -1.22E+00  1.00E+00  5.00E-01

 OMEGA - COV MATRIX FOR RANDOM EFFECTS - ETAS  ********
         ETA1      ETA2      ETA3      ETA4      ETA5      ETA6      ETA7
 ETA1
+        5.60E-02
 ETA2
+        0.00E+00  3.41E-01
 ETA3
+        0.00E+00  0.00E+00  3.00E-01
 ETA4
+        0.00E+00  0.00E+00  0.00E+00  1.15E+00
 ETA5
+        0.00E+00  0.00E+00  0.00E+00  0.00E+00  1.03E-02
 ETA6
+        0.00E+00  0.00E+00  0.00E+00  0.00E+00  0.00E+00  6.46E-01
 ETA7
+        0.00E+00  0.00E+00  0.00E+00  0.00E+00  0.00E+00  0.00E+00  3.00E-01

 SIGMA - COV MATRIX FOR RANDOM EFFECTS - EPSILONS  ****
         EPS1
 EPS1
+        2.52E-02

 OMEGA - CORR MATRIX FOR RANDOM EFFECTS - ETAS  *******
         ETA1      ETA2      ETA3      ETA4      ETA5      ETA6      ETA7
 ETA1
+        2.37E-01
 ETA2
+        0.00E+00  5.84E-01
 ETA3
+        0.00E+00  0.00E+00  5.48E-01
 ETA4
+        0.00E+00  0.00E+00  0.00E+00  1.07E+00
 ETA5
+        0.00E+00  0.00E+00  0.00E+00  0.00E+00  1.01E-01
 ETA6
+        0.00E+00  0.00E+00  0.00E+00  0.00E+00  0.00E+00  8.04E-01
 ETA7
+        0.00E+00  0.00E+00  0.00E+00  0.00E+00  0.00E+00  0.00E+00  5.48E-01

 SIGMA - CORR MATRIX FOR RANDOM EFFECTS - EPSILONS  ***
         EPS1
 EPS1
+        1.59E-01

 ********************               FIRST ORDER CONDITIONAL ESTIMATION WITH INTERACTION              ********************
 ********************                            STANDARD ERROR OF ESTIMATE                          ********************

 THETA - VECTOR OF FIXED EFFECTS PARAMETERS   *********
         TH 1      TH 2      TH 3      TH 4      TH 5      TH 6      TH 7      TH 8      TH 9      TH10      TH11      TH12
         6.92E-01  1.97E-01  0.00E+00  4.30E-02  0.00E+00  6.57E+06  5.98E+00  5.52E-01  1.41E-01  2.65E+00  0.00E+00  0.00E+00

 OMEGA - COV MATRIX FOR RANDOM EFFECTS - ETAS  ********
         ETA1      ETA2      ETA3      ETA4      ETA5      ETA6      ETA7
 ETA1
+        3.00E-03
 ETA2
+       .........  3.77E-02
 ETA3
+       ......... .........  0.00E+00
 ETA4
+       ......... ......... .........  1.01E+02
 ETA5
+       ......... ......... ......... .........  6.01E-08
 ETA6
+       ......... ......... ......... ......... .........  1.46E-05
 ETA7
+       ......... ......... ......... ......... ......... .........  0.00E+00

 SIGMA - COV MATRIX FOR RANDOM EFFECTS - EPSILONS  ****
         EPS1
 EPS1
+        9.05E-07

 OMEGA - CORR MATRIX FOR RANDOM EFFECTS - ETAS  *******
         ETA1      ETA2      ETA3      ETA4      ETA5      ETA6      ETA7
 ETA1
+        6.34E-03
 ETA2
+       .........  3.23E-02
 ETA3
+       ......... .........  0.00E+00
 ETA4
+       ......... ......... .........  4.72E+01
 ETA5
+       ......... ......... ......... .........  2.97E-07
 ETA6
+       ......... ......... ......... ......... .........  9.11E-06
 ETA7
+       ......... ......... ......... ......... ......... .........  0.00E+00

 SIGMA - CORR MATRIX FOR RANDOM EFFECTS - EPSILONS  ***
         EPS1
 EPS1
+        2.85E-06
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
 ********************               FIRST ORDER CONDITIONAL ESTIMATION WITH INTERACTION              ********************
 ********************                      EIGENVALUES OF COR MATRIX OF ESTIMATE                     ********************

             1         2         3         4         5         6         7         8         9        10        11        12
             13        14        15        16        17        18        19        20
         6.05E-15 -1.06E-14  4.82E-11  4.44E-09  1.36E-08  4.32E-06  2.69E-05  9.31E-04  2.72E-03  4.75E-03  1.18E-01  2.22E-01
          7.36E-01  1.00E+00  1.00E+00  1.00E+00  1.00E+00  1.00E+00  1.00E+00  1.29E+01
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 Elapsed finaloutput time in seconds:     0.14
 #CPUT: Total CPU Time in Seconds,       10.750
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