01/04/2025
10:04
$SIZES PD=-1000 LVR=-150 LTH=-200
$PROBLEM single pyDarwin individual, one among multitude
$INPUT ID TIME AMT RATE MDV EVID DV WT DROP
$DATA "../../../dataset.csv" IGNORE=@
$SUBROUTINE ADVAN3 TRANS4
$PK
  CL = THETA(1) *(WT)**(THETA(2)) * EXP(ETA(1)) ; CL
  ; V is not used ; V
  ALAG1 = THETA(3)   * EXP(ETA(2)) ; ALAG1
  ; F1
  ; Ka is not used ; Ka
  ALAG2 = THETA(4)  ; ALAG2
  F2 = THETA(5)  ; F2
  Q = THETA(6)  * EXP(ETA(3)) ; Q
  V1 = THETA(7) *(WT)**(THETA(8)) * EXP(ETA(4))
  SC = V1 ; V1
  V2 = THETA(9)  * EXP(ETA(5)) ; V2
  ; V3 is not used ; V3
  ; ALAG3 is not used ; ALAG3
  ; F3 is not used ; F3
$ERROR
  IPRED = F
  Y = F *(1+EPS(1))+EPS(2)
$SIGMA
  ;proportional error
  0.2	; EPS(1)
  ;additive error
  1	; EPS(2)
$THETA
  (0, 1) ; CL
  (0.1); CL~WT
  ; V is not used
  (0, 1) ; ALAG1
  ; F1 is not used
  ; Ka is not used
  (0, 1) ; ALAG2
  (0, 0.5) ; F2
  (0, 1) ; Q

  (0, 5) ; V1
  (0.1); V1~WT
  (0, 1) ; V2

  ; V3 is not used
  ; ALAG3 is not used
  ; F3 is not used
$OMEGA
  0.3  ; CL
  ; V is not used
  0.3  ; ALAG1
  ; F1 is not used
  ; Ka is not used
  ; ALAG2 is not used
  ; F2 is not used
  0.3  ; Q
  0.3  ; V1
  0.3  ; V2
  ; V3 is not used
  ; ALAG3 is not used
  ; F3 is not used
$EST METHOD = COND INTER NOABORT MAX = 999999
$COV UNCOND PRINT=E

;; Phenotype: ({'ADVAN': 2, 'CL~WT': 1, 'CL_OMEGA': 1, 'V~WT': 0, 'V_OMEGA': 1, 'ALAG1_OMEGA': 1, 'ALAG1~WT': 0, 'ALAG1_THETA': 1, 'F1_OMEGA': 0, 'F1~WT': 1, 'F1_THETA': 0, 'Ka~WT': 0, 'Ka_OMEGA': 0, 'ALAG2_OMEGA': 0, 'ALAG2_THETA': 1, 'F2_OMEGA': 0, 'F2_THETA': 1, 'Q~WT': 0, 'V1~WT': 1, 'V2~WT': 0, 'V3~WT': 0, 'ALAG3_OMEGA': 0, 'ALAG3_THETA': 1, 'F3_OMEGA': 1, 'F3_THETA': 0, 'RESERR': 1})
;; Genotype: [2, 1, 1, 0, 1, 1, 0, 1, 0, 1, 0, 0, 0, 0, 1, 0, 1, 0, 1, 0, 0, 0, 1, 1, 0, 1]
;; Num non-influential tokens: 5

NM-TRAN MESSAGES
 WARNINGS AND ERRORS (IF ANY) FOR PROBLEM    1
 (WARNING  2) NM-TRAN INFERS THAT THE DATA ARE POPULATION.

1NONLINEAR MIXED EFFECTS MODEL PROGRAM (NONMEM) VERSION 7.4.3
 ORIGINALLY DEVELOPED BY STUART BEAL, LEWIS SHEINER, AND ALISON BOECKMANN
 CURRENT DEVELOPERS ARE ROBERT BAUER, ICON DEVELOPMENT SOLUTIONS,
 AND ALISON BOECKMANN. IMPLEMENTATION, EFFICIENCY, AND STANDARDIZATION
 PERFORMED BY NOUS INFOSYSTEMS.
 PROBLEM NO.:         1
 single pyDarwin individual, one among multitude
 TOT. NO. OF OBS RECS:      120
 TOT. NO. OF INDIVIDUALS:       12
 TWO COMPARTMENT MODEL (ADVAN3)
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 #TBLN:      1
 #METH: First Order Conditional Estimation with Interaction
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
0PRED EXIT CODE = 1
0INDIVIDUAL NO.      12   ID= 1.20000000000000E+01   (WITHIN-INDIVIDUAL) DATA REC NO.   2
 THETA=
  1.00E+00   1.00E-01   1.00E+00   1.00E+00   5.00E-01   1.00E+00   5.00E+00   1.00E-01   1.00E+00
 ETA=
  5.03E+01   6.93E-01  -1.59E-02  -1.62E+00  -1.23E-01
 OCCURS DURING SEARCH FOR ETA AT A NONZERO VALUE OF ETA
 A ROOT OF THE CHARACTERISTIC EQUATION IS ZERO BECAUSE
 K*K21 IS MUCH SMALLER THAN  (K+K12+K21)**2.
 PERHAPS K OR K21 IS VERY SMALL, OR K12 IS VERY LARGE.
0PROGRAM TERMINATED BY OBJ
 MESSAGE ISSUED FROM ESTIMATION STEP
 AT 0TH ITERATION, UPON EVALUATION OF GRADIENT

 #TERM:

 TOTAL DATA POINTS NORMALLY DISTRIBUTED (N):          110
 N*LOG(2PI) CONSTANT TO OBJECTIVE FUNCTION:    202.16647730502800
 OBJECTIVE FUNCTION VALUE WITHOUT CONSTANT:    3126.5156549968924
 OBJECTIVE FUNCTION VALUE WITH CONSTANT:       3328.6821323019203
 REPORTED OBJECTIVE FUNCTION DOES NOT CONTAIN CONSTANT

 TOTAL EFFECTIVE ETAS (NIND*NETA):                            55


 #TERE:
 Elapsed estimation  time in seconds:     0.04
 #CPUT: Total CPU Time in Seconds,        0.109
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