01/04/2025
10:04
$SIZES PD=-1000 LVR=-150 LTH=-200
$PROBLEM single pyDarwin individual, one among multitude
$INPUT ID TIME AMT RATE MDV EVID DV WT DROP
$DATA "../../../dataset.csv" IGNORE=@
$SUBROUTINE ADVAN2 TRANS2
$PK
  CL = THETA(1) *(WT)**(THETA(2)) * EXP(ETA(1)) ; CL
  V = THETA(3)
  SC = V ; V
  ; ALAG1
  ; F1
  Ka = THETA(4) *(WT)**(THETA(5)) * EXP(ETA(2)) ; Ka
  ALAG2 = THETA(6)  ; ALAG2
  F2 = THETA(7)  * EXP(ETA(3)) ; F2
  ; Q is not used ; Q
  ; V1 is not used ; V1
  ; V2 is not used ; V2
  ; V3 is not used ; V3
  ; ALAG3 is not used ; ALAG3
  ; F3 is not used ; F3
$ERROR
  IPRED = F
  Y = F *(1+EPS(1))+EPS(2)
$SIGMA
  ;proportional error
  0.2	; EPS(1)
  ;additive error
  1	; EPS(2)
$THETA
  (0, 1) ; CL
  (0.1); CL~WT
  (0, 5) ; V

  ; ALAG1 is not used
  ; F1 is not used
  (0, 1) ; Ka
  (0.1); Ka~WT
  (0, 1) ; ALAG2
  (0, 0.5) ; F2
  ; Q is not used
  ; V1 is not used
  ; V2 is not used
  ; V3 is not used
  ; ALAG3 is not used
  ; F3 is not used
$OMEGA
  0.3  ; CL

  ; ALAG1 is not used
  ; F1 is not used
  0.3  ; Ka
  ; ALAG2 is not used
  0.3  ; F2
  ; Q is not used
  ; V1 is not used
  ; V2 is not used
  ; V3 is not used
  ; ALAG3 is not used
  ; F3 is not used
$EST METHOD = COND INTER NOABORT MAX = 999999
$COV UNCOND PRINT=E

;; Phenotype: ({'ADVAN': 1, 'CL~WT': 1, 'CL_OMEGA': 1, 'V~WT': 0, 'V_OMEGA': 0, 'ALAG1_OMEGA': 1, 'ALAG1~WT': 1, 'ALAG1_THETA': 0, 'F1_OMEGA': 1, 'F1~WT': 0, 'F1_THETA': 0, 'Ka~WT': 1, 'Ka_OMEGA': 1, 'ALAG2_OMEGA': 0, 'ALAG2_THETA': 1, 'F2_OMEGA': 1, 'F2_THETA': 1, 'Q~WT': 1, 'V1~WT': 1, 'V2~WT': 1, 'V3~WT': 1, 'ALAG3_OMEGA': 0, 'ALAG3_THETA': 0, 'F3_OMEGA': 0, 'F3_THETA': 1, 'RESERR': 1})
;; Genotype: [1, 1, 1, 0, 0, 1, 1, 0, 1, 0, 0, 1, 1, 0, 1, 1, 1, 1, 1, 1, 1, 0, 0, 0, 1, 1]
;; Num non-influential tokens: 8

NM-TRAN MESSAGES
 WARNINGS AND ERRORS (IF ANY) FOR PROBLEM    1
 (WARNING  2) NM-TRAN INFERS THAT THE DATA ARE POPULATION.

1NONLINEAR MIXED EFFECTS MODEL PROGRAM (NONMEM) VERSION 7.4.3
 ORIGINALLY DEVELOPED BY STUART BEAL, LEWIS SHEINER, AND ALISON BOECKMANN
 CURRENT DEVELOPERS ARE ROBERT BAUER, ICON DEVELOPMENT SOLUTIONS,
 AND ALISON BOECKMANN. IMPLEMENTATION, EFFICIENCY, AND STANDARDIZATION
 PERFORMED BY NOUS INFOSYSTEMS.
 PROBLEM NO.:         1
 single pyDarwin individual, one among multitude
 TOT. NO. OF OBS RECS:      120
 TOT. NO. OF INDIVIDUALS:       12
 ONE COMPARTMENT MODEL WITH FIRST-ORDER ABSORPTION (ADVAN2)
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 #TBLN:      1
 #METH: First Order Conditional Estimation with Interaction
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
 #TERM:
0MINIMIZATION SUCCESSFUL
 NO. OF FUNCTION EVALUATIONS USED:      953
 NO. OF SIG. DIGITS IN FINAL EST.:  3.8
0PARAMETER ESTIMATE IS NEAR ITS BOUNDARY

 ETABAR IS THE ARITHMETIC MEAN OF THE ETA-ESTIMATES,
 AND THE P-VALUE IS GIVEN FOR THE NULL HYPOTHESIS THAT THE TRUE MEAN IS 0.

 ETABAR:         1.0908E-03 -1.2280E-02  0.0000E+00
 SE:             9.0351E-02  1.6001E-01  0.0000E+00
 N:                      12          12          12

 P VAL.:         9.9037E-01  9.3883E-01  1.0000E+00

 ETASHRINKSD(%)  1.8915E+00  2.2957E+00  1.0000E+02
 ETASHRINKVR(%)  3.7472E+00  4.5387E+00  1.0000E+02
 EBVSHRINKSD(%)  5.5806E+00  4.4857E+00  1.0000E+02
 EBVSHRINKVR(%)  1.0850E+01  8.7703E+00  1.0000E+02
 EPSSHRINKSD(%)  9.2013E+00  9.2013E+00
 EPSSHRINKVR(%)  1.7556E+01  1.7556E+01


 TOTAL DATA POINTS NORMALLY DISTRIBUTED (N):          120
 N*LOG(2PI) CONSTANT TO OBJECTIVE FUNCTION:    220.54524796912145
 OBJECTIVE FUNCTION VALUE WITHOUT CONSTANT:    138.24770475906575
 OBJECTIVE FUNCTION VALUE WITH CONSTANT:       358.79295272818717
 REPORTED OBJECTIVE FUNCTION DOES NOT CONTAIN CONSTANT

 TOTAL EFFECTIVE ETAS (NIND*NETA):                            24


 #TERE:
 Elapsed estimation  time in seconds:     1.00
0S MATRIX ALGORITHMICALLY SINGULAR
0S MATRIX IS OUTPUT
0INVERSE COVARIANCE MATRIX SET TO RS*RMAT, WHERE S* IS A PSEUDO INVERSE OF S
 Elapsed covariance  time in seconds:     0.63
 Elapsed postprocess time in seconds:     0.00

 ********************               FIRST ORDER CONDITIONAL ESTIMATION WITH INTERACTION              ********************
 #OBJT:**************                       MINIMUM VALUE OF OBJECTIVE FUNCTION                      ********************
 #OBJV:********************************************      138.248       **************************************************

 ********************               FIRST ORDER CONDITIONAL ESTIMATION WITH INTERACTION              ********************
 ********************                             FINAL PARAMETER ESTIMATE                           ********************

 THETA - VECTOR OF FIXED EFFECTS PARAMETERS   *********
         TH 1      TH 2      TH 3      TH 4      TH 5      TH 6      TH 7
         2.62E+00 -9.84E-01  4.43E-01  1.00E-02  1.18E+00  1.00E+00  5.00E-01

 OMEGA - COV MATRIX FOR RANDOM EFFECTS - ETAS  ********
         ETA1      ETA2      ETA3
 ETA1
+        1.11E-01
 ETA2
+        0.00E+00  3.51E-01
 ETA3
+        0.00E+00  0.00E+00  3.00E-01

 SIGMA - COV MATRIX FOR RANDOM EFFECTS - EPSILONS  ****
         EPS1      EPS2
 EPS1
+        2.00E-05
 EPS2
+        0.00E+00  7.06E-01

 OMEGA - CORR MATRIX FOR RANDOM EFFECTS - ETAS  *******
         ETA1      ETA2      ETA3
 ETA1
+        3.33E-01
 ETA2
+        0.00E+00  5.93E-01
 ETA3
+        0.00E+00  0.00E+00  5.48E-01

 SIGMA - CORR MATRIX FOR RANDOM EFFECTS - EPSILONS  ***
         EPS1      EPS2
 EPS1
+        4.47E-03
 EPS2
+        0.00E+00  8.40E-01

 ********************               FIRST ORDER CONDITIONAL ESTIMATION WITH INTERACTION              ********************
 ********************                            STANDARD ERROR OF ESTIMATE                          ********************

 THETA - VECTOR OF FIXED EFFECTS PARAMETERS   *********
         TH 1      TH 2      TH 3      TH 4      TH 5      TH 6      TH 7
         8.75E+00  7.94E-01  2.32E-02  0.00E+00  4.19E-02  0.00E+00  0.00E+00

 OMEGA - COV MATRIX FOR RANDOM EFFECTS - ETAS  ********
         ETA1      ETA2      ETA3
 ETA1
+        5.24E-02
 ETA2
+       .........  2.34E-01
 ETA3
+       ......... .........  0.00E+00

 SIGMA - COV MATRIX FOR RANDOM EFFECTS - EPSILONS  ****
         EPS1      EPS2
 EPS1
+        0.00E+00
 EPS2
+       .........  1.42E-01

 OMEGA - CORR MATRIX FOR RANDOM EFFECTS - ETAS  *******
         ETA1      ETA2      ETA3
 ETA1
+        7.86E-02
 ETA2
+       .........  1.98E-01
 ETA3
+       ......... .........  0.00E+00

 SIGMA - CORR MATRIX FOR RANDOM EFFECTS - EPSILONS  ***
         EPS1      EPS2
 EPS1
+        0.00E+00
 EPS2
+       .........  8.45E-02

 ********************               FIRST ORDER CONDITIONAL ESTIMATION WITH INTERACTION              ********************
 ********************                          COVARIANCE MATRIX OF ESTIMATE                         ********************

            TH 1      TH 2      TH 3      TH 4      TH 5      TH 6      TH 7      OM11      OM12      OM13      OM22      OM23
             OM33      SG11      SG12      SG22
 TH 1
+        7.65E+01
 TH 2
+       -6.95E+00  6.31E-01
 TH 3
+       -9.70E-02  8.93E-03  5.40E-04
 TH 4
+        0.00E+00  0.00E+00  0.00E+00  0.00E+00
 TH 5
+        9.78E-02 -8.72E-03  1.07E-04  0.00E+00  1.76E-03
 TH 6
+        0.00E+00  0.00E+00  0.00E+00  0.00E+00  0.00E+00  0.00E+00
 TH 7
+        0.00E+00  0.00E+00  0.00E+00  0.00E+00  0.00E+00  0.00E+00  0.00E+00
 OM11
+        2.48E-01 -2.27E-02 -4.37E-04  0.00E+00 -4.55E-04  0.00E+00  0.00E+00  2.74E-03
 OM12
+       ......... ......... ......... ......... ......... ......... ......... ......... .........
 OM13
+       ......... ......... ......... ......... ......... ......... ......... ......... ......... .........
 OM22
+        2.81E-01 -2.43E-02 -2.40E-03  0.00E+00  4.23E-03  0.00E+00  0.00E+00 -1.93E-03 ......... .........  5.49E-02
 OM23
+       ......... ......... ......... ......... ......... ......... ......... ......... ......... ......... ......... .........
 OM33
+        0.00E+00  0.00E+00  0.00E+00  0.00E+00  0.00E+00  0.00E+00  0.00E+00  0.00E+00 ......... .........  0.00E+00 .........
          0.00E+00
 SG11
+        0.00E+00  0.00E+00  0.00E+00  0.00E+00  0.00E+00  0.00E+00  0.00E+00  0.00E+00 ......... .........  0.00E+00 .........
          0.00E+00  0.00E+00
 SG12
+       ......... ......... ......... ......... ......... ......... ......... ......... ......... ......... ......... .........
         ......... ......... .........
 SG22
+        3.53E-01 -3.24E-02  3.14E-04  0.00E+00  2.22E-03  0.00E+00  0.00E+00  2.13E-04 ......... ......... -8.32E-03 .........
          0.00E+00  0.00E+00 .........  2.02E-02

 ********************               FIRST ORDER CONDITIONAL ESTIMATION WITH INTERACTION              ********************
 ********************                          CORRELATION MATRIX OF ESTIMATE                        ********************

            TH 1      TH 2      TH 3      TH 4      TH 5      TH 6      TH 7      OM11      OM12      OM13      OM22      OM23
             OM33      SG11      SG12      SG22
 TH 1
+        8.75E+00
 TH 2
+       -1.00E+00  7.94E-01
 TH 3
+       -4.77E-01  4.84E-01  2.32E-02
 TH 4
+        0.00E+00  0.00E+00  0.00E+00  0.00E+00
 TH 5
+        2.67E-01 -2.62E-01  1.10E-01  0.00E+00  4.19E-02
 TH 6
+        0.00E+00  0.00E+00  0.00E+00  0.00E+00  0.00E+00  0.00E+00
 TH 7
+        0.00E+00  0.00E+00  0.00E+00  0.00E+00  0.00E+00  0.00E+00  0.00E+00
 OM11
+        5.42E-01 -5.47E-01 -3.59E-01  0.00E+00 -2.07E-01  0.00E+00  0.00E+00  5.24E-02
 OM12
+       ......... ......... ......... ......... ......... ......... ......... ......... .........
 OM13
+       ......... ......... ......... ......... ......... ......... ......... ......... ......... .........
 OM22
+        1.37E-01 -1.30E-01 -4.40E-01  0.00E+00  4.31E-01  0.00E+00  0.00E+00 -1.57E-01 ......... .........  2.34E-01
 OM23
+       ......... ......... ......... ......... ......... ......... ......... ......... ......... ......... ......... .........
 OM33
+        0.00E+00  0.00E+00  0.00E+00  0.00E+00  0.00E+00  0.00E+00  0.00E+00  0.00E+00 ......... .........  0.00E+00 .........
          0.00E+00
 SG11
+        0.00E+00  0.00E+00  0.00E+00  0.00E+00  0.00E+00  0.00E+00  0.00E+00  0.00E+00 ......... .........  0.00E+00 .........
          0.00E+00  0.00E+00
 SG12
+       ......... ......... ......... ......... ......... ......... ......... ......... ......... ......... ......... .........
         ......... ......... .........
 SG22
+        2.84E-01 -2.87E-01  9.51E-02  0.00E+00  3.73E-01  0.00E+00  0.00E+00  2.86E-02 ......... ......... -2.50E-01 .........
          0.00E+00  0.00E+00 .........  1.42E-01
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
 ********************               FIRST ORDER CONDITIONAL ESTIMATION WITH INTERACTION              ********************
 ********************                      EIGENVALUES OF COR MATRIX OF ESTIMATE                     ********************

             1         2         3         4         5         6         7         8         9        10        11        12
         1.29E-04  1.55E-01  3.74E-01  5.50E-01  1.00E+00  1.00E+00  1.00E+00  1.00E+00  1.00E+00  1.48E+00  1.56E+00  2.88E+00
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 Elapsed finaloutput time in seconds:     0.20
 #CPUT: Total CPU Time in Seconds,        1.703
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