01/04/2025
10:04
$SIZES PD=-1000 LVR=-150 LTH=-200
$PROBLEM single pyDarwin individual, one among multitude
$INPUT ID TIME AMT RATE MDV EVID DV WT DROP
$DATA "../../../dataset.csv" IGNORE=@
$SUBROUTINE ADVAN3 TRANS4
$PK
  CL = THETA(1)  * EXP(ETA(1)) ; CL
  ; V is not used ; V
  ; ALAG1
  F1 = THETA(2)   * EXP(ETA(2)) ; F1
  ; Ka is not used ; Ka
  ALAG2 = THETA(3)  * EXP(ETA(3)) ; ALAG2
  F2 = THETA(4)  ; F2
  Q = THETA(5) *(WT)**(THETA(6)) * EXP(ETA(4)) ; Q
  V1 = THETA(7) *(WT)**(THETA(8)) * EXP(ETA(5))
  SC = V1 ; V1
  V2 = THETA(9)  * EXP(ETA(6)) ; V2
  ; V3 is not used ; V3
  ; ALAG3 is not used ; ALAG3
  ; F3 is not used ; F3
$ERROR
  IPRED = F
  Y = F *(1+EPS(1))+EPS(2)
$SIGMA
  ;proportional error
  0.2	; EPS(1)
  ;additive error
  1	; EPS(2)
$THETA
  (0, 1) ; CL

  ; V is not used
  ; ALAG1 is not used
  (0, 0.5) ; F1
  ; Ka is not used
  (0, 1) ; ALAG2
  (0, 0.5) ; F2
  (0, 1) ; Q
  (0.1); Q~WT
  (0, 5) ; V1
  (0.1); V1~WT
  (0, 1) ; V2

  ; V3 is not used
  ; ALAG3 is not used
  ; F3 is not used
$OMEGA
  0.3  ; CL
  ; V is not used
  ; ALAG1 is not used
  0.3  ; F1
  ; Ka is not used
  0.3  ; ALAG2
  ; F2 is not used
  0.3  ; Q
  0.3  ; V1
  0.3  ; V2
  ; V3 is not used
  ; ALAG3 is not used
  ; F3 is not used
$EST METHOD = COND INTER NOABORT MAX = 999999
$COV UNCOND PRINT=E

;; Phenotype: ({'ADVAN': 2, 'CL~WT': 0, 'CL_OMEGA': 1, 'V~WT': 1, 'V_OMEGA': 0, 'ALAG1_OMEGA': 1, 'ALAG1~WT': 1, 'ALAG1_THETA': 0, 'F1_OMEGA': 1, 'F1~WT': 0, 'F1_THETA': 1, 'Ka~WT': 0, 'Ka_OMEGA': 0, 'ALAG2_OMEGA': 1, 'ALAG2_THETA': 1, 'F2_OMEGA': 0, 'F2_THETA': 1, 'Q~WT': 1, 'V1~WT': 1, 'V2~WT': 0, 'V3~WT': 1, 'ALAG3_OMEGA': 1, 'ALAG3_THETA': 0, 'F3_OMEGA': 1, 'F3_THETA': 1, 'RESERR': 1})
;; Genotype: [2, 0, 1, 1, 0, 1, 1, 0, 1, 0, 1, 0, 0, 1, 1, 0, 1, 1, 1, 0, 1, 1, 0, 1, 1, 1]
;; Num non-influential tokens: 8

NM-TRAN MESSAGES
 WARNINGS AND ERRORS (IF ANY) FOR PROBLEM    1
 (WARNING  2) NM-TRAN INFERS THAT THE DATA ARE POPULATION.

1NONLINEAR MIXED EFFECTS MODEL PROGRAM (NONMEM) VERSION 7.4.3
 ORIGINALLY DEVELOPED BY STUART BEAL, LEWIS SHEINER, AND ALISON BOECKMANN
 CURRENT DEVELOPERS ARE ROBERT BAUER, ICON DEVELOPMENT SOLUTIONS,
 AND ALISON BOECKMANN. IMPLEMENTATION, EFFICIENCY, AND STANDARDIZATION
 PERFORMED BY NOUS INFOSYSTEMS.
 PROBLEM NO.:         1
 single pyDarwin individual, one among multitude
 TOT. NO. OF OBS RECS:      120
 TOT. NO. OF INDIVIDUALS:       12
 TWO COMPARTMENT MODEL (ADVAN3)
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 #TBLN:      1
 #METH: First Order Conditional Estimation with Interaction
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
 #TERM:
0MINIMIZATION SUCCESSFUL
 NO. OF FUNCTION EVALUATIONS USED:     3228
 NO. OF SIG. DIGITS IN FINAL EST.:  3.2
0PARAMETER ESTIMATE IS NEAR ITS BOUNDARY

 ETABAR IS THE ARITHMETIC MEAN OF THE ETA-ESTIMATES,
 AND THE P-VALUE IS GIVEN FOR THE NULL HYPOTHESIS THAT THE TRUE MEAN IS 0.

 ETABAR:         9.0846E-03  2.3604E-03  0.0000E+00  2.6143E-09 -1.4191E-05 -1.0908E-06
 SE:             3.9504E-02  1.9868E-02  0.0000E+00  1.2333E-08  3.0620E-05  2.4490E-06
 N:                      12          12          12          12          12          12

 P VAL.:         8.1812E-01  9.0543E-01  1.0000E+00  8.3213E-01  6.4305E-01  6.5603E-01

 ETASHRINKSD(%)  2.0586E+01  2.9216E+01  1.0000E+02  9.9999E+01  9.7977E+01  9.9838E+01
 ETASHRINKVR(%)  3.6934E+01  4.9897E+01  1.0000E+02  1.0000E+02  9.9959E+01  1.0000E+02
 EBVSHRINKSD(%)  2.4894E+01  3.1967E+01  1.0000E+02  9.9999E+01  9.6734E+01  9.9749E+01
 EBVSHRINKVR(%)  4.3590E+01  5.3715E+01  1.0000E+02  1.0000E+02  9.9893E+01  9.9999E+01
 EPSSHRINKSD(%)  4.2442E+00  4.2442E+00
 EPSSHRINKVR(%)  8.3083E+00  8.3083E+00


 TOTAL DATA POINTS NORMALLY DISTRIBUTED (N):          120
 N*LOG(2PI) CONSTANT TO OBJECTIVE FUNCTION:    220.54524796912145
 OBJECTIVE FUNCTION VALUE WITHOUT CONSTANT:    253.86824528703261
 OBJECTIVE FUNCTION VALUE WITH CONSTANT:       474.41349325615408
 REPORTED OBJECTIVE FUNCTION DOES NOT CONTAIN CONSTANT

 TOTAL EFFECTIVE ETAS (NIND*NETA):                            60


 #TERE:
 Elapsed estimation  time in seconds:     9.33
0S MATRIX ALGORITHMICALLY SINGULAR
0S MATRIX IS OUTPUT
0INVERSE COVARIANCE MATRIX SET TO RS*RMAT, WHERE S* IS A PSEUDO INVERSE OF S
 Elapsed covariance  time in seconds:     2.12
 Elapsed postprocess time in seconds:     0.00

 ********************               FIRST ORDER CONDITIONAL ESTIMATION WITH INTERACTION              ********************
 #OBJT:**************                       MINIMUM VALUE OF OBJECTIVE FUNCTION                      ********************
 #OBJV:********************************************      253.868       **************************************************

 ********************               FIRST ORDER CONDITIONAL ESTIMATION WITH INTERACTION              ********************
 ********************                             FINAL PARAMETER ESTIMATE                           ********************

 THETA - VECTOR OF FIXED EFFECTS PARAMETERS   *********
         TH 1      TH 2      TH 3      TH 4      TH 5      TH 6      TH 7      TH 8      TH 9
         1.00E-02  2.47E-01  1.00E+00  5.00E-01  1.00E-02  8.41E-01  2.63E+00 -7.06E-01  1.00E-02

 OMEGA - COV MATRIX FOR RANDOM EFFECTS - ETAS  ********
         ETA1      ETA2      ETA3      ETA4      ETA5      ETA6
 ETA1
+        3.24E-02
 ETA2
+        0.00E+00  1.03E-02
 ETA3
+        0.00E+00  0.00E+00  3.00E-01
 ETA4
+        0.00E+00  0.00E+00  0.00E+00  3.00E-05
 ETA5
+        0.00E+00  0.00E+00  0.00E+00  0.00E+00  3.00E-05
 ETA6
+        0.00E+00  0.00E+00  0.00E+00  0.00E+00  0.00E+00  3.00E-05

 SIGMA - COV MATRIX FOR RANDOM EFFECTS - EPSILONS  ****
         EPS1      EPS2
 EPS1
+        1.01E-01
 EPS2
+        0.00E+00  1.00E-04

 OMEGA - CORR MATRIX FOR RANDOM EFFECTS - ETAS  *******
         ETA1      ETA2      ETA3      ETA4      ETA5      ETA6
 ETA1
+        1.80E-01
 ETA2
+        0.00E+00  1.02E-01
 ETA3
+        0.00E+00  0.00E+00  5.48E-01
 ETA4
+        0.00E+00  0.00E+00  0.00E+00  5.48E-03
 ETA5
+        0.00E+00  0.00E+00  0.00E+00  0.00E+00  5.48E-03
 ETA6
+        0.00E+00  0.00E+00  0.00E+00  0.00E+00  0.00E+00  5.48E-03

 SIGMA - CORR MATRIX FOR RANDOM EFFECTS - EPSILONS  ***
         EPS1      EPS2
 EPS1
+        3.18E-01
 EPS2
+        0.00E+00  1.00E-02

 ********************               FIRST ORDER CONDITIONAL ESTIMATION WITH INTERACTION              ********************
 ********************                            STANDARD ERROR OF ESTIMATE                          ********************

 THETA - VECTOR OF FIXED EFFECTS PARAMETERS   *********
         TH 1      TH 2      TH 3      TH 4      TH 5      TH 6      TH 7      TH 8      TH 9
         0.00E+00  2.19E-02  0.00E+00  0.00E+00  0.00E+00  7.39E-02  4.86E+00  4.27E-01  0.00E+00

 OMEGA - COV MATRIX FOR RANDOM EFFECTS - ETAS  ********
         ETA1      ETA2      ETA3      ETA4      ETA5      ETA6
 ETA1
+        4.57E-02
 ETA2
+       .........  1.16E-02
 ETA3
+       ......... .........  0.00E+00
 ETA4
+       ......... ......... .........  0.00E+00
 ETA5
+       ......... ......... ......... .........  0.00E+00
 ETA6
+       ......... ......... ......... ......... .........  0.00E+00

 SIGMA - COV MATRIX FOR RANDOM EFFECTS - EPSILONS  ****
         EPS1      EPS2
 EPS1
+        1.62E-02
 EPS2
+       .........  0.00E+00

 OMEGA - CORR MATRIX FOR RANDOM EFFECTS - ETAS  *******
         ETA1      ETA2      ETA3      ETA4      ETA5      ETA6
 ETA1
+        1.27E-01
 ETA2
+       .........  5.73E-02
 ETA3
+       ......... .........  0.00E+00
 ETA4
+       ......... ......... .........  0.00E+00
 ETA5
+       ......... ......... ......... .........  0.00E+00
 ETA6
+       ......... ......... ......... ......... .........  0.00E+00

 SIGMA - CORR MATRIX FOR RANDOM EFFECTS - EPSILONS  ***
         EPS1      EPS2
 EPS1
+        2.54E-02
 EPS2
+       .........  0.00E+00
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
 ********************               FIRST ORDER CONDITIONAL ESTIMATION WITH INTERACTION              ********************
 ********************                      EIGENVALUES OF COR MATRIX OF ESTIMATE                     ********************

             1         2         3         4         5         6         7         8         9        10        11        12
             13        14        15        16        17
         5.90E-05  8.68E-03  1.67E-01  2.97E-01  3.66E-01  9.78E-01  1.00E+00  1.00E+00  1.00E+00  1.00E+00  1.00E+00  1.00E+00
          1.00E+00  1.00E+00  1.00E+00  1.00E+00  5.18E+00
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 Elapsed finaloutput time in seconds:     0.06
 #CPUT: Total CPU Time in Seconds,       11.516
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