01/04/2025
10:05
$SIZES PD=-1000 LVR=-150 LTH=-200
$PROBLEM single pyDarwin individual, one among multitude
$INPUT ID TIME AMT RATE MDV EVID DV WT DROP
$DATA "../../../dataset.csv" IGNORE=@
$SUBROUTINE ADVAN2 TRANS2
$PK
  CL = THETA(1)  * EXP(ETA(1)) ; CL
  V = THETA(2) *(WT)**(THETA(3))
  SC = V ; V
  ALAG1 = THETA(4)  *(WT)**(THETA(ALAG1~WT)) * EXP(ETA(2)) ; ALAG1
  F1 = THETA(5)   ; F1
  Ka = THETA(6)  * EXP(ETA(3)) ; Ka
  ALAG2 = THETA(7)  ; ALAG2
  ; F2
  ; Q is not used ; Q
  ; V1 is not used ; V1
  ; V2 is not used ; V2
  ; V3 is not used ; V3
  ; ALAG3 is not used ; ALAG3
  ; F3 is not used ; F3
$ERROR
  IPRED = F
  Y = F *(1+EPS(1))
$SIGMA
  ;proportional error
  0.1	; EPS(1)
$THETA
  (0, 1) ; CL

  (0, 5) ; V
  (0.1); V~WT
  (0, 1) ; ALAG1
  (0, 0.5) ; F1
  (0, 1) ; Ka

  (0, 1) ; ALAG2
  ; F2 is not used
  ; Q is not used
  ; V1 is not used
  ; V2 is not used
  ; V3 is not used
  ; ALAG3 is not used
  ; F3 is not used
$OMEGA
  0.3  ; CL

  0.3  ; ALAG1
  ; F1 is not used
  0.3  ; Ka
  ; ALAG2 is not used
  ; F2 is not used
  ; Q is not used
  ; V1 is not used
  ; V2 is not used
  ; V3 is not used
  ; ALAG3 is not used
  ; F3 is not used
$EST METHOD = COND INTER NOABORT MAX = 999999
$COV UNCOND PRINT=E

;; Phenotype: ({'ADVAN': 1, 'CL~WT': 0, 'CL_OMEGA': 1, 'V~WT': 1, 'V_OMEGA': 0, 'ALAG1_OMEGA': 1, 'ALAG1~WT': 1, 'ALAG1_THETA': 1, 'F1_OMEGA': 0, 'F1~WT': 0, 'F1_THETA': 1, 'Ka~WT': 0, 'Ka_OMEGA': 1, 'ALAG2_OMEGA': 0, 'ALAG2_THETA': 1, 'F2_OMEGA': 0, 'F2_THETA': 0, 'Q~WT': 0, 'V1~WT': 1, 'V2~WT': 1, 'V3~WT': 1, 'ALAG3_OMEGA': 1, 'ALAG3_THETA': 1, 'F3_OMEGA': 1, 'F3_THETA': 0, 'RESERR': 0})
;; Genotype: [1, 0, 1, 1, 0, 1, 1, 1, 0, 0, 1, 0, 1, 0, 1, 0, 0, 0, 1, 1, 1, 1, 1, 1, 0, 0]
;; Num non-influential tokens: 6

NM-TRAN MESSAGES
 AN ERROR WAS FOUND IN THE CONTROL STATEMENTS.
AN ERROR WAS FOUND ON LINE 10 AT THE APPROXIMATE POSITION NOTED:
   ALAG1 = THETA(4)  *(WT)**(THETA(ALAG1~WT)) * EXP(ETA(2)) ; ALAG1
                                          X
 THE CHARACTERS IN ERROR ARE: ~
  653  MAY NOT APPEAR IN A SUBSCRIPT EXPRESSION.
OFV = 99999999
success = False
covariance = False
correlation = False
Condition # = 99999999
Num Non fixed THETAs = 0
Num Non fixed OMEGAs = 0
Num Non fixed SIGMAs = 0
Original run directory = C:\Users\raban\Documents\GitHub\pyDarwinXploR\Examples\PKPD_auto_Example - II\run\temp\3\15
