29.07.2025
05:12
$SIZES PD=-1000 LVR=-150 LTH=-200
$PROBLEM single pyDarwin individual, one among multitude
$INPUT ID TIME AMT RATE DV DROP MDV AGE SEX LBM DROP CMT EVID
$DATA "D:\Users\selzer\Repos\GH\pyDarwinXploR\RemiR/data.csv" IGNORE=@
$SUBROUTINE ADVAN11 TRANS4
$PK

  TVCLSEX = 0
  IF(SEX == 1) THEN
  TVCLSEX = THETA(1)
  ENDIF
  CL = THETA(2) *(1 + THETA(3) * (AGE)) *(LBM/50)**(THETA(4)) *(1 + TVCLSEX) * EXP(ETA(1)) ; CL
  ; Q is not used ; Q

  V1 = THETA(5)  *(LBM/50)**(THETA(6))  * EXP(ETA(2))
  SC = V1 ; V1

  V2 = THETA(7) *(1 + THETA(8) * (AGE)) *(LBM/50)**(THETA(9))  * EXP(ETA(3)) ; V2

  TVQ2SEX = 0
  IF(SEX == 1) THEN
  TVQ2SEX = THETA(10)
  ENDIF
  Q2 = THETA(11)   *(1 + TVQ2SEX) * EXP(ETA(4)) ; Q2

  Q3 = THETA(12)    * EXP(ETA(5)) ; Q3

  V3 = THETA(13) *(1 + THETA(14) * (AGE))   * EXP(ETA(6)) ; V3
$ERROR
  IPRED = F
  Y = F *(1+EPS(1))
$SIGMA
  ;proportional error
  0.1	; EPS(1)
$THETA

  (1.1);CL~SEX1
  (0, 2) ; CL
  (1); CL~AGE
  (1); CL~LBM
  ; Q is not used

  (0, 5) ; V1

  (1); V1~LBM

  (0, 10) ; V2
  (1); V2~AGE
  (1); V2~LBM

  (0.1);Q2~SEX1
  (0, 2) ; Q2

  (0, 0.05) ; Q3

  (0, 5) ; V3
  (1); V3~AGE

$OMEGA
  0.3  ; CL
  ; Q is not used
  0.3  ; V1
  0.3  ; V2
  0.3  ; Q2
  0.3  ; Q3
  0.3  ; V3
$EST METHOD = COND INTER NOABORT MAX = 999999
$TABLE ID TIME AMT DV PRED IPRED WRES CWRES FILE=results.tab NOPRINT NOAPPEND ONEHEADER
$COV UNCOND PRINT=E

;; Phenotype: ([('ADVAN', 1), ('CL~AGE', 1), ('CL~LBM', 1), ('CL~SEX', 1), ('V1~AGE', 0), ('V1~LBM', 1), ('V1~SEX', 0), ('V2~AGE', 1), ('V2~LBM', 1), ('V2~SEX', 0), ('Q2~AGE', 0), ('Q2~LBM', 0), ('Q2~SEX', 1), ('Q3~AGE', 0), ('Q3~LBM', 0), ('Q3~SEX', 0), ('V3~AGE', 1), ('V3~LBM', 0), ('V3~SEX', 0), ('V3_OMEGA', 1), ('RESERR', 0)])
;; Genotype: [1, 1, 1, 1, 1, 0, 0, 0, 0, 0, 1, 0, 0, 1, 1, 0, 0, 0, 0, 1, 0, 0, 0, 1, 0, 0, 1, 0]
;; Num non-influential tokens: 7

NM-TRAN MESSAGES
 WARNINGS AND ERRORS (IF ANY) FOR PROBLEM    1
 (WARNING  2) NM-TRAN INFERS THAT THE DATA ARE POPULATION.

1NONLINEAR MIXED EFFECTS MODEL PROGRAM (NONMEM) VERSION 7.4.3
 ORIGINALLY DEVELOPED BY STUART BEAL, LEWIS SHEINER, AND ALISON BOECKMANN
 CURRENT DEVELOPERS ARE ROBERT BAUER, ICON DEVELOPMENT SOLUTIONS,
 AND ALISON BOECKMANN. IMPLEMENTATION, EFFICIENCY, AND STANDARDIZATION
 PERFORMED BY NOUS INFOSYSTEMS.
 PROBLEM NO.:         1
 single pyDarwin individual, one among multitude
 TOT. NO. OF OBS RECS:     1992
 TOT. NO. OF INDIVIDUALS:       65
 THREE COMPARTMENT MODEL (ADVAN11)
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 #TBLN:      1
 #METH: First Order Conditional Estimation with Interaction
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
0PRED EXIT CODE = 1
0INDIVIDUAL NO.      62   ID= 6.20000000000000E+01   (WITHIN-INDIVIDUAL) DATA REC NO.   2
 THETA=
  1.10E+00   2.00E+00   1.00E+00   1.00E+00   5.00E+00   1.00E+00   1.00E+01   1.00E+00   1.00E+00   1.00E-01
  2.00E+00   5.00E-02   5.00E+00   1.00E+00
 ETA=
  7.15E+04   4.37E-01   8.65E-01   1.15E+01  -1.06E-02   1.41E-02
 OCCURS DURING SEARCH FOR ETA AT A NONZERO VALUE OF ETA
 NUMERICAL DIFFICULTIES OBTAINING THE SOLUTION.
 THE COEFFICIENT MATRIX IS ALGORITHMICALLY SINGULAR.
0PROGRAM TERMINATED BY OBJ
 MESSAGE ISSUED FROM ESTIMATION STEP
 AT 0TH ITERATION, UPON EVALUATION OF GRADIENT

 #TERM:

 TOTAL DATA POINTS NORMALLY DISTRIBUTED (N):         1907
 N*LOG(2PI) CONSTANT TO OBJECTIVE FUNCTION:    3504.8315656426216
 OBJECTIVE FUNCTION VALUE WITHOUT CONSTANT:    1274247.3170117612
 OBJECTIVE FUNCTION VALUE WITH CONSTANT:       1277752.1485774040
 REPORTED OBJECTIVE FUNCTION DOES NOT CONTAIN CONSTANT

 TOTAL EFFECTIVE ETAS (NIND*NETA):                           366


 #TERE:
 Elapsed estimation  time in seconds:     1.99
 #CPUT: Total CPU Time in Seconds,        2.078
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