23.07.2025
10:15
$PROBLEM Veralipride - 2-compartment oral - FOCEI

$INPUT ID TIME AMT DV

$DATA data.csv IGNORE=@
$SUBROUTINE ADVAN6 TOL=9

$MODEL
COMP (GUT)    ; depot compartment
COMP (CENT)   ; central compartment
COMP (PERIPH) ; peripheral compartment

$PK
CL = THETA(1) * EXP(ETA(1))      ; Clearance (L/h)
V1 = THETA(2) * EXP(ETA(2))      ; Central volume (L)
Q  = THETA(3) * EXP(ETA(3))      ; Intercompartmental clearance (L/h)
V2 = THETA(4) * EXP(ETA(4))      ; Peripheral volume (L)
KA = THETA(5) * EXP(ETA(5))      ; Absorption rate constant (1/h)

K10 = CL / V1
K12 = Q  / V1
K21 = Q  / V2

S2 = V1 / 1000   ; scaling factor to match concentration in mg/L

$THETA
(0, 28)       ; THETA(1) CL
(0, 230)      ; THETA(2) V1
(0, 21)       ; THETA(3) Q
(0, 600)      ; THETA(4) V2
(0, 1.2)      ; THETA(5) KA

$OMEGA
0.1 ; ETA(1) CL
0.1 ; ETA(2) V1
0.1 ; ETA(3) Q
0.1 ; ETA(4) V2
0.1 ; ETA(5) KA

$SIGMA
0.1 ; residual unexplained variability (proportional)

$DES
DADT(1) = -KA * A(1)                                     ; GUT
DADT(2) =  KA * A(1) - K10*A(2) - K12*A(2) + K21*A(3)    ; CENT
DADT(3) =               K12*A(2) - K21*A(3)             ; PERIPH

$ERROR
IPRED = A(2) / S2
IRES  = IPRED * EPS(1)
Y = IPRED + IRES

$ESTIMATION METHOD=COND INTER MAXEVAL=9999 PRINT=5
$COVARIANCE

$TABLE ID TIME IPRED PRED RES WRES CWRES ONEHEADER NOPRINT FILE=output.tab

NM-TRAN MESSAGES
 WARNINGS AND ERRORS (IF ANY) FOR PROBLEM    1
 (WARNING  2) NM-TRAN INFERS THAT THE DATA ARE POPULATION.

1NONLINEAR MIXED EFFECTS MODEL PROGRAM (NONMEM) VERSION 7.4.3
 ORIGINALLY DEVELOPED BY STUART BEAL, LEWIS SHEINER, AND ALISON BOECKMANN
 CURRENT DEVELOPERS ARE ROBERT BAUER, ICON DEVELOPMENT SOLUTIONS,
 AND ALISON BOECKMANN. IMPLEMENTATION, EFFICIENCY, AND STANDARDIZATION
 PERFORMED BY NOUS INFOSYSTEMS.
 PROBLEM NO.:         1
 Veralipride - 2-compartment oral - FOCEI
 TOT. NO. OF OBS RECS:      179
 TOT. NO. OF INDIVIDUALS:       12
 GENERAL NONLINEAR KINETICS MODEL (DVERK1, ADVAN6)
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 #TBLN:      1
 #METH: First Order Conditional Estimation with Interaction
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
 #TERM:
0MINIMIZATION SUCCESSFUL
 NO. OF FUNCTION EVALUATIONS USED:      419
 NO. OF SIG. DIGITS IN FINAL EST.:  3.2
0PARAMETER ESTIMATE IS NEAR ITS BOUNDARY
 THIS MUST BE ADDRESSED BEFORE THE COVARIANCE STEP CAN BE IMPLEMENTED

 ETABAR IS THE ARITHMETIC MEAN OF THE ETA-ESTIMATES,
 AND THE P-VALUE IS GIVEN FOR THE NULL HYPOTHESIS THAT THE TRUE MEAN IS 0.

 ETABAR:        -9.0066E-04 -1.9553E-02  6.0236E-02  2.2686E-06 -8.9087E-02
 SE:             6.1655E-02  1.1388E-01  2.3889E-01  1.0929E-06  2.4587E-01
 N:                      12          12          12          12          12

 P VAL.:         9.8834E-01  8.6368E-01  8.0092E-01  3.7925E-02  7.1711E-01

 ETASHRINKSD(%)  4.0479E+00  4.1768E+00  3.3070E+01  9.9875E+01  1.0725E+01
 ETASHRINKVR(%)  7.9320E+00  8.1792E+00  5.5204E+01  1.0000E+02  2.0301E+01
 EBVSHRINKSD(%)  8.4026E+00  6.4984E+00  3.1250E+01  9.9780E+01  8.1775E+00
 EBVSHRINKVR(%)  1.6099E+01  1.2574E+01  5.2734E+01  1.0000E+02  1.5686E+01
 EPSSHRINKSD(%)  8.7689E+00
 EPSSHRINKVR(%)  1.6769E+01


 TOTAL DATA POINTS NORMALLY DISTRIBUTED (N):          179
 N*LOG(2PI) CONSTANT TO OBJECTIVE FUNCTION:    328.97999488727282
 OBJECTIVE FUNCTION VALUE WITHOUT CONSTANT:    1627.7287549348009
 OBJECTIVE FUNCTION VALUE WITH CONSTANT:       1956.7087498220737
 REPORTED OBJECTIVE FUNCTION DOES NOT CONTAIN CONSTANT

 TOTAL EFFECTIVE ETAS (NIND*NETA):                            60


 #TERE:
 Elapsed estimation  time in seconds:   110.92
 Elapsed postprocess time in seconds:     0.73

 ********************               FIRST ORDER CONDITIONAL ESTIMATION WITH INTERACTION              ********************
 #OBJT:**************                       MINIMUM VALUE OF OBJECTIVE FUNCTION                      ********************
 #OBJV:********************************************     1627.729       **************************************************

 ********************               FIRST ORDER CONDITIONAL ESTIMATION WITH INTERACTION              ********************
 ********************                             FINAL PARAMETER ESTIMATE                           ********************

 THETA - VECTOR OF FIXED EFFECTS PARAMETERS   *********
         TH 1      TH 2      TH 3      TH 4      TH 5
         3.56E+01  2.68E+02  5.85E+00  1.99E+02  3.91E+00

 OMEGA - COV MATRIX FOR RANDOM EFFECTS - ETAS  ********
         ETA1      ETA2      ETA3      ETA4      ETA5
 ETA1
+        5.41E-02
 ETA2
+        0.00E+00  1.85E-01
 ETA3
+        0.00E+00  0.00E+00  1.67E+00
 ETA4
+        0.00E+00  0.00E+00  0.00E+00  1.00E-05
 ETA5
+        0.00E+00  0.00E+00  0.00E+00  0.00E+00  9.93E-01

 SIGMA - COV MATRIX FOR RANDOM EFFECTS - EPSILONS  ****
         EPS1
 EPS1
+        7.09E-02

 OMEGA - CORR MATRIX FOR RANDOM EFFECTS - ETAS  *******
         ETA1      ETA2      ETA3      ETA4      ETA5
 ETA1
+        2.32E-01
 ETA2
+        0.00E+00  4.30E-01
 ETA3
+        0.00E+00  0.00E+00  1.29E+00
 ETA4
+        0.00E+00  0.00E+00  0.00E+00  3.16E-03
 ETA5
+        0.00E+00  0.00E+00  0.00E+00  0.00E+00  9.96E-01

 SIGMA - CORR MATRIX FOR RANDOM EFFECTS - EPSILONS  ***
         EPS1
 EPS1
+        2.66E-01
 Elapsed finaloutput time in seconds:     0.02
 #CPUT: Total CPU Time in Seconds,      111.672
