23.07.2025
15:45
$PROBLEM    Veralipride - 2-compartment oral - double absorption -
;           FOCEI
$INPUT      ID TIME AMT DV
$DATA      data.csv IGNORE=@
$SUBROUTINE ADVAN6 TOL=9
$MODEL      COMP (GUT1) ; first absorption site
            COMP (GUT2) ; second absorption site
            COMP (CENT) ; central compartment
            COMP (PERIPH) ; peripheral compartment
$PK
CL  = THETA(1) * EXP(ETA(1))      ; Clearance (L/h)
V1  = THETA(2) * EXP(ETA(2))      ; Central volume (L)
Q   = THETA(3) * EXP(ETA(3))      ; Intercompartmental clearance (L/h)
V2  = THETA(4) * EXP(ETA(4))      ; Peripheral volume (L)
KA1 = THETA(5) * EXP(ETA(5))      ; Absorption rate 1 (1/h)
KA2 = THETA(6) * EXP(ETA(6))      ; Absorption rate 2 (1/h)
F1  = THETA(7)                    ; fraction of dose to GUT1

K10 = CL / V1
K12 = Q  / V1
K21 = Q  / V2

S3 = V1 / 1000   ; scaling factor to match concentration in mg/L

$THETA  (0,28) ; THETA(1) CL
 (0,230) ; THETA(2) V1
 (0,21) ; THETA(3) Q
 (0,600) ; THETA(4) V2
 (0,1.2) ; THETA(5) KA1
 (0,0.5) ; THETA(6) KA2
 (0,0.5,1) ; THETA(7) F1  (fraction to GUT1)
$OMEGA  0.1  ;  ETA(1) CL
 0.1  ;  ETA(2) V1
 0.1  ;   ETA(3) Q
 0.1  ;  ETA(4) V2
 0.1  ; ETA(5) KA1
 0.1  ; ETA(6) KA2
$SIGMA  0.1  ; residual unexplained variability (proportional)
$DES
; Initial dose is split between GUT1 and GUT2 in $PK
; Here we define the ODEs
DADT(1) = -KA1 * A(1)                                  ; GUT1
DADT(2) = -KA2 * A(2)                                  ; GUT2
DADT(3) =  KA1*A(1) + KA2*A(2) - K10*A(3) - K12*A(3) + K21*A(4)  ; CENT
DADT(4) =               K12*A(3) - K21*A(4)           ; PERIPH

$ERROR
IPRED = A(3) / S3
IRES  = IPRED * EPS(1)
Y = IPRED + IRES

$ESTIMATION METHOD=COND INTER MAXEVAL=9999 PRINT=5
$COVARIANCE
$TABLE      ID TIME IPRED PRED RES WRES CWRES ONEHEADER NOPRINT
            FILE=output.tab

NM-TRAN MESSAGES
 WARNINGS AND ERRORS (IF ANY) FOR PROBLEM    1
 (WARNING  2) NM-TRAN INFERS THAT THE DATA ARE POPULATION.

1NONLINEAR MIXED EFFECTS MODEL PROGRAM (NONMEM) VERSION 7.4.3
 ORIGINALLY DEVELOPED BY STUART BEAL, LEWIS SHEINER, AND ALISON BOECKMANN
 CURRENT DEVELOPERS ARE ROBERT BAUER, ICON DEVELOPMENT SOLUTIONS,
 AND ALISON BOECKMANN. IMPLEMENTATION, EFFICIENCY, AND STANDARDIZATION
 PERFORMED BY NOUS INFOSYSTEMS.
 PROBLEM NO.:         1
 Veralipride - 2-compartment oral - double absorption -
 TOT. NO. OF OBS RECS:      179
 TOT. NO. OF INDIVIDUALS:       12
 GENERAL NONLINEAR KINETICS MODEL (DVERK1, ADVAN6)
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 #TBLN:      1
 #METH: First Order Conditional Estimation with Interaction
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
 #TERM:
0MINIMIZATION TERMINATED
 DUE TO ROUNDING ERRORS (ERROR=134)
 NO. OF FUNCTION EVALUATIONS USED:     1296
 NO. OF SIG. DIGITS UNREPORTABLE
0PARAMETER ESTIMATE IS NEAR ITS BOUNDARY

 ETABAR IS THE ARITHMETIC MEAN OF THE ETA-ESTIMATES,
 AND THE P-VALUE IS GIVEN FOR THE NULL HYPOTHESIS THAT THE TRUE MEAN IS 0.

 ETABAR:        -9.3228E-04 -1.9883E-02  6.0302E-02  2.2685E-06 -8.8626E-02  0.0000E+00
 SE:             6.1653E-02  1.1388E-01  2.3894E-01  1.0928E-06  2.4586E-01  0.0000E+00
 N:                      12          12          12          12          12          12

 P VAL.:         9.8794E-01  8.6140E-01  8.0075E-01  3.7914E-02  7.1849E-01  1.0000E+00

 ETASHRINKSD(%)  4.0441E+00  4.1842E+00  3.3072E+01  9.9875E+01  1.0723E+01  1.0000E+02
 ETASHRINKVR(%)  7.9247E+00  8.1933E+00  5.5207E+01  1.0000E+02  2.0296E+01  1.0000E+02
 EBVSHRINKSD(%)  8.4036E+00  6.4970E+00  3.1251E+01  9.9780E+01  8.1779E+00  1.0000E+02
 EBVSHRINKVR(%)  1.6101E+01  1.2572E+01  5.2736E+01  1.0000E+02  1.5687E+01  1.0000E+02
 EPSSHRINKSD(%)  8.7658E+00
 EPSSHRINKVR(%)  1.6763E+01


 TOTAL DATA POINTS NORMALLY DISTRIBUTED (N):          179
 N*LOG(2PI) CONSTANT TO OBJECTIVE FUNCTION:    328.97999488727282
 OBJECTIVE FUNCTION VALUE WITHOUT CONSTANT:    1627.7287588534214
 OBJECTIVE FUNCTION VALUE WITH CONSTANT:       1956.7087537406942
 REPORTED OBJECTIVE FUNCTION DOES NOT CONTAIN CONSTANT

 TOTAL EFFECTIVE ETAS (NIND*NETA):                            60


 #TERE:
 Elapsed estimation  time in seconds:   461.96
 Elapsed postprocess time in seconds:     0.95

 ********************               FIRST ORDER CONDITIONAL ESTIMATION WITH INTERACTION              ********************
 #OBJT:**************                       MINIMUM VALUE OF OBJECTIVE FUNCTION                      ********************
 #OBJV:********************************************     1627.729       **************************************************

 ********************               FIRST ORDER CONDITIONAL ESTIMATION WITH INTERACTION              ********************
 ********************                             FINAL PARAMETER ESTIMATE                           ********************

 THETA - VECTOR OF FIXED EFFECTS PARAMETERS   *********
         TH 1      TH 2      TH 3      TH 4      TH 5      TH 6      TH 7
         1.17E+01  8.83E+01  1.92E+00  6.55E+01  3.90E+00  5.00E-01  3.29E-01

 OMEGA - COV MATRIX FOR RANDOM EFFECTS - ETAS  ********
         ETA1      ETA2      ETA3      ETA4      ETA5      ETA6
 ETA1
+        5.40E-02
 ETA2
+        0.00E+00  1.85E-01
 ETA3
+        0.00E+00  0.00E+00  1.67E+00
 ETA4
+        0.00E+00  0.00E+00  0.00E+00  1.00E-05
 ETA5
+        0.00E+00  0.00E+00  0.00E+00  0.00E+00  9.93E-01
 ETA6
+        0.00E+00  0.00E+00  0.00E+00  0.00E+00  0.00E+00  1.00E-01

 SIGMA - COV MATRIX FOR RANDOM EFFECTS - EPSILONS  ****
         EPS1
 EPS1
+        7.09E-02

 OMEGA - CORR MATRIX FOR RANDOM EFFECTS - ETAS  *******
         ETA1      ETA2      ETA3      ETA4      ETA5      ETA6
 ETA1
+        2.32E-01
 ETA2
+        0.00E+00  4.30E-01
 ETA3
+        0.00E+00  0.00E+00  1.29E+00
 ETA4
+        0.00E+00  0.00E+00  0.00E+00  3.16E-03
 ETA5
+        0.00E+00  0.00E+00  0.00E+00  0.00E+00  9.96E-01
 ETA6
+        0.00E+00  0.00E+00  0.00E+00  0.00E+00  0.00E+00  3.16E-01

 SIGMA - CORR MATRIX FOR RANDOM EFFECTS - EPSILONS  ***
         EPS1
 EPS1
+        2.66E-01
 Elapsed finaloutput time in seconds:     0.02
 #CPUT: Total CPU Time in Seconds,      462.875
