29.07.2025
11:00
$SIZES      PD=-1000 LVR=-150 LTH=-200
$PROBLEM    single pyDarwin individual,one among multitude
$INPUT      ID TIME AMT RATE DV DROP MDV AGE SEX LBM DROP CMT EVID
$DATA      data.csv IGNORE=@
$SUBROUTINE ADVAN11 TRANS4
$PK

  TVCLSEX = 0
  IF(SEX == 1) THEN
  TVCLSEX = THETA(1)
  ENDIF
  CL = THETA(2) *(1 + THETA(3) * (AGE)) *(LBM/50)**(THETA(4)) *(1 + TVCLSEX) * EXP(ETA(1)) ; CL
  ; Q is not used ; Q

  V1 = THETA(5)  *(LBM/50)**(THETA(6))  * EXP(ETA(2))
  SC = V1 ; V1

  V2 = THETA(7) *(1 + THETA(8) * (AGE)) *(LBM/50)**(THETA(9))  * EXP(ETA(3)) ; V2

  Q2 = THETA(10)    * EXP(ETA(4)) ; Q2

  Q3 = THETA(11)    * EXP(ETA(5)) ; Q3

  V3 = THETA(12) *(1 + THETA(13) * (AGE))   * EXP(ETA(6)) ; V3
$ERROR
  IPRED = F
  Y = F *(1+EPS(1))+EPS(2)
$SIGMA  0.011717  ;     EPS(1)
 0.00030316  ;     EPS(2)
;proportional error
;additive error
$THETA  -0.0666447 ; CL~SEX1
 (0,3.2021) ; CL
 -0.00478794 ; CL~AGE
 0.558575 ; CL~LBM
 (0,3.91548) ; V1
 1.44432 ; V1~LBM
 (0,12.2974) ; V2
 -0.00726353 ; V2~AGE
 0.541183 ; V2~LBM
 (0,1.88076) ; Q2
 (0,0.133808) ; Q3
 (0,5.0233) ; V3
 -0.00846505 ; V3~AGE
; Q is not used
$OMEGA  0.0196573  ;        CL_
 0.0697635  ;        V1_
 0.104366  ;        V2_
 0.340503  ;        Q2_
 0.264263  ;        Q3_
 0.264548  ;        V3_
; Q is not used
$ESTIMATION METHOD=COND INTERACTION NOABORT MAXEVALS=0
$TABLE      ID MDV SEX TIME DV ONEHEADER NOPRINT NOAPPEND
            FILE=npctab.dta

NM-TRAN MESSAGES
 WARNINGS AND ERRORS (IF ANY) FOR PROBLEM    1
 (WARNING  2) NM-TRAN INFERS THAT THE DATA ARE POPULATION.

1NONLINEAR MIXED EFFECTS MODEL PROGRAM (NONMEM) VERSION 7.4.3
 ORIGINALLY DEVELOPED BY STUART BEAL, LEWIS SHEINER, AND ALISON BOECKMANN
 CURRENT DEVELOPERS ARE ROBERT BAUER, ICON DEVELOPMENT SOLUTIONS,
 AND ALISON BOECKMANN. IMPLEMENTATION, EFFICIENCY, AND STANDARDIZATION
 PERFORMED BY NOUS INFOSYSTEMS.
 PROBLEM NO.:         1
 single pyDarwin individual,one among multitude
 TOT. NO. OF OBS RECS:     1992
 TOT. NO. OF INDIVIDUALS:       65
 THREE COMPARTMENT MODEL (ADVAN11)
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 #TBLN:      1
 #METH: First Order Conditional Estimation with Interaction (Evaluation)
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 Elapsed evaluation time in seconds:     0.33
 Elapsed postprocess time in seconds:     0.30

 ********************         FIRST ORDER CONDITIONAL ESTIMATION WITH INTERACTION (EVALUATION)       ********************
 #OBJT:**************                       MINIMUM VALUE OF OBJECTIVE FUNCTION                      ********************
 #OBJV:********************************************     3290.662       **************************************************

 ********************         FIRST ORDER CONDITIONAL ESTIMATION WITH INTERACTION (EVALUATION)       ********************
 ********************                             FINAL PARAMETER ESTIMATE                           ********************

 THETA - VECTOR OF FIXED EFFECTS PARAMETERS   *********
         TH 1      TH 2      TH 3      TH 4      TH 5      TH 6      TH 7      TH 8      TH 9      TH10      TH11      TH12
          TH13
        -6.66E-02  3.20E+00 -4.79E-03  5.59E-01  3.92E+00  1.44E+00  1.23E+01 -7.26E-03  5.41E-01  1.88E+00  1.34E-01  5.02E+00
         -8.47E-03

 OMEGA - COV MATRIX FOR RANDOM EFFECTS - ETAS  ********
         ETA1      ETA2      ETA3      ETA4      ETA5      ETA6
 ETA1
+        1.97E-02
 ETA2
+        0.00E+00  6.98E-02
 ETA3
+        0.00E+00  0.00E+00  1.04E-01
 ETA4
+        0.00E+00  0.00E+00  0.00E+00  3.41E-01
 ETA5
+        0.00E+00  0.00E+00  0.00E+00  0.00E+00  2.64E-01
 ETA6
+        0.00E+00  0.00E+00  0.00E+00  0.00E+00  0.00E+00  2.65E-01

 SIGMA - COV MATRIX FOR RANDOM EFFECTS - EPSILONS  ****
         EPS1      EPS2
 EPS1
+        1.17E-02
 EPS2
+        0.00E+00  3.03E-04

 OMEGA - CORR MATRIX FOR RANDOM EFFECTS - ETAS  *******
         ETA1      ETA2      ETA3      ETA4      ETA5      ETA6
 ETA1
+        1.40E-01
 ETA2
+        0.00E+00  2.64E-01
 ETA3
+        0.00E+00  0.00E+00  3.23E-01
 ETA4
+        0.00E+00  0.00E+00  0.00E+00  5.84E-01
 ETA5
+        0.00E+00  0.00E+00  0.00E+00  0.00E+00  5.14E-01
 ETA6
+        0.00E+00  0.00E+00  0.00E+00  0.00E+00  0.00E+00  5.14E-01

 SIGMA - CORR MATRIX FOR RANDOM EFFECTS - EPSILONS  ***
         EPS1      EPS2
 EPS1
+        1.08E-01
 EPS2
+        0.00E+00  1.74E-02
 Elapsed finaloutput time in seconds:     0.12
 #CPUT: Total CPU Time in Seconds,        0.813
