28.07.2025
12:43
$SIZES      PD=-1000 LVR=-150 LTH=-200
$PROBLEM    single pyDarwin individual,one among multitude
$INPUT      ID TIME AMT DV WT EVID MDV
$DATA      dataset.csv IGNORE=@
$SUBROUTINE ADVAN2 TRANS2
$PK
  CL = THETA(1)*(WT/70)**(0.75) * EXP(ETA(1)) ; CL
  Ka = THETA(2) * EXP(ETA(2)) ; Ka
  V = THETA(3)
  SC = V ; V
  ; Q is not used ; Q
  ; V2 is not used ; V2
  ; V3 is not used ; V3
  ; Q3 is not used ; Q3
  ; Q4 is not used ; Q4
  ; V4 is not used ; V4
$ERROR
  IPRED = F
  Y = F *(1+EPS(1))+EPS(2)
$SIGMA  0.02267  ;     EPS(1)
 0.0765339  ;     EPS(2)
;proportional error
;additive error
$THETA  (0,2.81337) ; CL
 (0,1.42553) ; Ka
 (0,31.4985) ; V
; Q is not used
; V2 is not used
; V3 is not used
; Q3 is not used
; Q4 is not used
; V4 is not used
$OMEGA  0.0686746  ;        CL_
 0.336317  ;        Ka_
; Q is not used
; V2 is not used
; V3 is not used
; Q3 is not used
; Q4 is not used
; V4 is not used
$ESTIMATION METHOD=COND INTERACTION NOABORT MAXEVALS=0
$TABLE      ID MDV TIME DV ONEHEADER NOPRINT NOAPPEND FILE=npctab.dta

NM-TRAN MESSAGES
 WARNINGS AND ERRORS (IF ANY) FOR PROBLEM    1
 (WARNING  2) NM-TRAN INFERS THAT THE DATA ARE POPULATION.

1NONLINEAR MIXED EFFECTS MODEL PROGRAM (NONMEM) VERSION 7.4.3
 ORIGINALLY DEVELOPED BY STUART BEAL, LEWIS SHEINER, AND ALISON BOECKMANN
 CURRENT DEVELOPERS ARE ROBERT BAUER, ICON DEVELOPMENT SOLUTIONS,
 AND ALISON BOECKMANN. IMPLEMENTATION, EFFICIENCY, AND STANDARDIZATION
 PERFORMED BY NOUS INFOSYSTEMS.
 PROBLEM NO.:         1
 single pyDarwin individual,one among multitude
 TOT. NO. OF OBS RECS:      132
 TOT. NO. OF INDIVIDUALS:       12
 ONE COMPARTMENT MODEL WITH FIRST-ORDER ABSORPTION (ADVAN2)
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 #TBLN:      1
 #METH: First Order Conditional Estimation with Interaction (Evaluation)
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 Elapsed evaluation time in seconds:     0.02
 Elapsed postprocess time in seconds:     0.00

 ********************         FIRST ORDER CONDITIONAL ESTIMATION WITH INTERACTION (EVALUATION)       ********************
 #OBJT:**************                       MINIMUM VALUE OF OBJECTIVE FUNCTION                      ********************
 #OBJV:********************************************      110.443       **************************************************

 ********************         FIRST ORDER CONDITIONAL ESTIMATION WITH INTERACTION (EVALUATION)       ********************
 ********************                             FINAL PARAMETER ESTIMATE                           ********************

 THETA - VECTOR OF FIXED EFFECTS PARAMETERS   *********
         TH 1      TH 2      TH 3
         2.81E+00  1.43E+00  3.15E+01

 OMEGA - COV MATRIX FOR RANDOM EFFECTS - ETAS  ********
         ETA1      ETA2
 ETA1
+        6.87E-02
 ETA2
+        0.00E+00  3.36E-01

 SIGMA - COV MATRIX FOR RANDOM EFFECTS - EPSILONS  ****
         EPS1      EPS2
 EPS1
+        2.27E-02
 EPS2
+        0.00E+00  7.65E-02

 OMEGA - CORR MATRIX FOR RANDOM EFFECTS - ETAS  *******
         ETA1      ETA2
 ETA1
+        2.62E-01
 ETA2
+        0.00E+00  5.80E-01

 SIGMA - CORR MATRIX FOR RANDOM EFFECTS - EPSILONS  ***
         EPS1      EPS2
 EPS1
+        1.51E-01
 EPS2
+        0.00E+00  2.77E-01
 Elapsed finaloutput time in seconds:     0.02
 #CPUT: Total CPU Time in Seconds,        0.063
